mån 27 maj 2024 10:09:15 CEST
$PROBLEM    PHENOBARB SIMPLE MODEL
$DATA      pheno.dta IGNORE=@
$INPUT      ID TIME AMT WGT APGR DV FA1 FA2
$SUBROUTINE ADVAN1 TRANS2
$ABBREVIATED REPLACE ETA_CL=ETA(1)
$ABBREVIATED REPLACE ETA_VC=ETA(2)
$PK
TVCL = THETA(1)*WGT
TVV = THETA(2)*WGT
IF(APGR.LT.5) TVV = TVV*(1 + THETA(3))
CL = TVCL*EXP(ETA_CL)
VC = TVV*EXP(ETA_VC)
V = VC
S1 = VC

$ERROR
Y = F + F*EPS(1)

$THETA  (0,0.00469307) ; POP_CL
$THETA  (0,1.00916) ; POP_V
$THETA  (-.99,.1) ; COVAPGR
$OMEGA  0.0309626  ;     IIV_CL
$OMEGA  0.031128  ;     IIV_VC
$SIGMA  0.0130865  ;      SIGMA
$ESTIMATION METHOD=1 INTERACTION MAXEVALS=99999
$COVARIANCE UNCONDITIONAL PRINT=E
$TABLE      ID TIME DV CIPREDI PRED RES CWRES NOAPPEND NOPRINT
            ONEHEADER FILE=pheno.tab

NM-TRAN MESSAGES
 WARNINGS AND ERRORS (IF ANY) FOR PROBLEM    1
 (WARNING  2) NM-TRAN INFERS THAT THE DATA ARE POPULATION.
Note: Analytical 2nd Derivatives are constructed in FSUBS but are never used.
      You may insert $ABBR DERIV2=NO after the first $PROB to save FSUBS construction and compilation time

1NONLINEAR MIXED EFFECTS MODEL PROGRAM (NONMEM) VERSION 7.5.1
 ORIGINALLY DEVELOPED BY STUART BEAL, LEWIS SHEINER, AND ALISON BOECKMANN
 CURRENT DEVELOPERS ARE ROBERT BAUER, ICON DEVELOPMENT SOLUTIONS,
 AND ALISON BOECKMANN. IMPLEMENTATION, EFFICIENCY, AND STANDARDIZATION
 PERFORMED BY NOUS INFOSYSTEMS.
 PROBLEM NO.:         1
 PHENOBARB SIMPLE MODEL
 TOT. NO. OF OBS RECS:      155
 TOT. NO. OF INDIVIDUALS:       59
 ONE COMPARTMENT MODEL (ADVAN1)
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 #TBLN:      1
 #METH: First Order Conditional Estimation with Interaction
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
 #TERM:
0MINIMIZATION SUCCESSFUL
 NO. OF FUNCTION EVALUATIONS USED:      111
 NO. OF SIG. DIGITS IN FINAL EST.:  3.8

 ETABAR IS THE ARITHMETIC MEAN OF THE ETA-ESTIMATES,
 AND THE P-VALUE IS GIVEN FOR THE NULL HYPOTHESIS THAT THE TRUE MEAN IS 0.

 ETABAR:         1.6884E-03 -1.1976E-03
 SE:             1.1692E-02  1.8795E-02
 N:                      59          59

 P VAL.:         8.8518E-01  9.4919E-01

 ETASHRINKSD(%)  4.7580E+01  1.3581E+01
 ETASHRINKVR(%)  7.2522E+01  2.5317E+01
 EBVSHRINKSD(%)  4.7738E+01  1.3692E+01
 EBVSHRINKVR(%)  7.2687E+01  2.5509E+01
 RELATIVEINF(%)  2.5952E+01  7.0777E+01
 EPSSHRINKSD(%)  2.1198E+01
 EPSSHRINKVR(%)  3.7903E+01


 TOTAL DATA POINTS NORMALLY DISTRIBUTED (N):          155
 N*LOG(2PI) CONSTANT TO OBJECTIVE FUNCTION:    284.87094529344853
 OBJECTIVE FUNCTION VALUE WITHOUT CONSTANT:    586.27605628520962
 OBJECTIVE FUNCTION VALUE WITH CONSTANT:       871.14700157865809
 REPORTED OBJECTIVE FUNCTION DOES NOT CONTAIN CONSTANT

 TOTAL EFFECTIVE ETAS (NIND*NETA):                           118


 #TERE:
 Elapsed estimation  time in seconds:     0.26
 Elapsed covariance  time in seconds:     0.25
 Elapsed postprocess time in seconds:     0.02

 ********************               FIRST ORDER CONDITIONAL ESTIMATION WITH INTERACTION              ********************
 #OBJT:**************                       MINIMUM VALUE OF OBJECTIVE FUNCTION                      ********************
 #OBJV:********************************************      586.276       **************************************************

 ********************               FIRST ORDER CONDITIONAL ESTIMATION WITH INTERACTION              ********************
 ********************                             FINAL PARAMETER ESTIMATE                           ********************

 THETA - VECTOR OF FIXED EFFECTS PARAMETERS   *********
         TH 1      TH 2      TH 3
         4.70E-03  9.84E-01  1.59E-01

 OMEGA - COV MATRIX FOR RANDOM EFFECTS - ETAS  ********
         ETA_CL    ETA_VC
 ETA_CL
+        2.94E-02
 ETA_VC
+        0.00E+00  2.79E-02

 SIGMA - COV MATRIX FOR RANDOM EFFECTS - EPSILONS  ****
         EPS1
 EPS1
+        1.32E-02

 OMEGA - CORR MATRIX FOR RANDOM EFFECTS - ETAS  *******
         ETA_CL    ETA_VC
 ETA_CL
+        1.71E-01
 ETA_VC
+        0.00E+00  1.67E-01

 SIGMA - CORR MATRIX FOR RANDOM EFFECTS - EPSILONS  ***
         EPS1
 EPS1
+        1.15E-01

 ********************               FIRST ORDER CONDITIONAL ESTIMATION WITH INTERACTION              ********************
 ********************                            STANDARD ERROR OF ESTIMATE                          ********************

 THETA - VECTOR OF FIXED EFFECTS PARAMETERS   *********
         TH 1      TH 2      TH 3
         2.10E-04  2.69E-02  8.38E-02

 OMEGA - COV MATRIX FOR RANDOM EFFECTS - ETAS  ********
         ETA_CL    ETA_VC
 ETA_CL
+        1.34E-02
 ETA_VC
+       .........  7.48E-03

 SIGMA - COV MATRIX FOR RANDOM EFFECTS - EPSILONS  ****
         EPS1
 EPS1
+        2.28E-03

 OMEGA - CORR MATRIX FOR RANDOM EFFECTS - ETAS  *******
         ETA_CL    ETA_VC
 ETA_CL
+        3.92E-02
 ETA_VC
+       .........  2.24E-02

 SIGMA - CORR MATRIX FOR RANDOM EFFECTS - EPSILONS  ***
         EPS1
 EPS1
+        9.91E-03

 ********************               FIRST ORDER CONDITIONAL ESTIMATION WITH INTERACTION              ********************
 ********************                          COVARIANCE MATRIX OF ESTIMATE                         ********************

            TH 1      TH 2      TH 3      OM11      OM12      OM22      SG11
 TH 1
+        4.41E-08
 TH 2
+        4.76E-08  7.23E-04
 TH 3
+       -1.68E-06 -8.04E-04  7.01E-03
 OM11
+       -1.09E-06  4.99E-05 -1.08E-04  1.80E-04
 OM12
+       ......... ......... ......... ......... .........
 OM22
+        1.55E-07  7.17E-05 -3.94E-05 -1.86E-05 .........  5.59E-05
 SG11
+        8.04E-08  1.47E-05  2.92E-05  5.05E-06 ......... -4.50E-07  5.20E-06

 ********************               FIRST ORDER CONDITIONAL ESTIMATION WITH INTERACTION              ********************
 ********************                          CORRELATION MATRIX OF ESTIMATE                        ********************

            TH 1      TH 2      TH 3      OM11      OM12      OM22      SG11
 TH 1
+        2.10E-04
 TH 2
+        8.43E-03  2.69E-02
 TH 3
+       -9.55E-02 -3.57E-01  8.38E-02
 OM11
+       -3.87E-01  1.38E-01 -9.58E-02  1.34E-02
 OM12
+       ......... ......... ......... ......... .........
 OM22
+        9.89E-02  3.57E-01 -6.29E-02 -1.86E-01 .........  7.48E-03
 SG11
+        1.68E-01  2.39E-01  1.53E-01  1.65E-01 ......... -2.64E-02  2.28E-03
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
 ********************               FIRST ORDER CONDITIONAL ESTIMATION WITH INTERACTION              ********************
 ********************                      EIGENVALUES OF COR MATRIX OF ESTIMATE                     ********************

             1         2         3         4         5         6
         3.59E-01  4.84E-01  9.45E-01  1.18E+00  1.46E+00  1.58E+00
 Elapsed finaloutput time in seconds:     0.02
 #CPUT: Total CPU Time in Seconds,        0.606
