lör  8 sep 2018 10:57:25 CEST
;; 1. Based on: 5
; $SIZE  MOD=23
$PROBLEM    PHENOBARB SIMPLE MODEL
$DATA      'pheno.dta' IGNORE=@
$INPUT      ID TIME AMT WGT APGR DV FA1 FA2
$SUBROUTINE ADVAN1 TRANS2
$PK

IF(AMT.GT.0) BTIME=TIME
TAD=TIME-BTIME
      TVCL=THETA(1)*WGT
      TVV=THETA(2)*WGT
IF(APGR.LT.5) TVV=TVV*(1+THETA(3))
      CL=TVCL*EXP(ETA(1))
      V=TVV*EXP(ETA(2))
      S1=V
$ERROR

      W=F
      Y=F+W*EPS(1)

      IPRED=F         ;  individual-specific prediction
      IRES=DV-IPRED   ;  individual-specific residual
      IWRES=IRES/W    ;  individual-specific weighted residual

$THETA  (0,0.00469307) ; CL
$THETA  (0,1.00916) ; V
$THETA  (-.99,.1)
$OMEGA  DIAGONAL(2)
 0.0309626  ;       IVCL
 0.031128  ;        IVV
$SIGMA  0.0130865
$ESTIMATION METHOD=1 INTERACTION PRINT=1
$COVARIANCE UNCONDITIONAL
$TABLE      ID TIME AMT WGT APGR IPRED PRED TAD CWRES NPDE NOAPPEND
            NOPRINT ONEHEADER FILE=pheno_real.tab

NM-TRAN MESSAGES
 WARNINGS AND ERRORS (IF ANY) FOR PROBLEM    1
 (WARNING  2) NM-TRAN INFERS THAT THE DATA ARE POPULATION.

1NONLINEAR MIXED EFFECTS MODEL PROGRAM (NONMEM) VERSION 7.4.2
 ORIGINALLY DEVELOPED BY STUART BEAL, LEWIS SHEINER, AND ALISON BOECKMANN
 CURRENT DEVELOPERS ARE ROBERT BAUER, ICON DEVELOPMENT SOLUTIONS,
 AND ALISON BOECKMANN. IMPLEMENTATION, EFFICIENCY, AND STANDARDIZATION
 PERFORMED BY NOUS INFOSYSTEMS.
 PROBLEM NO.:         1
 PHENOBARB SIMPLE MODEL
 TOT. NO. OF OBS RECS:      155
 TOT. NO. OF INDIVIDUALS:       59
 ONE COMPARTMENT MODEL (ADVAN1)
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 #TBLN:      1
 #METH: First Order Conditional Estimation with Interaction
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
 #TERM:
0MINIMIZATION SUCCESSFUL
 NO. OF FUNCTION EVALUATIONS USED:      111
 NO. OF SIG. DIGITS IN FINAL EST.:  3.8

 ETABAR IS THE ARITHMETIC MEAN OF THE ETA-ESTIMATES,
 AND THE P-VALUE IS GIVEN FOR THE NULL HYPOTHESIS THAT THE TRUE MEAN IS 0.

 ETABAR:         1.6884E-03 -1.1976E-03
 SE:             1.1692E-02  1.8795E-02
 N:                      59          59

 P VAL.:         8.8518E-01  9.4919E-01

 ETASHRINKSD(%)  4.7130E+01  1.2839E+01
 ETASHRINKVR(%)  7.2048E+01  2.4030E+01
 EBVSHRINKSD(%)  4.7738E+01  1.3692E+01
 EBVSHRINKVR(%)  7.2687E+01  2.5509E+01
 EPSSHRINKSD(%)  2.1198E+01
 EPSSHRINKVR(%)  3.7903E+01


 TOTAL DATA POINTS NORMALLY DISTRIBUTED (N):          155
 N*LOG(2PI) CONSTANT TO OBJECTIVE FUNCTION:    284.87094529344853
 OBJECTIVE FUNCTION VALUE WITHOUT CONSTANT:    586.27605628188053
 OBJECTIVE FUNCTION VALUE WITH CONSTANT:       871.14700157532911
 REPORTED OBJECTIVE FUNCTION DOES NOT CONTAIN CONSTANT

 TOTAL EFFECTIVE ETAS (NIND*NETA):                           118


 #TERE:
 Elapsed estimation  time in seconds:     0.32
 Elapsed covariance  time in seconds:     0.28
 Elapsed postprocess time in seconds:     0.09

 ********************               FIRST ORDER CONDITIONAL ESTIMATION WITH INTERACTION              ********************
 #OBJT:**************                       MINIMUM VALUE OF OBJECTIVE FUNCTION                      ********************
 #OBJV:********************************************      586.276       **************************************************

 ********************               FIRST ORDER CONDITIONAL ESTIMATION WITH INTERACTION              ********************
 ********************                             FINAL PARAMETER ESTIMATE                           ********************

 THETA - VECTOR OF FIXED EFFECTS PARAMETERS   *********
         TH 1      TH 2      TH 3
         4.70E-03  9.84E-01  1.59E-01

 OMEGA - COV MATRIX FOR RANDOM EFFECTS - ETAS  ********
         ETA1      ETA2
 ETA1
+        2.94E-02
 ETA2
+        0.00E+00  2.79E-02

 SIGMA - COV MATRIX FOR RANDOM EFFECTS - EPSILONS  ****
         EPS1
 EPS1
+        1.32E-02

 OMEGA - CORR MATRIX FOR RANDOM EFFECTS - ETAS  *******
         ETA1      ETA2
 ETA1
+        1.71E-01
 ETA2
+        0.00E+00  1.67E-01

 SIGMA - CORR MATRIX FOR RANDOM EFFECTS - EPSILONS  ***
         EPS1
 EPS1
+        1.15E-01

 ********************               FIRST ORDER CONDITIONAL ESTIMATION WITH INTERACTION              ********************
 ********************                            STANDARD ERROR OF ESTIMATE                          ********************

 THETA - VECTOR OF FIXED EFFECTS PARAMETERS   *********
         TH 1      TH 2      TH 3
         2.10E-04  2.69E-02  8.38E-02

 OMEGA - COV MATRIX FOR RANDOM EFFECTS - ETAS  ********
         ETA1      ETA2
 ETA1
+        1.34E-02
 ETA2
+       .........  7.48E-03

 SIGMA - COV MATRIX FOR RANDOM EFFECTS - EPSILONS  ****
         EPS1
 EPS1
+        2.28E-03

 OMEGA - CORR MATRIX FOR RANDOM EFFECTS - ETAS  *******
         ETA1      ETA2
 ETA1
+        3.92E-02
 ETA2
+       .........  2.24E-02

 SIGMA - CORR MATRIX FOR RANDOM EFFECTS - EPSILONS  ***
         EPS1
 EPS1
+        9.90E-03

 ********************               FIRST ORDER CONDITIONAL ESTIMATION WITH INTERACTION              ********************
 ********************                          COVARIANCE MATRIX OF ESTIMATE                         ********************

            TH 1      TH 2      TH 3      OM11      OM12      OM22      SG11
 TH 1
+        4.41E-08
 TH 2
+        4.01E-08  7.23E-04
 TH 3
+       -1.67E-06 -8.04E-04  7.02E-03
 OM11
+       -1.09E-06  4.98E-05 -1.08E-04  1.80E-04
 OM12
+       ......... ......... ......... ......... .........
 OM22
+        1.54E-07  7.17E-05 -3.94E-05 -1.86E-05 .........  5.59E-05
 SG11
+        8.18E-08  1.46E-05  2.93E-05  4.87E-06 ......... -4.69E-07  5.20E-06

 ********************               FIRST ORDER CONDITIONAL ESTIMATION WITH INTERACTION              ********************
 ********************                          CORRELATION MATRIX OF ESTIMATE                        ********************

            TH 1      TH 2      TH 3      OM11      OM12      OM22      SG11
 TH 1
+        2.10E-04
 TH 2
+        7.10E-03  2.69E-02
 TH 3
+       -9.46E-02 -3.57E-01  8.38E-02
 OM11
+       -3.88E-01  1.38E-01 -9.65E-02  1.34E-02
 OM12
+       ......... ......... ......... ......... .........
 OM22
+        9.80E-02  3.57E-01 -6.30E-02 -1.85E-01 .........  7.48E-03
 SG11
+        1.71E-01  2.38E-01  1.54E-01  1.59E-01 ......... -2.75E-02  2.28E-03
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 Elapsed finaloutput time in seconds:     0.02
 #CPUT: Total CPU Time in Seconds,        0.720
