tor 11 nov 2021 15:24:39 CET
;; 1. Based on: 5
$PROBLEM    PHENOBARB SIMPLE MODEL
$DATA      pheno.csv IGNORE=@
$INPUT      ID TIME AMT WGT APGR DV FA1 FA2
$SUBROUTINE ADVAN1 TRANS2
$PK

IF(AMT.GT.0) BTIME=TIME
TAD=TIME-BTIME
      TVCL=THETA(1)*WGT
      TVV=THETA(2)*WGT
IF(APGR.LT.5) TVV=TVV*(1+THETA(3))
      CL=TVCL*EXP(ETA(1))
      V=TVV*EXP(ETA(2))
      S1=V

$ERROR

      W=F
      Y=F+W*EPS(1)

      IPRED=F         ;  individual-specific prediction
      IRES=DV-IPRED   ;  individual-specific residual
      IWRES=IRES/W    ;  individual-specific weighted residual

$THETA (0,0.00469307) ; pCL
$THETA  (0,1.00916) ; pV
$THETA  (-.99,.1)
$OMEGA  DIAGONAL(2)
 0.0309626  ;       IVCL
 0.031128  ;        IVV

$SIGMA  1e-7
;$SIGMA  0.0130865
$ESTIMATION METHOD=1 INTERACTION PRINT=1
$COVARIANCE UNCONDITIONAL
$TABLE      ID TIME DV AMT WGT APGR IPRED PRED RES TAD CWRES NPDE NOAPPEND
            NOPRINT ONEHEADER FILE=sdtab1

NM-TRAN MESSAGES
 WARNINGS AND ERRORS (IF ANY) FOR PROBLEM    1
 (WARNING  2) NM-TRAN INFERS THAT THE DATA ARE POPULATION.
 (WARNING  117) DATE=DROP IS SPECIFIED, BUT VALUES OF TIME DATA ITEMS DO NOT
APPEAR TO BE CLOCK TIMES (NO : APPEARS). IF DATE VALUES ARE NOT TO BE USED
IN COMPUTING TIME VALUES, SPECIFY "DROP" INSTEAD OF "DATE=DROP" ON THE
 $INPUT RECORD.

 PROBLEM NO.:         1

 TOT. NO. OF OBS RECS:     1006
 TOT. NO. OF INDIVIDUALS:       73
 GENERAL LINEAR KINETICS MODEL (ADVAN5)
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 #TBLN:      1
 #METH: First Order Conditional Estimation with Interaction
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
 #TERM:
0MINIMIZATION SUCCESSFUL
 NO. OF FUNCTION EVALUATIONS USED:      426
 NO. OF SIG. DIGITS IN FINAL EST.:  4.2
0PARAMETER ESTIMATE IS NEAR ITS BOUNDARY
 THIS MUST BE ADDRESSED BEFORE THE COVARIANCE STEP CAN BE IMPLEMENTED
