tor 11 nov 2021 15:24:39 CET
;; 1. Based on: 5
$PROBLEM    PHENOBARB SIMPLE MODEL
$DATA      pheno.csv IGNORE=@
$INPUT      ID TIME AMT WGT APGR DV FA1 FA2
$SUBROUTINE ADVAN1 TRANS2
$PK

IF(AMT.GT.0) BTIME=TIME
TAD=TIME-BTIME
      TVCL=THETA(1)*WGT
      TVV=THETA(2)*WGT
IF(APGR.LT.5) TVV=TVV*(1+THETA(3))
      CL=TVCL*EXP(ETA(1))
      V=TVV*EXP(ETA(2))
      S1=V

$ERROR

      W=F
      Y=F+W*EPS(1)

      IPRED=F         ;  individual-specific prediction
      IRES=DV-IPRED   ;  individual-specific residual
      IWRES=IRES/W    ;  individual-specific weighted residual

$THETA (0,0.00469307) ; pCL
$THETA  (0,1.00916) ; pV
$THETA  (-.99,.1)
$OMEGA  DIAGONAL(2)
 0.0309626  ;       IVCL
 0.031128  ;        IVV

$SIGMA  1e-7
;$SIGMA  0.0130865
$ESTIMATION METHOD=1 INTERACTION PRINT=1
$COVARIANCE UNCONDITIONAL
$TABLE      ID TIME DV AMT WGT APGR IPRED PRED RES TAD CWRES NPDE NOAPPEND
            NOPRINT ONEHEADER FILE=sdtab1

NM-TRAN MESSAGES
 WARNINGS AND ERRORS (IF ANY) FOR PROBLEM    1
 (WARNING  2) NM-TRAN INFERS THAT THE DATA ARE POPULATION.
 (WARNING  3) THERE MAY BE AN ERROR IN THE ABBREVIATED CODE. THE FOLLOWING
 ONE OR MORE RANDOM VARIABLES ARE DEFINED WITH "IF" STATEMENTS THAT DO NOT
 PROVIDE DEFINITIONS FOR BOTH THE "THEN" AND "ELSE" CASES. IF ALL
 CONDITIONS FAIL, THE VALUES OF THESE VARIABLES WILL BE ZERO.
   CUBL RESV CUBR

1NONLINEAR MIXED EFFECTS MODEL PROGRAM (NONMEM) VERSION 7.4.4
 ORIGINALLY DEVELOPED BY STUART BEAL, LEWIS SHEINER, AND ALISON BOECKMANN
 CURRENT DEVELOPERS ARE ROBERT BAUER, ICON DEVELOPMENT SOLUTIONS,
 AND ALISON BOECKMANN. IMPLEMENTATION, EFFICIENCY, AND STANDARDIZATION
 PERFORMED BY NOUS INFOSYSTEMS.
 PROBLEM NO.:         1
 pheno
 TOT. NO. OF OBS RECS:     1243
 TOT. NO. OF INDIVIDUALS:       20
 GENERAL NONLINEAR KINETICS MODEL (DVERK1, ADVAN6)
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 #TBLN:      1
 #METH: Importance Sampling (No Prior)
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
 #TERM:
 INDIVIDUAL OBJECTIVE FUNCTION VALUES ARE ALL ZERO. PROBLEM ENDED

 ETABAR IS THE ARITHMETIC MEAN OF THE ETA-ESTIMATES,
 AND THE P-VALUE IS GIVEN FOR THE NULL HYPOTHESIS THAT THE TRUE MEAN IS 0.

 ETABAR:         1.0639E-01    Infinity  1.8517E-01  2.1156E-01 -4.5249E+00
 SE:             3.5484E-01  0.0000E+00  6.9260E-01  5.1283E-01  3.1605E+00
 N:                      20          20          20          20          20

 P VAL.:         7.6431E-01  0.0000E+00  7.8920E-01  6.7994E-01  1.5223E-01

 ETASHRINKSD(%)  1.0000E-10  1.0000E+02  1.0000E-10  1.0000E-10  1.0000E-10
 ETASHRINKVR(%)  1.0000E-10  1.0000E+02  1.0000E-10  1.0000E-10  1.0000E-10
 EBVSHRINKSD(%)  0.0000E+00  0.0000E+00  0.0000E+00  0.0000E+00  0.0000E+00
 EBVSHRINKVR(%)  0.0000E+00  0.0000E+00  0.0000E+00  0.0000E+00  0.0000E+00
 EPSSHRINKSD(%)  1.0000E+02  1.0000E-10  1.0000E+02  1.0000E+02  1.0000E+02
 EPSSHRINKVR(%)  1.0000E+02  1.0000E-10  1.0000E+02  1.0000E+02  1.0000E+02

 TOTAL DATA POINTS NORMALLY DISTRIBUTED (N):           13
 N*LOG(2PI) CONSTANT TO OBJECTIVE FUNCTION:    23.892401863321489
 OBJECTIVE FUNCTION VALUE WITHOUT CONSTANT:                        NaN
 OBJECTIVE FUNCTION VALUE WITH CONSTANT:                           NaN
 REPORTED OBJECTIVE FUNCTION DOES NOT CONTAIN CONSTANT

 TOTAL EFFECTIVE ETAS (NIND*NETA):                           100

 #TERE:
 Elapsed estimation  time in seconds:  1084.91
 #TBLN:      2
 #METH: Objective Function Evaluation by Importance Sampling (No Prior)
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
0PRED EXIT CODE = 1
0INDIVIDUAL NO.       1   ID= 5.00000000000000E+00   (WITHIN-INDIVIDUAL) DATA REC NO.   2
 THETA=
  3.99E-01   0.00E+00   5.65E+01   1.12E+03   4.91E+00   2.02E+02   8.23E-01   3.65E+01   4.94E-06   0.00E+00
  1.88E-01   0.00E+00   0.00E+00   2.38E+00   1.93E-01   0.00E+00   5.74E-02   2.38E-01   0.00E+00   2.28E+00
 OCCURS DURING SEARCH FOR ETA AT INITIAL VALUE, ETA=0
 NUMERICAL DIFFICULTIES WITH INTEGRATION ROUTINE.
 NO. OF REQUIRED SIGNIFICANT DIGITS IN SOLUTION VECTOR
 TO DIFFERENTIAL EQUATIONS,   5, MAY BE TOO LARGE.
0PROGRAM TERMINATED BY OBJ
 MESSAGE ISSUED FROM ESTIMATION STEP
 #CPUT: Total CPU Time in Seconds,     1080.842
