tor 11 nov 2021 15:24:39 CET
;; 1. Based on: 5
$PROBLEM    PHENOBARB SIMPLE MODEL
$DATA      pheno.csv IGNORE=@
$INPUT      ID TIME AMT WGT APGR DV FA1 FA2
$SUBROUTINE ADVAN1 TRANS2
$PK

IF(AMT.GT.0) BTIME=TIME
TAD=TIME-BTIME
      TVCL=THETA(1)*WGT
      TVV=THETA(2)*WGT
IF(APGR.LT.5) TVV=TVV*(1+THETA(3))
      CL=TVCL*EXP(ETA(1))
      V=TVV*EXP(ETA(2))
      S1=V

$ERROR

      W=F
      Y=F+W*EPS(1)

      IPRED=F         ;  individual-specific prediction
      IRES=DV-IPRED   ;  individual-specific residual
      IWRES=IRES/W    ;  individual-specific weighted residual

$THETA (0,0.00469307) ; pCL
$THETA  (0,1.00916) ; pV
$THETA  (-.99,.1)
$OMEGA  DIAGONAL(2)
 0.0309626  ;       IVCL
 0.031128  ;        IVV

$SIGMA  1e-7
;$SIGMA  0.0130865
$ESTIMATION METHOD=1 INTERACTION PRINT=1
$COVARIANCE UNCONDITIONAL
$TABLE      ID TIME DV AMT WGT APGR IPRED PRED RES TAD CWRES NPDE NOAPPEND
            NOPRINT ONEHEADER FILE=sdtab1

 PROBLEM NO.:         1

 TOT. NO. OF OBS RECS:     1006
 TOT. NO. OF INDIVIDUALS:       73
 GENERAL LINEAR KINETICS MODEL (ADVAN5)
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 #TBLN:      1
 #METH: First Order Conditional Estimation with Interaction
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
 #TERM:
0MINIMIZATION TERMINATED
 DUE TO ROUNDING ERRORS (ERROR=134)
 NO. OF FUNCTION EVALUATIONS USED:     1373
 NO. OF SIG. DIGITS UNREPORTABLE

 ETABAR IS THE ARITHMETIC MEAN OF THE ETA-ESTIMATES,
 AND THE P-VALUE IS GIVEN FOR THE NULL HYPOTHESIS THAT THE TRUE MEAN IS 0.

 ETABAR:        -1.4981E-02  5.5465E-03  8.0999E-02  5.1371E-02
 SE:             2.8364E-02  3.3058E-02  1.2147E-01  6.1347E-02
 N:                      73          73          73          73

 P VAL.:         5.9737E-01  8.6676E-01  5.0487E-01  4.0238E-01
