ons 18 sep 2024 11:33:09 CEST
;; 1. Based on: 5
$PROBLEM    PHENOBARB SIMPLE MODEL
$DATA      ../../frem_dataset.dta IGNORE=@
$INPUT      ID TIME AMT WGT APGR DV FA1 FA2 MDV FREMTYPE
$SUBROUTINE ADVAN1 TRANS2
$PK

IF(AMT.GT.0) BTIME=TIME
TAD=TIME-BTIME
      TVCL=THETA(1)*WGT
      TVV=THETA(2)*WGT
IF(APGR.LT.5) TVV=TVV*(1+THETA(3))
      CL=TVCL*EXP(ETA(1))
      V=TVV*EXP(ETA(2))
      S1=V

    SDC3 = 0.704564727537
    SDC4 = 2.23763568135
$ERROR

      W=F
      Y=F+W*EPS(1)

      IPRED=F         ;  individual-specific prediction
      IRES=DV-IPRED   ;  individual-specific residual
      IWRES=IRES/W    ;  individual-specific weighted residual

;;;FREM CODE BEGIN COMPACT
;;;DO NOT MODIFY
    IF (FREMTYPE.EQ.100) THEN
;      WGT  0.704564727537
       Y = THETA(4) + ETA(3)*SDC3 + EPS(2)
       IPRED = THETA(4) + ETA(3)*SDC3
    END IF
    IF (FREMTYPE.EQ.200) THEN
;      APGR  2.23763568135
       Y = THETA(5) + ETA(4)*SDC4 + EPS(2)
       IPRED = THETA(5) + ETA(4)*SDC4
    END IF
;;;FREM CODE END COMPACT
$THETA  (0,0.00469555) FIX ; pCL
$THETA  (0,0.984258) FIX ; pV
$THETA  (-.99,0.15892) FIX
$THETA  1.52542372881 FIX ; TV_WGT
 6.42372881356 FIX ; TV_APGR
$OMEGA  BLOCK(4)
 0.0293508  ;       IVCL
 0.00028619284142 0.027906  ;        IVV
 0.0123697311238 0.000153348133264 1  ;    BSV_WGT
 -0.0298392031851 0.0158110712412 0.244579 1  ;   BSV_APGR
$SIGMA  0.013241  FIX
$SIGMA  0.0000001  FIX  ;     EPSCOV
$ESTIMATION METHOD=1 INTERACTION NONINFETA=1 MAXEVALS=0
$TABLE      ID TIME DV AMT WGT APGR IPRED PRED RES TAD CWRES NPDE
            NOAPPEND NOPRINT ONEHEADER FILE=sdtab1

NM-TRAN MESSAGES
 WARNINGS AND ERRORS (IF ANY) FOR PROBLEM    1
 (WARNING  2) NM-TRAN INFERS THAT THE DATA ARE POPULATION.
Note: Analytical 2nd Derivatives are constructed in FSUBS but are never used.
      You may insert $ABBR DERIV2=NO after the first $PROB to save FSUBS construction and compilation time

1NONLINEAR MIXED EFFECTS MODEL PROGRAM (NONMEM) VERSION 7.5.1
 ORIGINALLY DEVELOPED BY STUART BEAL, LEWIS SHEINER, AND ALISON BOECKMANN
 CURRENT DEVELOPERS ARE ROBERT BAUER, ICON DEVELOPMENT SOLUTIONS,
 AND ALISON BOECKMANN. IMPLEMENTATION, EFFICIENCY, AND STANDARDIZATION
 PERFORMED BY NOUS INFOSYSTEMS.
 PROBLEM NO.:         1
 PHENOBARB SIMPLE MODEL
 TOT. NO. OF OBS RECS:      273
 TOT. NO. OF INDIVIDUALS:       59
 ONE COMPARTMENT MODEL (ADVAN1)
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 #TBLN:      1
 #METH: First Order Conditional Estimation with Interaction (Evaluation)
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 Elapsed evaluation time in seconds:     0.01
 Elapsed postprocess time in seconds:     0.14

 ********************         FIRST ORDER CONDITIONAL ESTIMATION WITH INTERACTION (EVALUATION)       ********************
 #OBJT:**************                       MINIMUM VALUE OF OBJECTIVE FUNCTION                      ********************
 #OBJV:********************************************      749.208       **************************************************

 ********************         FIRST ORDER CONDITIONAL ESTIMATION WITH INTERACTION (EVALUATION)       ********************
 ********************                             FINAL PARAMETER ESTIMATE                           ********************

 THETA - VECTOR OF FIXED EFFECTS PARAMETERS   *********
         TH 1      TH 2      TH 3      TH 4      TH 5
         4.70E-03  9.84E-01  1.59E-01  1.53E+00  6.42E+00

 OMEGA - COV MATRIX FOR RANDOM EFFECTS - ETAS  ********
         ETA1      ETA2      ETA3      ETA4
 ETA1
+        2.94E-02
 ETA2
+        2.86E-04  2.79E-02
 ETA3
+        1.24E-02  1.53E-04  1.00E+00
 ETA4
+       -2.98E-02  1.58E-02  2.45E-01  1.00E+00

 SIGMA - COV MATRIX FOR RANDOM EFFECTS - EPSILONS  ****
         EPS1      EPS2
 EPS1
+        1.32E-02
 EPS2
+        0.00E+00  1.00E-07

 OMEGA - CORR MATRIX FOR RANDOM EFFECTS - ETAS  *******
         ETA1      ETA2      ETA3      ETA4
 ETA1
+        1.71E-01
 ETA2
+        1.00E-02  1.67E-01
 ETA3
+        7.22E-02  9.18E-04  1.00E+00
 ETA4
+       -1.74E-01  9.46E-02  2.45E-01  1.00E+00

 SIGMA - CORR MATRIX FOR RANDOM EFFECTS - EPSILONS  ***
         EPS1      EPS2
 EPS1
+        1.15E-01
 EPS2
+        0.00E+00  3.16E-04
 Elapsed finaloutput time in seconds:     0.02
 #CPUT: Total CPU Time in Seconds,        0.234
