;; 1. Based on: 5
$PROBLEM    PHENOBARB SIMPLE MODEL
$DATA      ../frem_dataset.dta IGNORE=@
$INPUT      ID TIME AMT WGT APGR DV FA1 FA2 MDV FREMTYPE
$SUBROUTINE ADVAN1 TRANS2
$PK

IF(AMT.GT.0) BTIME=TIME
TAD=TIME-BTIME
      TVCL=THETA(1)*WGT
      TVV=THETA(2)*WGT
IF(APGR.LT.5) TVV=TVV*(1+THETA(3))
      CL=TVCL*EXP(ETA(1))
      V=TVV*EXP(ETA(2))
      S1=V


    SDC3 = 0.704564727537
    SDC4 = 2.23763568135
$ERROR

      W=F
      Y=F+W*EPS(1)

      IPRED=F         ;  individual-specific prediction
      IRES=DV-IPRED   ;  individual-specific residual
      IWRES=IRES/W    ;  individual-specific weighted residual

;;;FREM CODE BEGIN COMPACT
;;;DO NOT MODIFY
    IF (FREMTYPE.EQ.100) THEN
;      WGT  0.704564727537
       Y = THETA(4) + ETA(3)*SDC3 + EPS(2)
       IPRED = THETA(4) + ETA(3)*SDC3
    END IF
    IF (FREMTYPE.EQ.200) THEN
;      APGR  2.23763568135
       Y = THETA(5) + ETA(4)*SDC4 + EPS(2)
       IPRED = THETA(5) + ETA(4)*SDC4
    END IF
;;;FREM CODE END COMPACT
$THETA  (0,0.00469555) FIX ; POP_CL
$THETA  (0,0.984258) FIX ; POP_V
$THETA  (-.99,0.15892) FIX
$THETA  1.52542372881 FIX ; TV_WGT
 6.42372881356 FIX ; TV_APGR
$OMEGA  BLOCK(4)
 0.0293508  ;       IVCL
 0.00028619284142 0.027906  ;        IVV
 0.012369731232 0.000153348133264 1  ;    BSV_WGT
 -0.0298392034216 0.0158110712412 0.244579 1  ;   BSV_APGR
$SIGMA  0.013241  FIX
$SIGMA  0.0000001  FIX  ;     EPSCOV
$ESTIMATION METHOD=1 INTERACTION NONINFETA=1 MCETA=1 MAXEVALS=0
$TABLE      ID TIME DV AMT WGT APGR IPRED PRED RES TAD CWRES NPDE
            NOAPPEND NOPRINT ONEHEADER FILE=sdtab1
$ETAS       FILE=model_3_input.phi
