ons 18 sep 2024 11:33:14 CEST
;; 1. Based on: 5
$PROBLEM    PHENOBARB SIMPLE MODEL
$DATA      ../../frem_dataset.dta IGNORE=@
$INPUT      ID TIME AMT WGT APGR DV FA1 FA2 MDV FREMTYPE
$SUBROUTINE ADVAN1 TRANS2
$PK

IF(AMT.GT.0) BTIME=TIME
TAD=TIME-BTIME
      TVCL=THETA(1)*WGT
      TVV=THETA(2)*WGT
IF(APGR.LT.5) TVV=TVV*(1+THETA(3))
      CL=TVCL*EXP(ETA(1))
      V=TVV*EXP(ETA(2))
      S1=V

    SDC3 = 0.704564727537
    SDC4 = 2.23763568135
$ERROR

      W=F
      Y=F+W*EPS(1)

      IPRED=F         ;  individual-specific prediction
      IRES=DV-IPRED   ;  individual-specific residual
      IWRES=IRES/W    ;  individual-specific weighted residual

;;;FREM CODE BEGIN COMPACT
;;;DO NOT MODIFY
    IF (FREMTYPE.EQ.100) THEN
;      WGT  0.704564727537
       Y = THETA(4) + ETA(3)*SDC3 + EPS(2)
       IPRED = THETA(4) + ETA(3)*SDC3
    END IF
    IF (FREMTYPE.EQ.200) THEN
;      APGR  2.23763568135
       Y = THETA(5) + ETA(4)*SDC4 + EPS(2)
       IPRED = THETA(5) + ETA(4)*SDC4
    END IF
;;;FREM CODE END COMPACT
$THETA  (0,0.00469555) ; pCL
$THETA  (0,0.984258) ; pV
$THETA  (-0.99,0.15892)
$THETA  1.52542372881 FIX ; TV_WGT
 6.42372881356 FIX ; TV_APGR
$OMEGA  BLOCK(4)
 0.0293508  ;       IVCL
 0.000286193 0.027906  ;        IVV
 0.0256033 -0.00161838 1  ;    BSV_WGT
 -0.0676481 0.0235094 0.244579 1  ;   BSV_APGR
$SIGMA  0.013241
$SIGMA  0.0000001  FIX  ;     EPSCOV
$ESTIMATION METHOD=1 INTERACTION NONINFETA=1
$COVARIANCE UNCONDITIONAL PRINT=E
$TABLE      ID TIME DV AMT WGT APGR IPRED PRED RES TAD CWRES NPDE
            NOAPPEND NOPRINT ONEHEADER FILE=sdtab1

NM-TRAN MESSAGES
 WARNINGS AND ERRORS (IF ANY) FOR PROBLEM    1
 (WARNING  2) NM-TRAN INFERS THAT THE DATA ARE POPULATION.
Note: Analytical 2nd Derivatives are constructed in FSUBS but are never used.
      You may insert $ABBR DERIV2=NO after the first $PROB to save FSUBS construction and compilation time

1NONLINEAR MIXED EFFECTS MODEL PROGRAM (NONMEM) VERSION 7.5.1
 ORIGINALLY DEVELOPED BY STUART BEAL, LEWIS SHEINER, AND ALISON BOECKMANN
 CURRENT DEVELOPERS ARE ROBERT BAUER, ICON DEVELOPMENT SOLUTIONS,
 AND ALISON BOECKMANN. IMPLEMENTATION, EFFICIENCY, AND STANDARDIZATION
 PERFORMED BY NOUS INFOSYSTEMS.
 PROBLEM NO.:         1
 PHENOBARB SIMPLE MODEL
 TOT. NO. OF OBS RECS:      273
 TOT. NO. OF INDIVIDUALS:       59
 ONE COMPARTMENT MODEL (ADVAN1)
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 #TBLN:      1
 #METH: First Order Conditional Estimation with Interaction
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
 #TERM:
0MINIMIZATION SUCCESSFUL
 NO. OF FUNCTION EVALUATIONS USED:      242
 NO. OF SIG. DIGITS IN FINAL EST.:  3.1

 ETABAR IS THE ARITHMETIC MEAN OF THE ETA-ESTIMATES,
 AND THE P-VALUE IS GIVEN FOR THE NULL HYPOTHESIS THAT THE TRUE MEAN IS 0.

 ETABAR:         8.4598E-04 -3.7115E-04  1.4169E-09 -2.4938E-10
 SE:             2.1364E-02  1.8872E-02  1.2908E-01  1.2908E-01
 N:                      59          59          59          59

 P VAL.:         9.6841E-01  9.8431E-01  1.0000E+00  1.0000E+00

 ETASHRINKSD(%)  1.7272E+01  9.9911E+00  1.0000E-10  1.0000E-10
 ETASHRINKVR(%)  3.1561E+01  1.8984E+01  1.0000E-10  1.0000E-10
 EBVSHRINKSD(%)  1.7296E+01  9.9613E+00  1.0246E-05  1.0158E-06
 EBVSHRINKVR(%)  3.1600E+01  1.8930E+01  2.0492E-05  2.0316E-06
 RELATIVEINF(%)  1.5929E+01  3.3420E+01  1.0000E+02  1.0000E+02
 EPSSHRINKSD(%)  1.8794E+01  9.9964E+01
 EPSSHRINKVR(%)  3.4056E+01  1.0000E+02


 TOTAL DATA POINTS NORMALLY DISTRIBUTED (N):          273
 N*LOG(2PI) CONSTANT TO OBJECTIVE FUNCTION:    501.74043912975128
 OBJECTIVE FUNCTION VALUE WITHOUT CONSTANT:    742.27758556829394
 OBJECTIVE FUNCTION VALUE WITH CONSTANT:       1244.0180246980453
 REPORTED OBJECTIVE FUNCTION DOES NOT CONTAIN CONSTANT

 TOTAL EFFECTIVE ETAS (NIND*NETA):                           236


 #TERE:
 Elapsed estimation  time in seconds:     0.87
 Elapsed covariance  time in seconds:     0.71
 Elapsed postprocess time in seconds:     0.14

 ********************               FIRST ORDER CONDITIONAL ESTIMATION WITH INTERACTION              ********************
 #OBJT:**************                       MINIMUM VALUE OF OBJECTIVE FUNCTION                      ********************
 #OBJV:********************************************      742.278       **************************************************

 ********************               FIRST ORDER CONDITIONAL ESTIMATION WITH INTERACTION              ********************
 ********************                             FINAL PARAMETER ESTIMATE                           ********************

 THETA - VECTOR OF FIXED EFFECTS PARAMETERS   *********
         TH 1      TH 2      TH 3      TH 4      TH 5
         4.85E-03  9.55E-01  3.30E-01  1.53E+00  6.42E+00

 OMEGA - COV MATRIX FOR RANDOM EFFECTS - ETAS  ********
         ETA1      ETA2      ETA3      ETA4
 ETA1
+        3.93E-02
 ETA2
+        1.68E-02  2.59E-02
 ETA3
+        4.27E-02 -1.69E-03  9.83E-01
 ETA4
+       -4.42E-02  6.54E-02  2.40E-01  9.83E-01

 SIGMA - COV MATRIX FOR RANDOM EFFECTS - EPSILONS  ****
         EPS1      EPS2
 EPS1
+        1.28E-02
 EPS2
+        0.00E+00  1.00E-07

 OMEGA - CORR MATRIX FOR RANDOM EFFECTS - ETAS  *******
         ETA1      ETA2      ETA3      ETA4
 ETA1
+        1.98E-01
 ETA2
+        5.27E-01  1.61E-01
 ETA3
+        2.17E-01 -1.06E-02  9.91E-01
 ETA4
+       -2.25E-01  4.10E-01  2.45E-01  9.91E-01

 SIGMA - CORR MATRIX FOR RANDOM EFFECTS - EPSILONS  ***
         EPS1      EPS2
 EPS1
+        1.13E-01
 EPS2
+        0.00E+00  3.16E-04

 ********************               FIRST ORDER CONDITIONAL ESTIMATION WITH INTERACTION              ********************
 ********************                            STANDARD ERROR OF ESTIMATE                          ********************

 THETA - VECTOR OF FIXED EFFECTS PARAMETERS   *********
         TH 1      TH 2      TH 3      TH 4      TH 5
         2.08E-04  2.44E-02  1.34E-01 ......... .........

 OMEGA - COV MATRIX FOR RANDOM EFFECTS - ETAS  ********
         ETA1      ETA2      ETA3      ETA4
 ETA1
+        2.03E-02
 ETA2
+        1.17E-02  8.38E-03
 ETA3
+        6.19E-02  3.62E-02  2.41E-01
 ETA4
+        4.74E-02  3.70E-02  1.66E-01  1.85E-01

 SIGMA - COV MATRIX FOR RANDOM EFFECTS - EPSILONS  ****
         EPS1      EPS2
 EPS1
+        2.47E-03
 EPS2
+       ......... .........

 OMEGA - CORR MATRIX FOR RANDOM EFFECTS - ETAS  *******
         ETA1      ETA2      ETA3      ETA4
 ETA1
+        5.12E-02
 ETA2
+        2.66E-01  2.60E-02
 ETA3
+        2.80E-01  2.27E-01  1.21E-01
 ETA4
+        2.66E-01  1.88E-01  1.61E-01  9.31E-02

 SIGMA - CORR MATRIX FOR RANDOM EFFECTS - EPSILONS  ***
         EPS1      EPS2
 EPS1
+        1.09E-02
 EPS2
+       ......... .........
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
 ********************               FIRST ORDER CONDITIONAL ESTIMATION WITH INTERACTION              ********************
 ********************                      EIGENVALUES OF COR MATRIX OF ESTIMATE                     ********************

             1         2         3         4         5         6         7         8         9        10        11        12
             13        14
         1.46E-02  1.25E-01  1.50E-01  2.65E-01  3.97E-01  5.04E-01  6.84E-01  7.54E-01  9.65E-01  1.11E+00  1.42E+00  1.63E+00
          2.36E+00  3.62E+00
 Elapsed finaloutput time in seconds:     0.02
 #CPUT: Total CPU Time in Seconds,        1.808
