ons  1 apr 2020 16:20:42 CEST
;; 1. Based on: 5
$PROBLEM    PHENOBARB SIMPLE MODEL
$DATA      ../../frem_dataset.dta IGNORE=@
$INPUT      ID TIME AMT WGT APGR DV FA1 FA2 APGRX MDV FREMTYPE
$SUBROUTINE ADVAN1 TRANS2
$PK

IF(AMT.GT.0) BTIME=TIME
TAD=TIME-BTIME
      TVCL=THETA(1)*WGT
      TVV=THETA(2)*WGT
IF(APGR.LT.5) TVV=TVV*(1+THETA(3))
      CL=TVCL*EXP(ETA(1))
      V=TVV*EXP(ETA(2))
      S1=V

    SDC3 = 0.704564727537
    SDC4 = 0.45678212786
$ERROR

      W=F
      Y=F+W*EPS(1)

      IPRED=F         ;  individual-specific prediction
      IRES=DV-IPRED   ;  individual-specific residual
      IWRES=IRES/W    ;  individual-specific weighted residual

;;;FREM CODE BEGIN COMPACT
;;;DO NOT MODIFY
    IF (FREMTYPE.EQ.100) THEN
;      WGT  0.704564727537
       Y = THETA(4) + ETA(3)*SDC3 + EPS(2)
       IPRED = THETA(4) + ETA(3)*SDC3
    END IF
    IF (FREMTYPE.EQ.200) THEN
;      APGRX  0.45678212786
       Y = THETA(5) + ETA(4)*SDC4 + EPS(2)
       IPRED = THETA(5) + ETA(4)*SDC4
    END IF
;;;FREM CODE END COMPACT
$THETA  (0,0.00469555) ; CL
$THETA  (0,0.984258) ; V
$THETA  (-.99,0.15892)
$THETA  1.52542372881 FIX ; TV_WGT
 0.71186440678 FIX ; TV_APGRX
$OMEGA  BLOCK(4)
 0.0293508  ;       IVCL
 0.000286193 0.027906  ;        IVV
 0.0271172 -0.00158875 1  ;    BSV_WGT
 -0.0717249 0.0227775 0.0820843 1  ;  BSV_APGRX
$SIGMA  0.013241
$SIGMA  0.0000001  FIX  ;     EPSCOV
$ESTIMATION METHOD=1 INTERACTION NONINFETA=1 MCETA=1
$COVARIANCE UNCONDITIONAL
$TABLE      ID TIME DV AMT WGT APGR IPRED PRED RES TAD CWRES NPDE
            NOAPPEND NOPRINT ONEHEADER FILE=sdtab1
$ETAS       FILE=model_4_input.phi

NM-TRAN MESSAGES
 WARNINGS AND ERRORS (IF ANY) FOR PROBLEM    1
 (WARNING  2) NM-TRAN INFERS THAT THE DATA ARE POPULATION.

1NONLINEAR MIXED EFFECTS MODEL PROGRAM (NONMEM) VERSION 7.4.4
 ORIGINALLY DEVELOPED BY STUART BEAL, LEWIS SHEINER, AND ALISON BOECKMANN
 CURRENT DEVELOPERS ARE ROBERT BAUER, ICON DEVELOPMENT SOLUTIONS,
 AND ALISON BOECKMANN. IMPLEMENTATION, EFFICIENCY, AND STANDARDIZATION
 PERFORMED BY NOUS INFOSYSTEMS.
 PROBLEM NO.:         1
 PHENOBARB SIMPLE MODEL
 TOT. NO. OF OBS RECS:      273
 TOT. NO. OF INDIVIDUALS:       59
 ONE COMPARTMENT MODEL (ADVAN1)
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 #TBLN:      1
 #METH: First Order Conditional Estimation with Interaction
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
 #TERM:
0MINIMIZATION SUCCESSFUL
 NO. OF FUNCTION EVALUATIONS USED:      265
 NO. OF SIG. DIGITS IN FINAL EST.:  3.3

 ETABAR IS THE ARITHMETIC MEAN OF THE ETA-ESTIMATES,
 AND THE P-VALUE IS GIVEN FOR THE NULL HYPOTHESIS THAT THE TRUE MEAN IS 0.

 ETABAR:         2.7775E-04 -9.9227E-05  7.2233E-10 -3.4221E-09
 SE:             2.1208E-02  1.7515E-02  1.2908E-01  1.2908E-01
 N:                      59          59          59          59

 P VAL.:         9.8955E-01  9.9548E-01  1.0000E+00  1.0000E+00

 ETASHRINKSD(%)  1.2440E+01  1.0097E+01  1.0000E-10  1.0000E-10
 ETASHRINKVR(%)  2.3333E+01  1.9175E+01  1.0000E-10  1.0000E-10
 EBVSHRINKSD(%)  1.3194E+01  1.0851E+01  1.0245E-05  2.4374E-05
 EBVSHRINKVR(%)  2.4647E+01  2.0525E+01  2.0490E-05  4.8748E-05
 EPSSHRINKSD(%)  1.7288E+01  9.9938E+01
 EPSSHRINKVR(%)  3.1588E+01  1.0000E+02


 TOTAL DATA POINTS NORMALLY DISTRIBUTED (N):          273
 N*LOG(2PI) CONSTANT TO OBJECTIVE FUNCTION:    501.74043912975128
 OBJECTIVE FUNCTION VALUE WITHOUT CONSTANT:    558.33561852962714
 OBJECTIVE FUNCTION VALUE WITH CONSTANT:       1060.0760576593784
 REPORTED OBJECTIVE FUNCTION DOES NOT CONTAIN CONSTANT

 TOTAL EFFECTIVE ETAS (NIND*NETA):                           236


 #TERE:
 Elapsed estimation  time in seconds:     0.79
 Elapsed covariance  time in seconds:     0.50
 Elapsed postprocess time in seconds:     0.12

 ********************               FIRST ORDER CONDITIONAL ESTIMATION WITH INTERACTION              ********************
 #OBJT:**************                       MINIMUM VALUE OF OBJECTIVE FUNCTION                      ********************
 #OBJV:********************************************      558.336       **************************************************

 ********************               FIRST ORDER CONDITIONAL ESTIMATION WITH INTERACTION              ********************
 ********************                             FINAL PARAMETER ESTIMATE                           ********************

 THETA - VECTOR OF FIXED EFFECTS PARAMETERS   *********
         TH 1      TH 2      TH 3      TH 4      TH 5
         4.87E-03  9.66E-01  2.38E-01  1.53E+00  7.12E-01

 OMEGA - COV MATRIX FOR RANDOM EFFECTS - ETAS  ********
         ETA1      ETA2      ETA3      ETA4
 ETA1
+        3.52E-02
 ETA2
+        1.92E-02  2.28E-02
 ETA3
+        4.33E-02 -2.79E-03  9.83E-01
 ETA4
+       -5.71E-02  4.39E-02  8.07E-02  9.83E-01

 SIGMA - COV MATRIX FOR RANDOM EFFECTS - EPSILONS  ****
         EPS1      EPS2
 EPS1
+        1.34E-02
 EPS2
+        0.00E+00  1.00E-07

 OMEGA - CORR MATRIX FOR RANDOM EFFECTS - ETAS  *******
         ETA1      ETA2      ETA3      ETA4
 ETA1
+        1.88E-01
 ETA2
+        6.78E-01  1.51E-01
 ETA3
+        2.33E-01 -1.86E-02  9.92E-01
 ETA4
+       -3.07E-01  2.93E-01  8.21E-02  9.92E-01

 SIGMA - CORR MATRIX FOR RANDOM EFFECTS - EPSILONS  ***
         EPS1      EPS2
 EPS1
+        1.16E-01
 EPS2
+        0.00E+00  3.16E-04

 ********************               FIRST ORDER CONDITIONAL ESTIMATION WITH INTERACTION              ********************
 ********************                            STANDARD ERROR OF ESTIMATE                          ********************

 THETA - VECTOR OF FIXED EFFECTS PARAMETERS   *********
         TH 1      TH 2      TH 3      TH 4      TH 5
         2.00E-04  2.31E-02  1.10E-01 ......... .........

 OMEGA - COV MATRIX FOR RANDOM EFFECTS - ETAS  ********
         ETA1      ETA2      ETA3      ETA4
 ETA1
+        1.94E-02
 ETA2
+        1.10E-02  7.61E-03
 ETA3
+        6.21E-02  3.45E-02  2.41E-01
 ETA4
+        4.23E-02  2.81E-02  1.37E-01  1.20E-01

 SIGMA - COV MATRIX FOR RANDOM EFFECTS - EPSILONS  ****
         EPS1      EPS2
 EPS1
+        2.79E-03
 EPS2
+       ......... .........

 OMEGA - CORR MATRIX FOR RANDOM EFFECTS - ETAS  *******
         ETA1      ETA2      ETA3      ETA4
 ETA1
+        5.18E-02
 ETA2
+        2.66E-01  2.52E-02
 ETA3
+        2.92E-01  2.31E-01  1.22E-01
 ETA4
+        2.41E-01  1.70E-01  1.39E-01  6.04E-02

 SIGMA - CORR MATRIX FOR RANDOM EFFECTS - EPSILONS  ***
         EPS1      EPS2
 EPS1
+        1.20E-02
 EPS2
+       ......... .........
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 Elapsed finaloutput time in seconds:     0.02
 #CPUT: Total CPU Time in Seconds,        1.440
