tis 27 okt 2020 09:30:19 CET
$PROBLEM    PHENOBARB SIMPLE MODEL
$DATA      pheno.dta IGNORE=@
$INPUT      ID TIME AMT WGT APGR DV
$SUBROUTINE ADVAN1 TRANS2
$PK
CL=THETA(1)*EXP(ETA(1))
V=THETA(2)*EXP(ETA(2))
S1=V

;;;SCM-LINEARIZE_CONSTANTS
$ERROR
Y=F+F*EPS(1)

D_EPSETA1_1 = 0
D_EPSETA1_2 = 0
"LAST
"  D_EPSETA1_1=HH(1,2)
"  D_EPSETA1_2=HH(1,3)
$THETA  (0,0.00581756) ; TVCL
$THETA  (0,1.44555) ; TVV
$OMEGA  0.111053  ;       IVCL
$OMEGA  0.201526  ;        IVV
$SIGMA  0.0164177
$ESTIMATION METHOD=1 INTERACTION MCETA=1 MAXEVALS=0
$ETAS       FILE=pheno.phi
$TABLE      ID DV MDV CIPREDI=OPRED H011 TIME AMT WGT APGR G011 G021
            ETA1 ETA2 D_EPSETA1_1 D_EPSETA1_2 NOPRINT NOAPPEND
            ONEHEADER FILE=pheno_linbase.dta
            RFORMAT="(1PE16.9,300(1PE24.16))"

NM-TRAN MESSAGES
 WARNINGS AND ERRORS (IF ANY) FOR PROBLEM    1
 (WARNING  2) NM-TRAN INFERS THAT THE DATA ARE POPULATION.

1NONLINEAR MIXED EFFECTS MODEL PROGRAM (NONMEM) VERSION 7.4.4
 ORIGINALLY DEVELOPED BY STUART BEAL, LEWIS SHEINER, AND ALISON BOECKMANN
 CURRENT DEVELOPERS ARE ROBERT BAUER, ICON DEVELOPMENT SOLUTIONS,
 AND ALISON BOECKMANN. IMPLEMENTATION, EFFICIENCY, AND STANDARDIZATION
 PERFORMED BY NOUS INFOSYSTEMS.
 PROBLEM NO.:         1
 PHENOBARB SIMPLE MODEL
 TOT. NO. OF OBS RECS:      155
 TOT. NO. OF INDIVIDUALS:       59
 ONE COMPARTMENT MODEL (ADVAN1)
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 #TBLN:      1
 #METH: First Order Conditional Estimation with Interaction (Evaluation)
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 Elapsed evaluation time in seconds:     0.00
 Elapsed postprocess time in seconds:     0.01

 ********************         FIRST ORDER CONDITIONAL ESTIMATION WITH INTERACTION (EVALUATION)       ********************
 #OBJT:**************                       MINIMUM VALUE OF OBJECTIVE FUNCTION                      ********************
 #OBJV:********************************************      730.895       **************************************************

 ********************         FIRST ORDER CONDITIONAL ESTIMATION WITH INTERACTION (EVALUATION)       ********************
 ********************                             FINAL PARAMETER ESTIMATE                           ********************

 THETA - VECTOR OF FIXED EFFECTS PARAMETERS   *********
         TH 1      TH 2
         5.82E-03  1.45E+00

 OMEGA - COV MATRIX FOR RANDOM EFFECTS - ETAS  ********
         ETA1      ETA2
 ETA1
+        1.11E-01
 ETA2
+        0.00E+00  2.02E-01

 SIGMA - COV MATRIX FOR RANDOM EFFECTS - EPSILONS  ****
         EPS1
 EPS1
+        1.64E-02

 OMEGA - CORR MATRIX FOR RANDOM EFFECTS - ETAS  *******
         ETA1      ETA2
 ETA1
+        3.33E-01
 ETA2
+        0.00E+00  4.49E-01

 SIGMA - CORR MATRIX FOR RANDOM EFFECTS - EPSILONS  ***
         EPS1
 EPS1
+        1.28E-01
 Elapsed finaloutput time in seconds:     0.01
 #CPUT: Total CPU Time in Seconds,        0.038
