Wed 14 Sep 2022 11:04:19 AM CEST
$PROBLEM PHENOBARB SIMPLE MODEL+time_varying3
$DATA testdata/pheno.dta IGNORE=@
$INPUT ID TIME AMT WGT APGR DV FA1 FA2 TAD
$SUBROUTINE ADVAN1 TRANS2

$PK
TVCL=THETA(1)*WGT
TVV=THETA(2)*WGT
IF(APGR.LT.5) TVV=TVV*(1+THETA(3))
CL=TVCL*EXP(ETA(1))
V=TVV*EXP(ETA(2))
S1=V

$ERROR
W=F
IF (TAD.LT.11.5) THEN
    Y = EPS(1)*THETA(4)*W*EXP(ETA(3)) + F
ELSE
    Y = EPS(1)*W*EXP(ETA(3)) + F
END IF
IPRED=F
IRES=DV-IPRED
IWRES=IRES/W

$THETA (0,0.00469539) ; PTVCL
$THETA (0,0.98352) ; PTVV
$THETA (-.99,0.156691)
$THETA  0.801621 ; time_varying
$OMEGA DIAGONAL(2)
 0.0254791  ;       IVCL
 0.0276841  ;        IVV

$OMEGA  0.039145 ; IIV_RUV1
$SIGMA 0.0176838
$ESTIMATION METHOD=1 INTERACTION
$COVARIANCE UNCONDITIONAL
$TABLE ID TIME DV AMT WGT APGR IPRED PRED RES TAD CWRES NPDE NOAPPEND
       NOPRINT ONEHEADER FILE=sdtab2

NM-TRAN MESSAGES
 WARNINGS AND ERRORS (IF ANY) FOR PROBLEM    1
 (WARNING  2) NM-TRAN INFERS THAT THE DATA ARE POPULATION.

1NONLINEAR MIXED EFFECTS MODEL PROGRAM (NONMEM) VERSION 7.5.0
 ORIGINALLY DEVELOPED BY STUART BEAL, LEWIS SHEINER, AND ALISON BOECKMANN
 CURRENT DEVELOPERS ARE ROBERT BAUER, ICON DEVELOPMENT SOLUTIONS,
 AND ALISON BOECKMANN. IMPLEMENTATION, EFFICIENCY, AND STANDARDIZATION
 PERFORMED BY NOUS INFOSYSTEMS.
 PROBLEM NO.:         1
 PHENOBARB SIMPLE MODEL+time_varying3
 TOT. NO. OF OBS RECS:      155
 TOT. NO. OF INDIVIDUALS:       59
 ONE COMPARTMENT MODEL (ADVAN1)
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 #TBLN:      1
 #METH: First Order Conditional Estimation with Interaction
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
 #TERM:
0MINIMIZATION SUCCESSFUL
 NO. OF FUNCTION EVALUATIONS USED:      202
 NO. OF SIG. DIGITS IN FINAL EST.:  3.2
0PARAMETER ESTIMATE IS NEAR ITS BOUNDARY

 ETABAR IS THE ARITHMETIC MEAN OF THE ETA-ESTIMATES,
 AND THE P-VALUE IS GIVEN FOR THE NULL HYPOTHESIS THAT THE TRUE MEAN IS 0.

 ETABAR:         1.3898E-03 -9.1606E-04 -3.8534E-06
 SE:             1.0341E-02  1.8919E-02  9.8693E-07
 N:                      59          59          59

 P VAL.:         8.9309E-01  9.6138E-01  9.4463E-05

 ETASHRINKSD(%)  4.9811E+01  1.1917E+01  9.9614E+01
 ETASHRINKVR(%)  7.4811E+01  2.2414E+01  9.9999E+01
 EBVSHRINKSD(%)  5.0484E+01  1.2765E+01  9.9551E+01
 EBVSHRINKVR(%)  7.5482E+01  2.3901E+01  9.9998E+01
 RELATIVEINF(%)  2.3364E+01  7.2481E+01  2.0038E-03
 EPSSHRINKSD(%)  2.0925E+01
 EPSSHRINKVR(%)  3.7471E+01

 TOTAL DATA POINTS NORMALLY DISTRIBUTED (N):          155
 N*LOG(2PI) CONSTANT TO OBJECTIVE FUNCTION:    284.87094529344853
 OBJECTIVE FUNCTION VALUE WITHOUT CONSTANT:    584.77333573670069
 OBJECTIVE FUNCTION VALUE WITH CONSTANT:       869.64428103014916
 REPORTED OBJECTIVE FUNCTION DOES NOT CONTAIN CONSTANT

 TOTAL EFFECTIVE ETAS (NIND*NETA):                           177

 #TERE:
 Elapsed estimation  time in seconds:     0.78
0R MATRIX ALGORITHMICALLY SINGULAR
0COVARIANCE MATRIX UNOBTAINABLE
0R MATRIX IS OUTPUT
0S MATRIX ALGORITHMICALLY SINGULAR
0S MATRIX IS OUTPUT
0T MATRIX - EQUAL TO RS*RMAT, WHERE S* IS A PSEUDO INVERSE OF S - IS OUTPUT
 Elapsed covariance  time in seconds:     0.79
 Elapsed postprocess time in seconds:     0.19

 ********************               FIRST ORDER CONDITIONAL ESTIMATION WITH INTERACTION              ********************
 #OBJT:**************                       MINIMUM VALUE OF OBJECTIVE FUNCTION                      ********************
 #OBJV:********************************************      584.773       **************************************************

 ********************               FIRST ORDER CONDITIONAL ESTIMATION WITH INTERACTION              ********************
 ********************                             FINAL PARAMETER ESTIMATE                           ********************

 THETA - VECTOR OF FIXED EFFECTS PARAMETERS   *********
         TH 1      TH 2      TH 3      TH 4
         4.70E-03  9.84E-01  1.57E-01  8.02E-01

 OMEGA - COV MATRIX FOR RANDOM EFFECTS - ETAS  ********
         ETA1      ETA2      ETA3
 ETA1
+        2.55E-02
 ETA2
+        0.00E+00  2.77E-02
 ETA3
+        0.00E+00  0.00E+00  3.91E-06

 SIGMA - COV MATRIX FOR RANDOM EFFECTS - EPSILONS  ****
         EPS1
 EPS1
+        1.77E-02

 OMEGA - CORR MATRIX FOR RANDOM EFFECTS - ETAS  *******
         ETA1      ETA2      ETA3
 ETA1
+        1.60E-01
 ETA2
+        0.00E+00  1.66E-01
 ETA3
+        0.00E+00  0.00E+00  1.98E-03

 SIGMA - CORR MATRIX FOR RANDOM EFFECTS - EPSILONS  ***
         EPS1
 EPS1
+        1.33E-01
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 Elapsed finaloutput time in seconds:     0.03
 #CPUT: Total CPU Time in Seconds,        1.856
