tor 17 sep 2020 15:22:36 CEST
$PROBLEM    MOXONIDINE PK,FINAL ESTIMATES,ALL DATA
;;

;;
$INPUT      ID VISI XAT2=DROP DGRP=DROP DOSE=DROP FLAG=DROP ONO=DROP
            XIME=DROP DVO=DROP NEUY SCR AGE SEX NYHA WT DROP ACE DIG
            DIU NUMB=DROP TAD TIME VIDD=DROP CRCL AMT SS II DROP
            CMT=DROP CONO=DROP DV EVID=DROP OVID=DROP DROP
;		ID,VISI,XAT2,DGRP,DOSE,FLAG,ONO,

;		XIME,DVO,NEUY,SCR,AGE,SEX,NYHA,WT,COMP,ACE,DIG,

;		DIU,NUMB,TAD,TIME,VIDD,CLCR,AMT,SS,II,VID,

;		CMT,CONO,DV,EVID,OVID
$DATA      mox_simulated.csv IGNORE=@
$SUBROUTINE ADVAN2 TRANS1
$PK

;-----------OCCASIONS----------
   VIS3               = 0
   IF(VISI.EQ.3) VIS3 = 1
   VIS8               = 0
   IF(VISI.EQ.8) VIS8 = 1

;----------IOV--------------------

   KPCL  = VIS3*ETA(4)+VIS8*ETA(5)
   KPKA  = VIS3*ETA(6)+VIS8*ETA(7)

; --------------- Remove block structure to be able fo fix variances/covariances within a block ----------------------

; ---- IIV ---

; Diagonal (Variance)
OM11   = THETA(6)
OM22   = THETA(7)

; Off-diagonal (Correlation)
COR12  = THETA(8)

; Off-diagonal (Covariance)
COV12  = SQRT(OM11*OM22)*COR12

; Random effect 1
P1     = SQRT(OM11)*ETA(1)

; Random effect 2
DP12   = COV12/SQRT(OM11)    ; = SQRT(OM22)*COR12
P2     = DP12*ETA(1) + SQRT(OM22-(DP12*DP12))*ETA(2)

;---------- PK model ------------------

   TVCL  = THETA(1)
   TVV   = THETA(2)

   CL    = TVCL*EXP(P1)*EXP(KPCL)
   V     = TVV*EXP(P2)
   KA    = THETA(3)*EXP(ETA(3)+KPKA)
   ALAG1 = THETA(4)
   K     = CL/V
   S2    = V

$ERROR

IPRED = LOG(.025)
IF(F.GT.0) IPRED = LOG(F)

W     = THETA(5)
IRES  = IPRED-DV
IWRES = IRES/W

Y     = IPRED+EPS(1)*W

$THETA  (0,26.6815) ; CL
$THETA  (0,110.275) ; V
$THETA  (0,4.49465) ; KA
$THETA  (0,0.240122) ; TLAG
$THETA  (0,0.330604) ; RUV
$THETA  (0,0.330604) ; VAR CL
$THETA  (0,0.330604) ; VAR V
$THETA  (0,0.7,1) ; CORR VAR CL-V
$OMEGA  1  FIX  ;     IIV CL
$OMEGA  1  FIX  ;      IIV V
$OMEGA  2.81618  ;     VAR KA
$OMEGA  BLOCK(1)
 0.0147009  ; IOV CL OCC1
$OMEGA  BLOCK(1) SAME
$OMEGA  BLOCK(1)
 0.506018  ; IOV KA OCC1
$OMEGA  BLOCK(1) SAME
$SIGMA  1  FIX
$ESTIMATION METHOD=BAYES INTERACTION NBURN=100 NITER=100 CTYPE=3
            PRINT=100 CITER=10 CALPHA=0.05 NOPRIOR=0
$ESTIMATION METHOD=COND MAXEVALS=100
$COVARIANCE PRINT=E UNCOND

NM-TRAN MESSAGES
 WARNINGS AND ERRORS (IF ANY) FOR PROBLEM    1
 (WARNING  2) NM-TRAN INFERS THAT THE DATA ARE POPULATION.

1NONLINEAR MIXED EFFECTS MODEL PROGRAM (NONMEM) VERSION 7.4.4
 ORIGINALLY DEVELOPED BY STUART BEAL, LEWIS SHEINER, AND ALISON BOECKMANN
 CURRENT DEVELOPERS ARE ROBERT BAUER, ICON DEVELOPMENT SOLUTIONS,
 AND ALISON BOECKMANN. IMPLEMENTATION, EFFICIENCY, AND STANDARDIZATION
 PERFORMED BY NOUS INFOSYSTEMS.
 PROBLEM NO.:         1
 MOXONIDINE PK,FINAL ESTIMATES,ALL DATA
 TOT. NO. OF OBS RECS:     1022
 TOT. NO. OF INDIVIDUALS:       74
 ONE COMPARTMENT MODEL WITH FIRST-ORDER ABSORPTION (ADVAN2)
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 #TBLN:      1
 #METH: MCMC Bayesian Analysis
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
 #TERM:
 BURN-IN WAS NOT COMPLETED
 STATISTICAL PORTION WAS COMPLETED

 TOTAL DATA POINTS NORMALLY DISTRIBUTED (N):         1022
 N*LOG(2PI) CONSTANT TO OBJECTIVE FUNCTION:    1878.3103618703510
 OBJECTIVE FUNCTION VALUE WITHOUT CONSTANT:   -2102.1914035151653
 OBJECTIVE FUNCTION VALUE WITH CONSTANT:      -223.88104164481433
 REPORTED OBJECTIVE FUNCTION DOES NOT CONTAIN CONSTANT

 TOTAL EFFECTIVE ETAS (NIND*NETA):                           518
 NIND*NETA*LOG(2PI) CONSTANT TO OBJECTIVE FUNCTION:    952.02032040004087
 OBJECTIVE FUNCTION VALUE WITHOUT CONSTANT:   -2102.1914035151653
 OBJECTIVE FUNCTION VALUE WITH CONSTANT:      -1150.1710831151245
 REPORTED OBJECTIVE FUNCTION DOES NOT CONTAIN CONSTANT


 #TERE:
 Elapsed estimation  time in seconds:     6.80
 Elapsed covariance  time in seconds:     0.00

 ********************                              MCMC BAYESIAN ANALYSIS                            ********************
 #OBJT:**************                       AVERAGE VALUE OF LIKELIHOOD FUNCTION                     ********************
 #OBJV:********************************************    -2102.191       **************************************************
 #OBJS:********************************************       94.229 (STD) **************************************************

 ********************                              MCMC BAYESIAN ANALYSIS                            ********************
 ********************                             FINAL PARAMETER ESTIMATE                           ********************

 THETA - VECTOR OF FIXED EFFECTS PARAMETERS   *********
         TH 1      TH 2      TH 3      TH 4      TH 5      TH 6      TH 7      TH 8
         2.83E+01  9.90E+01  2.06E+00  1.27E-01  3.24E-01  4.01E-01  3.92E-01  7.10E-01

 OMEGA - COV MATRIX FOR RANDOM EFFECTS - ETAS  ********
         ETA1      ETA2      ETA3      ETA4      ETA5      ETA6      ETA7
 ETA1
+        1.00E+00
 ETA2
+        0.00E+00  1.00E+00
 ETA3
+        0.00E+00  0.00E+00  5.70E-01
 ETA4
+        0.00E+00  0.00E+00  0.00E+00  1.69E-03
 ETA5
+        0.00E+00  0.00E+00  0.00E+00  0.00E+00  1.69E-03
 ETA6
+        0.00E+00  0.00E+00  0.00E+00  0.00E+00  0.00E+00  7.96E-02
 ETA7
+        0.00E+00  0.00E+00  0.00E+00  0.00E+00  0.00E+00  0.00E+00  7.96E-02

 SIGMA - COV MATRIX FOR RANDOM EFFECTS - EPSILONS  ****
         EPS1
 EPS1
+        1.00E+00

 OMEGA - CORR MATRIX FOR RANDOM EFFECTS - ETAS  *******
         ETA1      ETA2      ETA3      ETA4      ETA5      ETA6      ETA7
 ETA1
+        1.00E+00
 ETA2
+        0.00E+00  1.00E+00
 ETA3
+        0.00E+00  0.00E+00  7.48E-01
 ETA4
+        0.00E+00  0.00E+00  0.00E+00  3.98E-02
 ETA5
+        0.00E+00  0.00E+00  0.00E+00  0.00E+00  3.98E-02
 ETA6
+        0.00E+00  0.00E+00  0.00E+00  0.00E+00  0.00E+00  2.80E-01
 ETA7
+        0.00E+00  0.00E+00  0.00E+00  0.00E+00  0.00E+00  0.00E+00  2.80E-01

 SIGMA - CORR MATRIX FOR RANDOM EFFECTS - EPSILONS  ***
         EPS1
 EPS1
+        1.00E+00

 ********************                              MCMC BAYESIAN ANALYSIS                            ********************
 ********************                STANDARD ERROR OF ESTIMATE (From Sample Variance)               ********************

 THETA - VECTOR OF FIXED EFFECTS PARAMETERS   *********
         TH 1      TH 2      TH 3      TH 4      TH 5      TH 6      TH 7      TH 8
         3.76E-01  3.33E+00  1.51E-01  1.09E-02  1.03E-02  2.54E-02  3.12E-02  1.68E-02

 OMEGA - COV MATRIX FOR RANDOM EFFECTS - ETAS  ********
         ETA1      ETA2      ETA3      ETA4      ETA5      ETA6      ETA7
 ETA1
+        0.00E+00
 ETA2
+        0.00E+00  0.00E+00
 ETA3
+        0.00E+00  0.00E+00  1.45E-01
 ETA4
+        0.00E+00  0.00E+00  0.00E+00  8.24E-04
 ETA5
+        0.00E+00  0.00E+00  0.00E+00  0.00E+00  8.24E-04
 ETA6
+        0.00E+00  0.00E+00  0.00E+00  0.00E+00  0.00E+00  1.90E-02
 ETA7
+        0.00E+00  0.00E+00  0.00E+00  0.00E+00  0.00E+00  0.00E+00  1.90E-02

 SIGMA - COV MATRIX FOR RANDOM EFFECTS - EPSILONS  ****
         EPS1
 EPS1
+        0.00E+00

 OMEGA - CORR MATRIX FOR RANDOM EFFECTS - ETAS  *******
         ETA1      ETA2      ETA3      ETA4      ETA5      ETA6      ETA7
 ETA1
+        0.00E+00
 ETA2
+        0.00E+00  0.00E+00
 ETA3
+        0.00E+00  0.00E+00  9.75E-02
 ETA4
+        0.00E+00  0.00E+00  0.00E+00  1.01E-02
 ETA5
+        0.00E+00  0.00E+00  0.00E+00  0.00E+00  1.01E-02
 ETA6
+        0.00E+00  0.00E+00  0.00E+00  0.00E+00  0.00E+00  3.45E-02
 ETA7
+        0.00E+00  0.00E+00  0.00E+00  0.00E+00  0.00E+00  0.00E+00  3.45E-02

 SIGMA - CORR MATRIX FOR RANDOM EFFECTS - EPSILONS  ***
         EPS1
 EPS1
+        0.00E+00
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
 ********************                              MCMC BAYESIAN ANALYSIS                            ********************
 ********************           EIGENVALUES OF COR MATRIX OF ESTIMATE (From Sample Variance)         ********************

             1         2         3         4         5         6         7         8         9        10        11
         8.74E-02  1.30E-01  1.84E-01  2.71E-01  4.11E-01  6.18E-01  6.83E-01  1.03E+00  1.28E+00  2.05E+00  4.25E+00
 #TBLN:      2
 #METH: First Order Conditional Estimation with Interaction
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
 #TERM:
0MINIMIZATION TERMINATED
 DUE TO MAX. NO. OF FUNCTION EVALUATIONS EXCEEDED
 NO. OF FUNCTION EVALUATIONS USED:      101
 NO. OF SIG. DIGITS UNREPORTABLE

 ETABAR IS THE ARITHMETIC MEAN OF THE ETA-ESTIMATES,
 AND THE P-VALUE IS GIVEN FOR THE NULL HYPOTHESIS THAT THE TRUE MEAN IS 0.

 ETABAR:         1.7474E-02 -7.9828E-02 -1.5131E-02  1.2058E-04 -3.6022E-05 -2.4414E-03  2.1726E-03
 SE:             1.1180E-01  1.1118E-01  5.5716E-02  2.9952E-04  3.3153E-04  1.5264E-03  1.5147E-03
 N:                      74          74          74          74          74          74          74

 P VAL.:         8.7579E-01  4.7277E-01  7.8595E-01  6.8725E-01  9.1348E-01  1.0973E-01  1.5147E-01

 ETASHRINKSD(%)  3.1728E+00  3.7040E+00  2.6671E+01  8.7554E+01  8.6224E+01  8.4929E+01  8.5045E+01
 ETASHRINKVR(%)  6.2449E+00  7.2708E+00  4.6229E+01  9.8451E+01  9.8102E+01  9.7729E+01  9.7763E+01
 EBVSHRINKSD(%)  1.1280E+00  6.7270E+00  1.8820E+01  8.5759E+01  8.5107E+01  8.3474E+01  8.3674E+01
 EBVSHRINKVR(%)  2.2432E+00  1.3001E+01  3.4098E+01  9.7972E+01  9.7782E+01  9.7269E+01  9.7335E+01
 EPSSHRINKSD(%)  9.2162E+00
 EPSSHRINKVR(%)  1.7583E+01


 TOTAL DATA POINTS NORMALLY DISTRIBUTED (N):         1022
 N*LOG(2PI) CONSTANT TO OBJECTIVE FUNCTION:    1878.3103618703510
 OBJECTIVE FUNCTION VALUE WITHOUT CONSTANT:   -624.94834882340069
 OBJECTIVE FUNCTION VALUE WITH CONSTANT:       1253.3620130469503
 REPORTED OBJECTIVE FUNCTION DOES NOT CONTAIN CONSTANT

 TOTAL EFFECTIVE ETAS (NIND*NETA):                           510


 #TERE:
 Elapsed estimation  time in seconds:     1.08
 Elapsed covariance  time in seconds:     4.67
 Elapsed postprocess time in seconds:     0.00

 ********************               FIRST ORDER CONDITIONAL ESTIMATION WITH INTERACTION              ********************
 #OBJT:**************                       MINIMUM VALUE OF OBJECTIVE FUNCTION                      ********************
 #OBJV:********************************************     -624.948       **************************************************

 ********************               FIRST ORDER CONDITIONAL ESTIMATION WITH INTERACTION              ********************
 ********************                             FINAL PARAMETER ESTIMATE                           ********************

 THETA - VECTOR OF FIXED EFFECTS PARAMETERS   *********
         TH 1      TH 2      TH 3      TH 4      TH 5      TH 6      TH 7      TH 8
         3.26E+01  1.16E+02  1.59E+00  1.24E-01  3.31E-01  4.40E-01  5.64E-01  8.13E-01

 OMEGA - COV MATRIX FOR RANDOM EFFECTS - ETAS  ********
         ETA1      ETA2      ETA3      ETA4      ETA5      ETA6      ETA7
 ETA1
+        1.00E+00
 ETA2
+        0.00E+00  1.00E+00
 ETA3
+        0.00E+00  0.00E+00  4.33E-01
 ETA4
+        0.00E+00  0.00E+00  0.00E+00  4.34E-04
 ETA5
+        0.00E+00  0.00E+00  0.00E+00  0.00E+00  4.34E-04
 ETA6
+        0.00E+00  0.00E+00  0.00E+00  0.00E+00  0.00E+00  7.69E-03
 ETA7
+        0.00E+00  0.00E+00  0.00E+00  0.00E+00  0.00E+00  0.00E+00  7.69E-03

 SIGMA - COV MATRIX FOR RANDOM EFFECTS - EPSILONS  ****
         EPS1
 EPS1
+        1.00E+00

 OMEGA - CORR MATRIX FOR RANDOM EFFECTS - ETAS  *******
         ETA1      ETA2      ETA3      ETA4      ETA5      ETA6      ETA7
 ETA1
+        1.00E+00
 ETA2
+        0.00E+00  1.00E+00
 ETA3
+        0.00E+00  0.00E+00  6.58E-01
 ETA4
+        0.00E+00  0.00E+00  0.00E+00  2.08E-02
 ETA5
+        0.00E+00  0.00E+00  0.00E+00  0.00E+00  2.08E-02
 ETA6
+        0.00E+00  0.00E+00  0.00E+00  0.00E+00  0.00E+00  8.77E-02
 ETA7
+        0.00E+00  0.00E+00  0.00E+00  0.00E+00  0.00E+00  0.00E+00  8.77E-02

 SIGMA - CORR MATRIX FOR RANDOM EFFECTS - EPSILONS  ***
         EPS1
 EPS1
+        1.00E+00

 ********************               FIRST ORDER CONDITIONAL ESTIMATION WITH INTERACTION              ********************
 ********************                            STANDARD ERROR OF ESTIMATE                          ********************

 THETA - VECTOR OF FIXED EFFECTS PARAMETERS   *********
         TH 1      TH 2      TH 3      TH 4      TH 5      TH 6      TH 7      TH 8
         2.52E+00  1.08E+01  1.59E-01  1.38E-02  8.54E-03  7.51E-02  1.24E-01  4.66E-02

 OMEGA - COV MATRIX FOR RANDOM EFFECTS - ETAS  ********
         ETA1      ETA2      ETA3      ETA4      ETA5      ETA6      ETA7
 ETA1
+       .........
 ETA2
+       ......... .........
 ETA3
+       ......... .........  1.48E-01
 ETA4
+       ......... ......... .........  2.70E-04
 ETA5
+       ......... ......... ......... ......... .........
 ETA6
+       ......... ......... ......... ......... .........  6.27E-03
 ETA7
+       ......... ......... ......... ......... ......... ......... .........

 SIGMA - COV MATRIX FOR RANDOM EFFECTS - EPSILONS  ****
         EPS1
 EPS1
+       .........

 OMEGA - CORR MATRIX FOR RANDOM EFFECTS - ETAS  *******
         ETA1      ETA2      ETA3      ETA4      ETA5      ETA6      ETA7
 ETA1
+       .........
 ETA2
+       ......... .........
 ETA3
+       ......... .........  1.12E-01
 ETA4
+       ......... ......... .........  6.48E-03
 ETA5
+       ......... ......... ......... ......... .........
 ETA6
+       ......... ......... ......... ......... .........  3.58E-02
 ETA7
+       ......... ......... ......... ......... ......... ......... .........

 SIGMA - CORR MATRIX FOR RANDOM EFFECTS - EPSILONS  ***
         EPS1
 EPS1
+       .........
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
 ********************               FIRST ORDER CONDITIONAL ESTIMATION WITH INTERACTION              ********************
 ********************                      EIGENVALUES OF COR MATRIX OF ESTIMATE                     ********************

             1         2         3         4         5         6         7         8         9        10        11
         1.42E-01  1.62E-01  3.30E-01  4.45E-01  5.82E-01  8.51E-01  1.07E+00  1.20E+00  1.68E+00  1.89E+00  2.65E+00
 Elapsed finaloutput time in seconds:     0.01
 #CPUT: Total CPU Time in Seconds,       12.619
