tis 15 sep 2020 12:14:13 CEST
$PROBLEM    PHENOBARB SIMPLE MODEL
$INPUT      ID TIME AMT WGT APGR DV CV1 CV2 CV3 CVD1 CVD2 CVD3
$DATA      pheno_ch.csv IGNORE=@
$SUBROUTINE ADVAN1 TRANS2
$PK

      TVCL  = THETA(1)
      CL    = TVCL*EXP(ETA(1))

      TVV   = THETA(2)
      V     = TVV*EXP(ETA(2))

      S1    = V
$ERROR

      W     = THETA(3)
      Y     = F+W*EPS(1)

      IPRED = F          ;  individual-specific prediction
      IRES  = DV-IPRED   ;  individual-specific residual
      IWRES = IRES/W     ;  individual-specific weighted residual

$THETA  (0,0.0105)
$THETA  (0,1.0500)
$THETA  (0,0.4)
$OMEGA  .4
 .25
$SIGMA  1  FIX
$SIMULATION NSUB=2 (12345) ONLYSIM

NM-TRAN MESSAGES
 WARNINGS AND ERRORS (IF ANY) FOR PROBLEM    1
 (WARNING  2) NM-TRAN INFERS THAT THE DATA ARE POPULATION.

1NONLINEAR MIXED EFFECTS MODEL PROGRAM (NONMEM) VERSION 7.4.4
 ORIGINALLY DEVELOPED BY STUART BEAL, LEWIS SHEINER, AND ALISON BOECKMANN
 CURRENT DEVELOPERS ARE ROBERT BAUER, ICON DEVELOPMENT SOLUTIONS,
 AND ALISON BOECKMANN. IMPLEMENTATION, EFFICIENCY, AND STANDARDIZATION
 PERFORMED BY NOUS INFOSYSTEMS.
 PROBLEM NO.:         1
 PHENOBARB SIMPLE MODEL
 TOT. NO. OF OBS RECS:      155
 TOT. NO. OF INDIVIDUALS:       59
 ONE COMPARTMENT MODEL (ADVAN1)
 PROBLEM NO.:           1      SUBPROBLEM NO.:           1
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 SIMULATION STEP PERFORMED
 Elapsed simulation  time in seconds:     0.00
 Elapsed finaloutput time in seconds:     0.00
 PROBLEM NO.:           1      SUBPROBLEM NO.:           2
 SIMULATION STEP PERFORMED
 Elapsed simulation  time in seconds:     0.00
 Elapsed finaloutput time in seconds:     0.00
 #CPUT: Total CPU Time in Seconds,        0.009
