Wed Nov 25 14:38:41 CET 2015
; Script generated by the pharmML2Nmtran Converter v.0.3.0
; Source	: PharmML 0.6.1
; Target	: NMTRAN 7.3.0
; Model 	: UseCase7
; Dated 	: Sun Nov 22 16:59:33 CET 2015
$PROBLEM    "generated by MDL2PharmML v.6.0"
$INPUT      ID TIME=TIME WT=DROP AMT CMT DVID DV MDV LOGTWT
$DATA      warfarin_conc_cmt.csv IGNORE=@
$SUBROUTINE ADVAN13 TOL=6
$MODEL      COMP (COMP1) ;AD1
            COMP (COMP2) ;CENTRAL
$PK
POP_CL = THETA(1)
POP_V = THETA(2)
POP_KA = THETA(3)
POP_TLAG = THETA(4)
RUV_PROP = THETA(5)
RUV_ADD = THETA(6)
BETA_CL_WT = THETA(7)
BETA_V_WT = THETA(8)
POP_F1 = THETA(9)

ETA_CL =  ETA(1)
ETA_V =  ETA(2)
ETA_KA =  ETA(3)
ETA_TLAG =  ETA(4)

MU_1 = LOG(POP_CL) + BETA_CL_WT * LOGTWT
CL =  EXP(MU_1 +  ETA(1)) ;

MU_2 = LOG(POP_V) + BETA_V_WT * LOGTWT
V =  EXP(MU_2 +  ETA(2)) ;

MU_3 = LOG(POP_KA)
KA =  EXP(MU_3 +  ETA(3)) ;

MU_4 = LOG(POP_TLAG)
TLAG =  EXP(MU_4 +  ETA(4)) ;

NM_F1 = POP_F1

ALAG1 = TLAG
F1 = NM_F1

A_0(1) = 0.0
A_0(2) = 0.0

$DES
AD1_DES = A(1)
CENTRAL_DES = A(2)
CONC_DES = (CENTRAL_DES/V)
DADT(1) = -((KA*AD1_DES))
DADT(2) = ((KA*AD1_DES)-((CL/V)*CENTRAL_DES))

$ERROR
AD1 = A(1)
CENTRAL = A(2)
CONC = (CENTRAL/V)
IPRED = CONC
W = RUV_ADD+RUV_PROP*IPRED
Y = IPRED+W*EPS(1)
IRES = DV - IPRED
IWRES = IRES/W

$THETA  (0.001,0.1) ; POP_CL
 (0.001,8.0) ; POP_V
 (0.001,0.362) ; POP_KA
 (0.001,1.0,10.0) ; POP_TLAG
 (0.0,0.1) ; RUV_PROP
 (0.0,0.1) ; RUV_ADD
 0.75 FIX ; BETA_CL_WT
 1.0 FIX ; BETA_V_WT
 1.0 FIX ; POP_F1
$OMEGA  BLOCK(2) STANDARD CORRELATION
 0.1  ;     PPV_CL
 0.01  ; PPV_CL_PPV_V
 0.1  ;      PPV_V
$OMEGA  0.1  STANDARD  ;     PPV_KA
 0.1  FIX  STANDARD  ;   PPV_TLAG
$SIGMA  1.0  FIX
$ESTIMATION METHOD=SAEM AUTO=1 PRINT=100 CINTERVAL=30 ATOL=6 SIGL=6
$TABLE      ID TIME AMT CMT DVID MDV LOGTWT PRED IPRED RES IRES WRES
            IWRES Y DV NOAPPEND NOPRINT FILE=sdtab
$TABLE      ID CL V KA TLAG NM_F1 ETA_CL ETA_V ETA_KA ETA_TLAG
            NOAPPEND NOPRINT FILE=patab
$TABLE      ID LOGTWT NOAPPEND NOPRINT FILE=cotab

NM-TRAN MESSAGES
 WARNINGS AND ERRORS (IF ANY) FOR PROBLEM    1
 (WARNING  2) NM-TRAN INFERS THAT THE DATA ARE POPULATION.
 (WARNING  121) INTERACTION IS IMPLIED WITH EM/BAYES ESTIMATION METHODS
 (MU_WARNING 26) DATA ITEM(S) USED IN DEFINITION OF MU_(S) SHOULD BE CONSTANT FOR INDIV. REC.:
  LOGTWT
Note: The following floating-point exceptions are signalling: IEEE_INVALID_FLAG IEEE_DIVIDE_BY_ZERO

1NONLINEAR MIXED EFFECTS MODEL PROGRAM (NONMEM) VERSION 7.3.0
 ORIGINALLY DEVELOPED BY STUART BEAL, LEWIS SHEINER, AND ALISON BOECKMANN
 CURRENT DEVELOPERS ARE ROBERT BAUER, ICON DEVELOPMENT SOLUTIONS,
 AND ALISON BOECKMANN. IMPLEMENTATION, EFFICIENCY, AND STANDARDIZATION
 PERFORMED BY NOUS INFOSYSTEMS.
 PROBLEM NO.:         1
 "generated by MDL2PharmML v.6.0"
 TOT. NO. OF OBS RECS:      250
 TOT. NO. OF INDIVIDUALS:     32
 GENERAL NONLINEAR KINETICS MODEL USING LSODA (ADVAN13)
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 #TBLN:      1
 #METH: Stochastic Approximation Expectation-Maximization (No Prior)
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
 #TERM:
 STOCHASTIC PORTION WAS COMPLETED
 REDUCED STOCHASTIC PORTION WAS COMPLETED

 ETABAR IS THE ARITHMETIC MEAN OF THE ETA-ESTIMATES,
 AND THE P-VALUE IS GIVEN FOR THE NULL HYPOTHESIS THAT THE TRUE MEAN IS 0.

 ETABAR:        -3.6226E-06  1.0291E-06  6.3824E-06  1.2823E-06
 SE:             3.6407E-02  2.0997E-02  7.6918E-02  1.5280E-02
 N:                      32          32          32          32

 P VAL.:         9.9992E-01  9.9996E-01  9.9993E-01  9.9993E-01

 ETAshrink(%):   9.0067E+00  1.5526E+01  4.7506E+01  1.2182E+01
 EBVshrink(%):   9.0057E+00  1.5538E+01  4.7502E+01  6.4241E+01
 EPSshrink(%):   1.3572E+01

 #TERE:
 Elapsed estimation time in seconds:   380.56

 ********************           STOCHASTIC APPROXIMATION EXPECTATION-MAXIMIZATION (NO PRIOR)         ********************
 #OBJT:**************                        FINAL VALUE OF LIKELIHOOD FUNCTION                      ********************
 #OBJV:********************************************     -261.507       **************************************************

 ********************           STOCHASTIC APPROXIMATION EXPECTATION-MAXIMIZATION (NO PRIOR)         ********************
 ********************                             FINAL PARAMETER ESTIMATE                           ********************

 THETA - VECTOR OF FIXED EFFECTS PARAMETERS   *********
         TH 1      TH 2      TH 3      TH 4      TH 5      TH 6      TH 7      TH 8      TH 9
         1.29E-01  8.16E+00  1.87E+00  9.72E-01  1.08E-01  0.00E+00  7.50E-01  1.00E+00  1.00E+00

 OMEGA - COV MATRIX FOR RANDOM EFFECTS - ETAS  ********
            ETA1      ETA2      ETA3      ETA4
 ETA1
+        5.29E-02
 ETA2
+        9.89E-03  2.04E-02
 ETA3
+        0.00E+00  0.00E+00  7.09E-01
 ETA4
+        0.00E+00  0.00E+00  0.00E+00  1.00E-02

 SIGMA - COV MATRIX FOR RANDOM EFFECTS - EPSILONS  ****
            EPS1
 EPS1
+        1.00E+00

 OMEGA - CORR MATRIX FOR RANDOM EFFECTS - ETAS  *******
            ETA1      ETA2      ETA3      ETA4
 ETA1
+        2.30E-01
 ETA2
+        3.01E-01  1.43E-01
 ETA3
+        0.00E+00  0.00E+00  8.42E-01
 ETA4
+        0.00E+00  0.00E+00  0.00E+00  1.00E-01

 SIGMA - CORR MATRIX FOR RANDOM EFFECTS - EPSILONS  ***
            EPS1
 EPS1
+        1.00E+00

0PROGRAM TERMINATED BY FNLETA
 ERROR IN CELS   WITH INDIVIDUAL       1   ID= 1.00000000000000E+00
 SUM OF "SQUARED" WEIGHTED INDIVIDUAL RESIDUALS IS INFINITE
 MESSAGE ISSUED FROM TABLE STEP
 #CPUT: Total CPU Time in Seconds,      380.272
