Fri May 24 16:32:05 CEST 2013
;Model Desc: Receptor Mediated Clearance model with Dynamic Change in Receptors
;Project Name: nm7examples
;Project ID: NO PROJECT DESCRIPTION
$SIZES      LIM6=600
$PROBLEM    RUN# example6 (from r2compl)
$INPUT      C SET ID JID TIME DV=CONC DOSE=AMT RATE EVID MDV CMT
$DATA       example6b.csv IGNORE=C
; The new numerical integration solver is used, although ADVAN=9 is also efficient

; for this problem.
$SUBROUTINE ADVAN13 TRANS1 TOL=4
$PRIOR      NWPRI NTHETA=8,NETA=8,NTHP=0,NETP=8,NEPS=2,NEPP=2,NPEXP=1
$MODEL      NCOMPARTMENTS=3
$PK

MU_1=THETA(1)
MU_2=THETA(2)
MU_3=THETA(3)
MU_4=THETA(4)
MU_5=THETA(5)
MU_6=THETA(6)
MU_7=THETA(7)
MU_8=THETA(8)
VC=EXP(MU_1+ETA(1))
K10=EXP(MU_2+ETA(2))
K12=EXP(MU_3+ETA(3))
K21=EXP(MU_4+ETA(4))
VM=EXP(MU_5+ETA(5))
KMC=EXP(MU_6+ETA(6))
K03=EXP(MU_7+ETA(7))
K30=EXP(MU_8+ETA(8))
S3=VC
S1=VC
KM=KMC*S1
F3=K03/K30

$DES

DADT(1) = -(K10+K12)*A(1) + K21*A(2) - VM*A(1)*A(3)/(A(1)+KM)
DADT(2) = K12*A(1) - K21*A(2)
DADT(3) =  -VM*A(1)*A(3)/(A(1)+KM) - K30*A(3) + K03

$ERROR

CALLFL=0
ETYPE=1
IF(CMT.NE.1) ETYPE=0
IPRED=F
Y = F + F*ETYPE*EPS(1) + F*(1.0-ETYPE)*EPS(2)

$THETA  4.0 ; [MU_1]
 -2.1 ; [MU_2]
 0.7 ; [MU_3]
 -0.17 ; [MU_4]
 2.2 ; [MU_5]
 0.14 ; [MU_6]
 3.7 ; [MU_7]
 -0.7 ; [MU_8]
 8 FIX ; [dfo]
;Initial Thetas
; degrees of freedom for OMEGA prior
;Initial Omegas
$THETA  1 FIX
 1 FIX
; Starting with a short iterative two stage analysis brings the results closer
; so less time needs to be spent during the burn-in of the BAYES analysis
$OMEGA  BLOCK(8)
 0.2  ;        [p]
 -0.0043  ;        [f]
 0.2  ;        [p]
 0.0048  ;        [f]
 -0.0023  ;        [f]
 0.2  ;        [p]
 0.0032  ;        [f]
 0.0059  ;        [f]
 -0.0014  ;        [f]
 0.2  ;        [p]
 0.0029  ;        [f]
 0.002703  ;        [f]
 -0.00026  ;        [f]
 -0.0032  ;        [f]
 0.2  ;        [p]
 -0.0025  ;        [f]
 0.00097  ;        [f]
 0.0024  ;        [f]
 0.00197  ;        [f]
 -0.0080  ;        [f]
 0.2  ;        [p]
 0.0031  ;        [f]
 -0.00571  ;        [f]
 0.0030  ;        [f]
 -0.0074  ;        [f]
 0.0025  ;        [f]
 0.0034  ;        [f]
 0.2  ;        [p]
 0.00973  ;        [f]
 0.00862  ;        [f]
 0.0041  ;        [f]
 0.0046  ;        [f]
 0.00061  ;        [f]
 -0.0056  ;        [f]
 0.0056  ;        [f]
 0.2  ;        [p]
; Omega prior
$OMEGA  BLOCK(8) FIX
 0.2
 0.0 0.2
 0.0 0.0 0.2
 0.0 0.0 0.0 0.2
 0.0 0.0 0.0 0.0 0.2
 0.0 0.0 0.0 0.0 0.0 0.2
 0.0 0.0 0.0 0.0 0.0 0.0 0.2
 0.0 0.0 0.0 0.0 0.0 0.0 0.0 0.2
$SIGMA  0.1
 0.1
$SIGMA  0.01  FIX
 0.0224  FIX
$ESTIMATION METHOD=ITS INTERACTION SIGL=4 NITER=25 PRINT=1
            FILE=psn.ext NOABORT NOPRIOR=1
;$EST METHOD=IMP INTERACTION SIGL=4 NITER=15 PRINT=1 FILE=example6.ext NOABORT NOPRIOR=1

;$EST METHOD=BAYES INTERACTION NBURN=4000 SIGL=4 NITER=500 PRINT=10 CTYPE=3

;     FILE=example6.txt NOABORT NOPRIOR=0

; By default, ISAMPLE_M* are 2.  Since there are many data points per subject,

; setting these to 1 is enough, and it reduces the time of the analysis
            ISAMPLE_M1=1 ISAMPLE_M2=1 ISAMPLE_M3=1 IACCEPT=0.4
;$COV MATRIX=R UNCONDITIONAL
$TABLE      ID TIME CONC IPRED CMT MDV EVID NOAPPEND NOPRINT
            FILE=example6b.fin FORMAT=,1PE12.5 ONEHEADER

NM-TRAN MESSAGES
 WARNINGS AND ERRORS (IF ANY) FOR PROBLEM    1
 (WARNING  2) NM-TRAN INFERS THAT THE DATA ARE POPULATION.

1NONLINEAR MIXED EFFECTS MODEL PROGRAM (NONMEM) VERSION 7.3 (Beta Version a6.5)
 ORIGINALLY DEVELOPED BY STUART BEAL, LEWIS SHEINER, AND ALISON BOECKMANN
 CURRENT DEVELOPERS ARE ROBERT BAUER, ICON DEVELOPMENT SOLUTIONS,
 AND ALISON BOECKMANN. IMPLEMENTATION, EFFICIENCY, AND STANDARDIZATION
 PERFORMED BY NOUS INFOSYSTEMS.
 PROBLEM NO.:         1
 RUN# example6 (from r2compl)
 TOT. NO. OF OBS RECS:     1568
 TOT. NO. OF INDIVIDUALS:     50
 GENERAL NONLINEAR KINETICS MODEL USING LSODA (ADVAN13)
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 #TBLN:      1
 #METH: Iterative Two Stage (No Prior)
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
 #TERM:
 OPTIMIZATION WAS NOT TESTED FOR CONVERGENCE


 ETABAR IS THE ARITHMETIC MEAN OF THE ETA-ESTIMATES,
 AND THE P-VALUE IS GIVEN FOR THE NULL HYPOTHESIS THAT THE TRUE MEAN IS 0.

 ETABAR:         6.1270E-05 -9.4842E-04 -7.2249E-05  7.2577E-06  1.3327E-04  2.7557E-04  1.5470E-04  1.5785E-04
 SE:             6.9329E-02  5.5212E-02  3.8772E-02  6.5408E-02  5.6824E-02  5.7660E-02  6.4496E-02  6.1447E-02

 P VAL.:         9.9929E-01  9.8629E-01  9.9851E-01  9.9991E-01  9.9813E-01  9.9619E-01  9.9809E-01  9.9795E-01

 ETAshrink(%):   6.3623E-01  4.5490E+00  9.5378E+00  2.1243E+00  1.5371E+00  6.0355E+00  4.0732E-01  1.7659E+00
 EPSshrink(%):   1.5539E+01  6.8462E+00

 #TERE:
 Elapsed estimation time in seconds:   811.39

 ********************                          ITERATIVE TWO STAGE (NO PRIOR)                        ********************
 #OBJT:**************                        FINAL VALUE OF OBJECTIVE FUNCTION                       ********************
 #OBJV:********************************************    -4711.406       **************************************************

 ********************                          ITERATIVE TWO STAGE (NO PRIOR)                        ********************
 ********************                             FINAL PARAMETER ESTIMATE                           ********************

 THETA - VECTOR OF FIXED EFFECTS PARAMETERS   *********
         TH 1      TH 2      TH 3      TH 4      TH 5      TH 6      TH 7      TH 8
         3.91E+00 -2.21E+00  5.62E-01 -1.84E-01  2.27E+00  2.18E-01  3.71E+00 -7.04E-01

 OMEGA - COV MATRIX FOR RANDOM EFFECTS - ETAS  ********
            ETA1      ETA2      ETA3      ETA4      ETA5      ETA6      ETA7      ETA8
 ETA1
+        2.48E-01
 ETA2
+       -3.87E-02  1.71E-01
 ETA3
+        4.74E-02 -1.74E-02  9.37E-02
 ETA4
+        3.17E-02  5.30E-02 -1.54E-02  2.28E-01
 ETA5
+        2.81E-02  2.64E-02 -1.45E-03 -3.27E-02  1.70E-01
 ETA6
+       -2.61E-02  1.09E-02  2.44E-02  1.75E-02 -7.94E-02  1.92E-01
 ETA7
+        3.03E-02 -4.30E-02  3.14E-02 -7.30E-02  2.44E-02  3.39E-03  2.14E-01
 ETA8
+        9.72E-02  8.43E-02  4.09E-02  4.66E-02  1.50E-03 -5.48E-02  5.54E-02  2.00E-01

 SIGMA - COV MATRIX FOR RANDOM EFFECTS - EPSILONS  ****
            EPS1      EPS2
 EPS1
+        9.22E-03
 EPS2
+        0.00E+00  2.22E-02

 OMEGA - CORR MATRIX FOR RANDOM EFFECTS - ETAS  *******
            ETA1      ETA2      ETA3      ETA4      ETA5      ETA6      ETA7      ETA8
 ETA1
+        4.98E-01
 ETA2
+       -1.88E-01  4.13E-01
 ETA3
+        3.11E-01 -1.37E-01  3.06E-01
 ETA4
+        1.33E-01  2.69E-01 -1.05E-01  4.77E-01
 ETA5
+        1.37E-01  1.55E-01 -1.15E-02 -1.66E-01  4.12E-01
 ETA6
+       -1.19E-01  6.01E-02  1.82E-01  8.35E-02 -4.39E-01  4.38E-01
 ETA7
+        1.31E-01 -2.25E-01  2.21E-01 -3.31E-01  1.28E-01  1.67E-02  4.63E-01
 ETA8
+        4.37E-01  4.57E-01  2.99E-01  2.18E-01  8.13E-03 -2.80E-01  2.68E-01  4.47E-01

 SIGMA - CORR MATRIX FOR RANDOM EFFECTS - EPSILONS  ***
            EPS1      EPS2
 EPS1
+        9.60E-02
 EPS2
+        0.00E+00  1.49E-01
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