Fri Sep 23 11:59:16 CEST 2016
$PROBLEM    + COVAR KM-VMAX
$ABBREVIATED DERIV2=NOCOMMON
$INPUT      ID TIME TADO DGRP DV BQL AMT EVID OCC PLOT AGE SEX RACE WT
            HT BMI HIV FFM NDV DOSE
$DATA      ../../m1/bs_pr1_157.dta IGNORE=@
$SUBROUTINE ADVAN13 TRANS1 TOL=10
$MODEL      NCOMP=3 COMP=(DEPOT,DEFDOSE) COMP=(CENTRAL,DEFOBS)
            COMP=(ENZ)
$PK
"FIRST
"  COMMON/PRCOMG/  IDUM1,IDUM2,IMAX,IDUM4,IDUM5
"  INTEGER IDUM1,IDUM2,IMAX,IDUM4,IDUM5
"  IMAX=1000000000

IF(AMT.GT.0)PD     = AMT          ; PD   = oral DOSE
IF(AMT.GT.0)TDOS   = TIME         ; TDOS = time of DOSE
DUMMY

$ERROR
IPRED   = LOG(A(2)/S2+0.00001)
DUMMY

$THETA  (0,525) ; 1 VMAX
$THETA  (0,35.3) ; 2 KM
$THETA  (0,87.2) ; 3 V2
$THETA  (0,1.77) ; 4 KA
$THETA  (0,1.16,1.25) ; 5 EMAX
$THETA  (0,0.0699) ; 6 EC50
$THETA  (0.005,0.00603) ; 7 KENZ
$THETA  (0,0.513) ; 8 MTT
$THETA  (1,23.8) ; 9 NN
$THETA  (0,0.504) ; 10 FEMAX
$THETA  (0,67) ; 11 FED50
$OMEGA  BLOCK(2)
 0.128  ; 1 IIV in KM
 0.0418 0.0901  ; 2 IIV IN VMAX
$OMEGA  0.00618  ; 3 IIV in V2
$OMEGA  0.146  ; 4 IIV in MTT
$OMEGA  0.607  ; 5 IIV in NN
$OMEGA  0.114  ; 6 IIV in KA
$OMEGA  BLOCK(1)
 0.0248  ; 7 IOV in F
$OMEGA  BLOCK(1) SAME
$OMEGA  BLOCK(1)
 0.318  ; 9 IOV in MTT
$OMEGA  BLOCK(1) SAME
$OMEGA  BLOCK(1)
 0.0355  ; 11 IOV in KM
$OMEGA  BLOCK(1) SAME
$OMEGA  BLOCK(1)
 0.0985  ; 13 IOV in KA
$OMEGA  BLOCK(1) SAME
$SIGMA  0.0555  ;  ADD ERROR
;Sim_start
$ESTIMATION METHOD=1 LAPLACIAN INTER NUMERICAL SLOW MAXEVAL=9999
            NSIG=3 SIGL=9 PRINT=3 MCETA=100 MSFO=psn_msfo
$COVARIANCE PRINT=E MATRIX=S SLOW
;$SIMULATION (1234) ONLYSIM

;Sim_end

NM-TRAN MESSAGES
 WARNINGS AND ERRORS (IF ANY) FOR PROBLEM    1
 (WARNING  2) NM-TRAN INFERS THAT THE DATA ARE POPULATION.
 (WARNING  113) VERBATIM CODE CONTAINS "COMMON". IF THIS IS NOT A
 USER-DEFINED COMMON, IT SHOULD BE REPLACED BY THE APPROPRIATE MODULE.

1NONLINEAR MIXED EFFECTS MODEL PROGRAM (NONMEM) VERSION 7.3.0
 ORIGINALLY DEVELOPED BY STUART BEAL, LEWIS SHEINER, AND ALISON BOECKMANN
 CURRENT DEVELOPERS ARE ROBERT BAUER, ICON DEVELOPMENT SOLUTIONS,
 AND ALISON BOECKMANN. IMPLEMENTATION, EFFICIENCY, AND STANDARDIZATION
 PERFORMED BY NOUS INFOSYSTEMS.
 PROBLEM NO.:         1
 + COVAR KM-VMAX
 TOT. NO. OF OBS RECS:     1803
 TOT. NO. OF INDIVIDUALS:     83
 GENERAL NONLINEAR KINETICS MODEL USING LSODA (ADVAN13)
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 #TBLN:      1
 #METH: Laplacian Conditional Estimation with Interaction
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
 #TERM:
0MINIMIZATION SUCCESSFUL
 HOWEVER, PROBLEMS OCCURRED WITH THE MINIMIZATION.
 REGARD THE RESULTS OF THE ESTIMATION STEP CAREFULLY, AND ACCEPT THEM ONLY
 AFTER CHECKING THAT THE COVARIANCE STEP PRODUCES REASONABLE OUTPUT.
 NO. OF FUNCTION EVALUATIONS USED:       62
 NO. OF SIG. DIGITS IN FINAL EST.:  3.1

 ETABAR IS THE ARITHMETIC MEAN OF THE ETA-ESTIMATES,
 AND THE P-VALUE IS GIVEN FOR THE NULL HYPOTHESIS THAT THE TRUE MEAN IS 0.

 ETABAR:         5.0143E-02 -9.4593E-02  7.0277E-03  9.8932E-02  1.6278E-02 -6.7455E-02  6.4984E-02 -5.8951E-02  1.0320E-01  1.1491E-01
                 7.8162E-02 -5.3466E-02  1.8161E-02 -7.6118E-02
 SE:             2.3782E-02  1.3837E-02  4.7468E-03  2.7650E-02  5.8752E-02  2.4116E-02  1.0531E-02  1.3329E-02  5.1827E-02  4.3513E-02
                 1.1486E-02  1.0607E-02  1.5681E-02  1.7896E-02
 N:                      83          83          83          83          83          83          83          83          83          83
                         83          83          83          83

 P VAL.:         3.4994E-02  8.1754E-12  1.3873E-01  3.4625E-04  7.8173E-01  5.1556E-03  6.8190E-10  9.7511E-06  4.6448E-02  8.2729E-03
                 1.0175E-11  4.6502E-07  2.4679E-01  2.1075E-05

 ETAshrink(%):   3.9737E+01  5.5124E+01  4.3564E+01  3.3676E+01  3.0325E+01  3.4879E+01  3.8156E+01  2.1724E+01  1.6271E+01  2.9704E+01
                 4.4234E+01  4.8502E+01  5.4318E+01  4.7864E+01
 EBVshrink(%):   3.6501E+01  3.6538E+01  5.3119E+01  3.3266E+01  4.0104E+01  3.7548E+01  2.0563E+01  2.2176E+01  1.6328E+01  1.5847E+01
                 3.3517E+01  3.3526E+01  4.9502E+01  4.9855E+01
 EPSshrink(%):   2.3471E+01

 #TERE:
 Elapsed estimation time in seconds:    95344
0PROGRAM TERMINATED BY OBJ
 ERROR IN NCONTR WITH INDIVIDUAL      64   ID= 6.40000000000000E+01
 NUMERICAL HESSIAN OF OBJ. FUNC. FOR COMPUTING CONDITIONAL ESTIMATE
 IS NON POSITIVE DEFINITE
0S MATRIX ALGORITHMICALLY SINGULAR
0COVARIANCE MATRIX UNOBTAINABLE
 Elapsed covariance time in seconds:  4178.54

 ********************                LAPLACIAN CONDITIONAL ESTIMATION WITH INTERACTION               ********************
 #OBJT:**************                       MINIMUM VALUE OF OBJECTIVE FUNCTION                      ********************
 #OBJV:********************************************    -1178.223       **************************************************

 ********************                LAPLACIAN CONDITIONAL ESTIMATION WITH INTERACTION               ********************
 ********************                             FINAL PARAMETER ESTIMATE                           ********************

 THETA - VECTOR OF FIXED EFFECTS PARAMETERS   *********
         TH 1      TH 2      TH 3      TH 4      TH 5      TH 6      TH 7      TH 8      TH 9      TH10      TH11
         5.29E+02  3.45E+01  8.57E+01  1.78E+00  1.16E+00  7.11E-02  6.06E-03  5.10E-01  2.40E+01  4.96E-01  6.64E+01

 OMEGA - COV MATRIX FOR RANDOM EFFECTS - ETAS  ********
            ETA1      ETA2      ETA3      ETA4      ETA5      ETA6      ETA7      ETA8      ETA9      ET10      ET11      ET12
             ET13      ET14
 ETA1
+        1.31E-01
 ETA2
+        2.83E-02  7.99E-02
 ETA3
+        0.00E+00  0.00E+00  5.94E-03
 ETA4
+        0.00E+00  0.00E+00  0.00E+00  1.46E-01
 ETA5
+        0.00E+00  0.00E+00  0.00E+00  0.00E+00  5.97E-01
 ETA6
+        0.00E+00  0.00E+00  0.00E+00  0.00E+00  0.00E+00  1.15E-01
 ETA7
+        0.00E+00  0.00E+00  0.00E+00  0.00E+00  0.00E+00  0.00E+00  2.44E-02
 ETA8
+        0.00E+00  0.00E+00  0.00E+00  0.00E+00  0.00E+00  0.00E+00  0.00E+00  2.44E-02
 ETA9
+        0.00E+00  0.00E+00  0.00E+00  0.00E+00  0.00E+00  0.00E+00  0.00E+00  0.00E+00  3.22E-01
 ET10
+        0.00E+00  0.00E+00  0.00E+00  0.00E+00  0.00E+00  0.00E+00  0.00E+00  0.00E+00  0.00E+00  3.22E-01
 ET11
+        0.00E+00  0.00E+00  0.00E+00  0.00E+00  0.00E+00  0.00E+00  0.00E+00  0.00E+00  0.00E+00  0.00E+00  3.56E-02
 ET12
+        0.00E+00  0.00E+00  0.00E+00  0.00E+00  0.00E+00  0.00E+00  0.00E+00  0.00E+00  0.00E+00  0.00E+00  0.00E+00  3.56E-02
 ET13
+        0.00E+00  0.00E+00  0.00E+00  0.00E+00  0.00E+00  0.00E+00  0.00E+00  0.00E+00  0.00E+00  0.00E+00  0.00E+00  0.00E+00
          9.90E-02
 ET14
+        0.00E+00  0.00E+00  0.00E+00  0.00E+00  0.00E+00  0.00E+00  0.00E+00  0.00E+00  0.00E+00  0.00E+00  0.00E+00  0.00E+00
          0.00E+00  9.90E-02

 SIGMA - COV MATRIX FOR RANDOM EFFECTS - EPSILONS  ****
            EPS1
 EPS1
+        5.20E-02

 OMEGA - CORR MATRIX FOR RANDOM EFFECTS - ETAS  *******
            ETA1      ETA2      ETA3      ETA4      ETA5      ETA6      ETA7      ETA8      ETA9      ET10      ET11      ET12
             ET13      ET14
 ETA1
+        3.62E-01
 ETA2
+        2.77E-01  2.83E-01
 ETA3
+        0.00E+00  0.00E+00  7.71E-02
 ETA4
+        0.00E+00  0.00E+00  0.00E+00  3.82E-01
 ETA5
+        0.00E+00  0.00E+00  0.00E+00  0.00E+00  7.73E-01
 ETA6
+        0.00E+00  0.00E+00  0.00E+00  0.00E+00  0.00E+00  3.39E-01
 ETA7
+        0.00E+00  0.00E+00  0.00E+00  0.00E+00  0.00E+00  0.00E+00  1.56E-01
 ETA8
+        0.00E+00  0.00E+00  0.00E+00  0.00E+00  0.00E+00  0.00E+00  0.00E+00  1.56E-01
 ETA9
+        0.00E+00  0.00E+00  0.00E+00  0.00E+00  0.00E+00  0.00E+00  0.00E+00  0.00E+00  5.67E-01
 ET10
+        0.00E+00  0.00E+00  0.00E+00  0.00E+00  0.00E+00  0.00E+00  0.00E+00  0.00E+00  0.00E+00  5.67E-01
 ET11
+        0.00E+00  0.00E+00  0.00E+00  0.00E+00  0.00E+00  0.00E+00  0.00E+00  0.00E+00  0.00E+00  0.00E+00  1.89E-01
 ET12
+        0.00E+00  0.00E+00  0.00E+00  0.00E+00  0.00E+00  0.00E+00  0.00E+00  0.00E+00  0.00E+00  0.00E+00  0.00E+00  1.89E-01
 ET13
+        0.00E+00  0.00E+00  0.00E+00  0.00E+00  0.00E+00  0.00E+00  0.00E+00  0.00E+00  0.00E+00  0.00E+00  0.00E+00  0.00E+00
          3.15E-01
 ET14
+        0.00E+00  0.00E+00  0.00E+00  0.00E+00  0.00E+00  0.00E+00  0.00E+00  0.00E+00  0.00E+00  0.00E+00  0.00E+00  0.00E+00
          0.00E+00  3.15E-01

 SIGMA - CORR MATRIX FOR RANDOM EFFECTS - EPSILONS  ***
            EPS1
 EPS1
+        2.28E-01
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 #CPUT: Total CPU Time in Seconds,    99390.521
