ons 16 sep 2020 09:20:56 CEST
$PROBLEM    PHENOBARB SIMPLE MODEL
$INPUT      ID TIME AMT WGT APGR DV CV1 CV2 CV3 CVD1 CVD2 CVD3
$DATA      pheno_ch.csv IGNORE=@
$SUBROUTINE ADVAN1 TRANS2
$PK

      TVCL  = THETA(1)
      CL    = TVCL*EXP(ETA(1))

      TVV   = THETA(2)
      V     = TVV*EXP(ETA(2))

      S1    = V
$ERROR

      W     = THETA(3)
      Y     = F+W*EPS(1)

      IPRED = F          ;  individual-specific prediction
      IRES  = DV-IPRED   ;  individual-specific residual
      IWRES = IRES/W     ;  individual-specific weighted residual

$THETA  (0,0.0105)
$THETA  (0,1.0500)
$THETA  (0,0.4)
$OMEGA  .4
 .25
$SIGMA  1  FIX
$ESTIMATION MAXEVAL=0 METHOD=CONDITIONAL

NM-TRAN MESSAGES
 WARNINGS AND ERRORS (IF ANY) FOR PROBLEM    1
 (WARNING  2) NM-TRAN INFERS THAT THE DATA ARE POPULATION.

1NONLINEAR MIXED EFFECTS MODEL PROGRAM (NONMEM) VERSION 7.4.4
 ORIGINALLY DEVELOPED BY STUART BEAL, LEWIS SHEINER, AND ALISON BOECKMANN
 CURRENT DEVELOPERS ARE ROBERT BAUER, ICON DEVELOPMENT SOLUTIONS,
 AND ALISON BOECKMANN. IMPLEMENTATION, EFFICIENCY, AND STANDARDIZATION
 PERFORMED BY NOUS INFOSYSTEMS.
 PROBLEM NO.:         1
 PHENOBARB SIMPLE MODEL
 TOT. NO. OF OBS RECS:      155
 TOT. NO. OF INDIVIDUALS:       59
 ONE COMPARTMENT MODEL (ADVAN1)
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 #TBLN:      1
 #METH: First Order Conditional Estimation (Evaluation)
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 Elapsed evaluation time in seconds:     0.00
 Elapsed postprocess time in seconds:     0.00

 ********************                 FIRST ORDER CONDITIONAL ESTIMATION (EVALUATION)                ********************
 #OBJT:**************                       MINIMUM VALUE OF OBJECTIVE FUNCTION                      ********************
 #OBJV:********************************************     3091.280       **************************************************

 ********************                 FIRST ORDER CONDITIONAL ESTIMATION (EVALUATION)                ********************
 ********************                             FINAL PARAMETER ESTIMATE                           ********************

 THETA - VECTOR OF FIXED EFFECTS PARAMETERS   *********
         TH 1      TH 2      TH 3
         1.05E-02  1.05E+00  4.00E-01

 OMEGA - COV MATRIX FOR RANDOM EFFECTS - ETAS  ********
         ETA1      ETA2
 ETA1
+        4.00E-01
 ETA2
+        0.00E+00  2.50E-01

 SIGMA - COV MATRIX FOR RANDOM EFFECTS - EPSILONS  ****
         EPS1
 EPS1
+        1.00E+00

 OMEGA - CORR MATRIX FOR RANDOM EFFECTS - ETAS  *******
         ETA1      ETA2
 ETA1
+        6.32E-01
 ETA2
+        0.00E+00  5.00E-01

 SIGMA - CORR MATRIX FOR RANDOM EFFECTS - EPSILONS  ***
         EPS1
 EPS1
+        1.00E+00
 Elapsed finaloutput time in seconds:     0.00
 #CPUT: Total CPU Time in Seconds,        0.014
