Fri Sep  9 15:43:42 CEST 2016
$PROBLEM    MOXONIDINE PK ANALYSIS
$INPUT      ID VISI XAT2=DROP DGRP DOSE FLAG=DROP ONO=DROP XIME=DROP
            DVO=DROP NEUY=DROP SCR=DROP AGE=DROP SEX NYHA=DROP WT
            COMP=DROP ACE=DROP DIG=DROP DIU=DROP NUMB=DROP TAD=DROP
            TIME VIDD=DROP CLCR=DROP AMT SS II VID CMT=DROP CONO=DROP
            DV EVID=DROP OVID=DROP
$DATA      moxonidine.dta IGNORE=@
$ABBREVIATED DERIV2=NO COMRES=6
$SUBROUTINE ADVAN2 TRANS1
$PK
;----------IOV--------------------
   VIS3               = 0
   IF(VISI.EQ.3) VIS3 = 1
   VIS8               = 0
   IF(VISI.EQ.8) VIS8 = 1
   KPLAG = VIS3*ETA(4)+VIS8*ETA(5)

   TVCL  = THETA(1)
   TVV   = THETA(2)
   TVKA  = THETA(3)

   CL    = TVCL*EXP(ETA(1))
   V     = TVV*EXP(ETA(2))
   KA    = TVKA*EXP(ETA(3))
   LAG   = THETA(4)
   PHI   = LOG(LAG/(1-LAG))
   ALAG1 = EXP(PHI+KPLAG)/(1+EXP(PHI+KPLAG))
   K     = CL/V
   S2    = V

$ERROR

     IPRED = LOG(.025)
     W     = THETA(5)
     IF(F.GT.0) IPRED = LOG(F)
     IRES  = IPRED-DV
     IWRES = IRES/W
     Y     = IPRED+ERR(1)*W

$THETA  (0,27.5)
 (0,13)
 (0,0.2)
 (0,.1)
 (0,.23)
$OMEGA  BLOCK(2)
 .3
 .1 .3
$OMEGA  BLOCK(1)
 .3
$OMEGA  BLOCK(1)
 .3
$OMEGA  BLOCK(1) SAME
$SIGMA  1  FIX
$ESTIMATION MAXEVALS=9990 METHOD=CONDITIONAL
$COVARIANCE UNCOND
$NONPARAMETRIC UNCOND NPSUPP=300

NM-TRAN MESSAGES
 WARNINGS AND ERRORS (IF ANY) FOR PROBLEM    1
 (WARNING  2) NM-TRAN INFERS THAT THE DATA ARE POPULATION.

1NONLINEAR MIXED EFFECTS MODEL PROGRAM (NONMEM) VERSION 7.3.0
 ORIGINALLY DEVELOPED BY STUART BEAL, LEWIS SHEINER, AND ALISON BOECKMANN
 CURRENT DEVELOPERS ARE ROBERT BAUER, ICON DEVELOPMENT SOLUTIONS,
 AND ALISON BOECKMANN. IMPLEMENTATION, EFFICIENCY, AND STANDARDIZATION
 PERFORMED BY NOUS INFOSYSTEMS.
 PROBLEM NO.:         1
 MOXONIDINE PK ANALYSIS
 TOT. NO. OF OBS RECS:     1022
 TOT. NO. OF INDIVIDUALS:     74
 ONE COMPARTMENT MODEL WITH FIRST-ORDER ABSORPTION (ADVAN2)
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 #TBLN:      1
 #METH: First Order Conditional Estimation
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
 #TERM:
0MINIMIZATION TERMINATED
 DUE TO PROXIMITY OF NEXT ITERATION EST. TO A VALUE
 AT WHICH THE OBJ. FUNC. IS INFINITE
0AT THE LAST COMPUTED INFINITE VALUE OF THE OBJ. FUNCT.:
 ERROR IN NCONTR WITH INDIVIDUAL      54   ID= 9.02000000000000E+02
 NUMERICAL HESSIAN OF OBJ. FUNC. FOR COMPUTING CONDITIONAL ESTIMATE
 IS NON POSITIVE DEFINITE
 THETA=
  2.37E+01   1.03E+01   2.39E-01   7.30E-02   2.65E-01

 NO. OF FUNCTION EVALUATIONS USED:      153
 NO. OF SIG. DIGITS UNREPORTABLE

 ETABAR IS THE ARITHMETIC MEAN OF THE ETA-ESTIMATES,
 AND THE P-VALUE IS GIVEN FOR THE NULL HYPOTHESIS THAT THE TRUE MEAN IS 0.

 ETABAR:        -4.9138E-02 -5.5062E-01 -1.8482E-03  1.3585E+00  1.8373E+00
 SE:             3.1831E-02  1.0789E-01  2.3228E-02  3.5796E-01  2.9942E-01
 N:                      74          74          74          74          74

 P VAL.:         1.2266E-01  3.3427E-07  9.3658E-01  1.4769E-04  8.4769E-10

 ETAshrink(%):   3.1277E+01  5.2053E+01  7.5691E+00  7.8837E+01  8.2298E+01
 EBVshrink(%):   3.7232E+00  2.5777E+01  1.4788E+01  2.4381E+01  1.6695E+01
 EPSshrink(%):   2.5697E+01

 #TERE:
 Elapsed estimation time in seconds:     8.83
0PROGRAM TERMINATED BY OBJ
 ERROR IN NCONTR WITH INDIVIDUAL      54   ID= 9.02000000000000E+02
 NUMERICAL HESSIAN OF OBJ. FUNC. FOR COMPUTING CONDITIONAL ESTIMATE
 IS NON POSITIVE DEFINITE
 Elapsed covariance time in seconds:     1.28
 MESSAGE ISSUED FROM COVARIANCE STEP

 ********************                        FIRST ORDER CONDITIONAL ESTIMATION                      ********************
 #OBJT:**************                       MINIMUM VALUE OF OBJECTIVE FUNCTION                      ********************
 #OBJV:********************************************     -828.536       **************************************************

 ********************                        FIRST ORDER CONDITIONAL ESTIMATION                      ********************
 ********************                             FINAL PARAMETER ESTIMATE                           ********************

 THETA - VECTOR OF FIXED EFFECTS PARAMETERS   *********
         TH 1      TH 2      TH 3      TH 4      TH 5
         2.74E+01  1.04E+01  2.43E-01  7.24E-02  2.87E-01

 OMEGA - COV MATRIX FOR RANDOM EFFECTS - ETAS  ********
            ETA1      ETA2      ETA3      ETA4      ETA5
 ETA1
+        1.61E-01
 ETA2
+       -5.64E-03  3.80E+00
 ETA3
+        0.00E+00  0.00E+00  4.74E-02
 ETA4
+        0.00E+00  0.00E+00  0.00E+00  2.15E+02
 ETA5
+        0.00E+00  0.00E+00  0.00E+00  0.00E+00  2.15E+02

 SIGMA - COV MATRIX FOR RANDOM EFFECTS - EPSILONS  ****
            EPS1
 EPS1
+        1.00E+00

 OMEGA - CORR MATRIX FOR RANDOM EFFECTS - ETAS  *******
            ETA1      ETA2      ETA3      ETA4      ETA5
 ETA1
+        4.01E-01
 ETA2
+       -7.22E-03  1.95E+00
 ETA3
+        0.00E+00  0.00E+00  2.18E-01
 ETA4
+        0.00E+00  0.00E+00  0.00E+00  1.46E+01
 ETA5
+        0.00E+00  0.00E+00  0.00E+00  0.00E+00  1.46E+01

 SIGMA - CORR MATRIX FOR RANDOM EFFECTS - EPSILONS  ***
            EPS1
 EPS1
+        1.00E+00
 #CPUT: Total CPU Time in Seconds,       10.124
