Wed Nov 20 14:52:18 CET 2013
$PROBLEM    MOXONIDINE PK,FINAL ESTIMATES,simulated data
$INPUT      ID VISI XAT2=DROP DGRP DOSE FLAG=DROP ONO=DROP XIME=DROP
            DVO=DROP NEUY SCR AGE SEX NYH=DROP WT DROP ACE DIG DIU
            NUMB=DROP TAD TIME VIDD=DROP CRCL AMT SS II DROP CMT=DROP
            CONO=DROP DV EVID=DROP OVID=DROP
$DATA       mox_simulated.csv IGNORE=@
$SUBROUTINE ADVAN2 TRANS1
$PK
;-----------OCCASIONS----------
   VIS3               = 0
   IF(VISI.EQ.3) VIS3 = 1
   VIS8               = 0
   IF(VISI.EQ.8) VIS8 = 1

;----------IOV--------------------

   KPCL  = VIS3*ETA(4)+VIS8*ETA(5)
   KPKA  = VIS3*ETA(6)+VIS8*ETA(7)

;---------- PK model ------------------

   TVCL  = THETA(1)
   TVV   = THETA(2)

   CL    = TVCL*EXP(ETA(1)+KPCL)
   V     = TVV*EXP(ETA(2))
   KA    = THETA(3)*EXP(ETA(3)+KPKA)
   ALAG1 = THETA(4)
   K     = CL/V
   S2    = V

$ERROR

     IPRED = LOG(.025)
     WA     = 1
     W      = WA
     IF(F.GT.0) IPRED = LOG(F)
     IRES  = IPRED-DV
     IWRES = IRES/W
     Y     = IPRED+ERR(1)*W

$THETA  (0,26.1) ; TVCL
$THETA  (115,115.1,115.5) ; TVV
$THETA  (0,4.5) ; TVKA
$THETA  (0,0.2149) ; LAG
$OMEGA  BLOCK(2)
 0.0750
 0.0467 0.0564  ; IIV (CL-V)
$OMEGA  BLOCK(1)
 2.82  ;     IIV KA
$OMEGA  BLOCK(1)
 0.0147  ;     IOV CL
$OMEGA  BLOCK(1) SAME

$OMEGA  BLOCK(1)
 0.506  ;     IOV KA
$OMEGA  BLOCK(1) SAME

$SIGMA  0.109
$ESTIMATION METHOD=1 MAXEVAL=9999
$COVARIANCE

NM-TRAN MESSAGES
 WARNINGS AND ERRORS (IF ANY) FOR PROBLEM    1
 (WARNING  2) NM-TRAN INFERS THAT THE DATA ARE POPULATION.

1NONLINEAR MIXED EFFECTS MODEL PROGRAM (NONMEM) VERSION 7.2.0
 ORIGINALLY DEVELOPED BY STUART BEAL, LEWIS SHEINER, AND ALISON BOECKMANN
 CURRENT DEVELOPERS ARE ROBERT BAUER, ICON DEVELOPMENT SOLUTIONS,
 AND ALISON BOECKMANN. IMPLEMENTATION, EFFICIENCY, AND STANDARDIZATION
 PERFORMED BY NOUS INFOSYSTEMS.
 PROBLEM NO.:         1
 MOXONIDINE PK,FINAL ESTIMATES,simulated data
 TOT. NO. OF OBS RECS:     1022
 TOT. NO. OF INDIVIDUALS:     74
 ONE COMPARTMENT MODEL WITH FIRST-ORDER ABSORPTION (ADVAN2)
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 #TBLN:      1
 #METH: First Order Conditional Estimation
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
 #TERM:
0MINIMIZATION SUCCESSFUL
 NO. OF FUNCTION EVALUATIONS USED:      540
 NO. OF SIG. DIGITS IN FINAL EST.:  3.5
0PARAMETER ESTIMATE IS NEAR ITS BOUNDARY
 THIS MUST BE ADDRESSED BEFORE THE COVARIANCE STEP CAN BE IMPLEMENTED

 ETABAR IS THE ARITHMETIC MEAN OF THE ETA-ESTIMATES,
 AND THE P-VALUE IS GIVEN FOR THE NULL HYPOTHESIS THAT THE TRUE MEAN IS 0.

 ETABAR:        -1.9398E-04 -1.6729E-02 -2.9197E-02  2.7091E-07 -1.6520E-07 -1.9267E-05  1.3549E-05
 SE:             7.4155E-02  8.5883E-02  4.2737E-02  1.0732E-06  1.1726E-06  1.1067E-05  1.0852E-05

 P VAL.:         9.9791E-01  8.4556E-01  4.9450E-01  8.0070E-01  8.8796E-01  8.1699E-02  2.1183E-01

 ETAshrink(%):   4.3678E-01  2.2485E+00  2.7178E+01  9.9233E+01  9.9162E+01  9.8652E+01  9.8679E+01
 EPSshrink(%):   8.9928E+00

 #TERE:
 Elapsed estimation time in seconds:    10.17

 ********************                        FIRST ORDER CONDITIONAL ESTIMATION                      ********************
 #OBJT:**************                       MINIMUM VALUE OF OBJECTIVE FUNCTION                      ********************
 #OBJV:********************************************     -631.500       **************************************************

 ********************                        FIRST ORDER CONDITIONAL ESTIMATION                      ********************
 ********************                             FINAL PARAMETER ESTIMATE                           ********************

 THETA - VECTOR OF FIXED EFFECTS PARAMETERS   *********
         TH 1      TH 2      TH 3      TH 4
         3.29E+01  1.15E+02  1.46E+00  8.19E-02

 OMEGA - COV MATRIX FOR RANDOM EFFECTS - ETAS  ********
            ETA1      ETA2      ETA3      ETA4      ETA5      ETA6      ETA7
 ETA1
+        4.16E-01
 ETA2
+        3.90E-01  5.79E-01
 ETA3
+        0.00E+00  0.00E+00  2.58E-01
 ETA4
+        0.00E+00  0.00E+00  0.00E+00  1.47E-06
 ETA5
+        0.00E+00  0.00E+00  0.00E+00  0.00E+00  1.47E-06
 ETA6
+        0.00E+00  0.00E+00  0.00E+00  0.00E+00  0.00E+00  5.06E-05
 ETA7
+        0.00E+00  0.00E+00  0.00E+00  0.00E+00  0.00E+00  0.00E+00  5.06E-05

 SIGMA - COV MATRIX FOR RANDOM EFFECTS - EPSILONS  ****
            EPS1
 EPS1
+        1.12E-01

 OMEGA - CORR MATRIX FOR RANDOM EFFECTS - ETAS  *******
            ETA1      ETA2      ETA3      ETA4      ETA5      ETA6      ETA7
 ETA1
+        6.45E-01
 ETA2
+        7.94E-01  7.61E-01
 ETA3
+        0.00E+00  0.00E+00  5.08E-01
 ETA4
+        0.00E+00  0.00E+00  0.00E+00  1.21E-03
 ETA5
+        0.00E+00  0.00E+00  0.00E+00  0.00E+00  1.21E-03
 ETA6
+        0.00E+00  0.00E+00  0.00E+00  0.00E+00  0.00E+00  7.11E-03
 ETA7
+        0.00E+00  0.00E+00  0.00E+00  0.00E+00  0.00E+00  0.00E+00  7.11E-03

 SIGMA - CORR MATRIX FOR RANDOM EFFECTS - EPSILONS  ***
            EPS1
 EPS1
+        3.35E-01
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