Thu Sep  1 13:01:01 CEST 2016
gfortran
$PROBLEM    PHENOBARB SIMPLE MODEL
$INPUT      ID TIME AMT WGT=DROP APGR DV CVD=DROP DROP CVD2=SKIP SKIP
            XWGT=DROP
$DATA      ../../bsdata_1.dta IGNORE=@ IGNORE=(WGT.LT.1.3)
$SUBROUTINE ADVAN1 TRANS2
$PK

;;; VAPGR-DEFINITION START
VAPGR=(THETA(3)*(APGR-7.12))
;;; VAPGR-DEFINITION END

;;; V-RELATION START
VCOV=VAPGR
;;; V-RELATION END

      TVCL=THETA(1)
      TVV=THETA(2)

TVV = VCOV*TVV
      CL=TVCL*EXP(ETA(1))
      V=TVV*EXP(ETA(2))
      S1=V
$ERROR

      W=F
      Y=F+W*EPS(1)

      IPRED=F         ;  individual-specific prediction
      IRES=DV-IPRED   ;  individual-specific residual
      IWRES=IRES/W    ;  individual-specific weighted residual

$THETA  (0,0.00701) ; CL
$THETA  (0,1.83) ; V
$THETA  (-100000,0.001,100000) ; VAPGR1
$OMEGA  0.0905  ;       IVCL
 0.0983  ;        IVV
$SIGMA  0.011
$ESTIMATION MAXEVALS=9997 SIGDIGITS=4 POSTHOC
$COVARIANCE PRINT=E

 WARNINGS AND ERRORS (IF ANY) FOR PROBLEM    1
 (WARNING  2) NM-TRAN INFERS THAT THE DATA ARE POPULATION.

1NONLINEAR MIXED EFFECTS MODEL PROGRAM (NONMEM) VERSION 7.1.0
 ORIGINALLY DEVELOPED BY STUART BEAL, LEWIS SHEINER, AND ALISON BOECKMANN
 CURRENT DEVELOPERS ARE ROBERT BAUER, ICON DEVELOPMENT SOLUTIONS,
 AND ALISON BOECKMANN. IMPLEMENTATION, EFFICIENCY, AND STANDARDIZATION
 PERFORMED BY NOUS INFOSYSTEMS.
 PROBLEM NO.:         1
 PHENOBARB SIMPLE MODEL
 TOT. NO. OF OBS RECS:       78
 TOT. NO. OF INDIVIDUALS:     33
 ONE COMPARTMENT MODEL (ADVAN1)
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 #METH: First Order

0PRED EXIT CODE = 1
0INDIVIDUAL NO.       1   ID= 1.00000000000000E+00   (WITHIN-INDIVIDUAL) DATA REC NO.   1
 THETA=
  7.01E-03   1.83E+00   1.00E-03
 ERROR IN TRANS2 ROUTINE: V IS NEGATIVE
0PROGRAM TERMINATED BY OBJ
 MESSAGE ISSUED FROM ESTIMATION STEP
 AT INITIAL OBJ. FUNCTION EVALUATION
 Elapsed estimation time in seconds:     0.00

 #TERM:

 #TERE:
