Fri Sep  9 12:45:27 CEST 2016
$PROBLEM    PHENOBARB SIMPLE MODEL
$INPUT      ID TIME AMT WGT APGR DV FA1 FA2
$DATA      pheno.dta IGNORE=@
$SUBROUTINE ADVAN1 TRANS2
$PK

      TVCL=THETA(1)
      TVV=THETA(2)
      CL=TVCL*EXP(ETA(1))
      V=TVV*EXP(ETA(2))
      S1=V
$ERROR

      W=F
      Y=F+W*EPS(1)

      IPRED=F         ;  individual-specific prediction
      IRES=DV-IPRED   ;  individual-specific residual
      IWRES=IRES/W    ;  individual-specific weighted residual

$THETA  (0,0.0105) ; CL; unit
$THETA  (0,1.0500) ; V; unit
$OMEGA  .4  ;       IVCL
 .25  ;        IVV
$SIGMA  .04
$ESTIMATION MAXEVALS=9997 METHOD=1
;$TABLE ID TIME IPRED IWRES NOPRINT ONEHEADER FILE=sdtab5.dat

;$TABLE ID CL ETA1 ETA2 NOPRINT NOAPPEND ONEHEADER FILE=patab5.dat

;$TABLE ID WGT APGR NOPRINT NOAPPEND ONEHEADER FILE=cotab5.dat
$COVARIANCE
$NONPARAMETRIC UNCONDITIONAL NPSUPP=300

NM-TRAN MESSAGES
 WARNINGS AND ERRORS (IF ANY) FOR PROBLEM    1
 (WARNING  2) NM-TRAN INFERS THAT THE DATA ARE POPULATION.

1NONLINEAR MIXED EFFECTS MODEL PROGRAM (NONMEM) VERSION 7.3.0
 ORIGINALLY DEVELOPED BY STUART BEAL, LEWIS SHEINER, AND ALISON BOECKMANN
 CURRENT DEVELOPERS ARE ROBERT BAUER, ICON DEVELOPMENT SOLUTIONS,
 AND ALISON BOECKMANN. IMPLEMENTATION, EFFICIENCY, AND STANDARDIZATION
 PERFORMED BY NOUS INFOSYSTEMS.
 PROBLEM NO.:         1
 PHENOBARB SIMPLE MODEL
 TOT. NO. OF OBS RECS:      155
 TOT. NO. OF INDIVIDUALS:     59
 ONE COMPARTMENT MODEL (ADVAN1)
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 #TBLN:      1
 #METH: First Order Conditional Estimation
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
 #TERM:
0MINIMIZATION SUCCESSFUL
 NO. OF FUNCTION EVALUATIONS USED:      107
 NO. OF SIG. DIGITS IN FINAL EST.:  3.6

 ETABAR IS THE ARITHMETIC MEAN OF THE ETA-ESTIMATES,
 AND THE P-VALUE IS GIVEN FOR THE NULL HYPOTHESIS THAT THE TRUE MEAN IS 0.

 ETABAR:         5.5413E-03 -1.3062E-02
 SE:             2.8607E-02  5.1845E-02
 N:                      59          59

 P VAL.:         8.4641E-01  8.0108E-01

 ETAshrink(%):   3.8721E+01  4.6492E+00
 EBVshrink(%):   3.8428E+01  4.4592E+00
 EPSshrink(%):   2.7971E+01

 #TERE:
 Elapsed estimation time in seconds:     0.55
 Elapsed covariance time in seconds:     0.31

 ********************                        FIRST ORDER CONDITIONAL ESTIMATION                      ********************
 #OBJT:**************                       MINIMUM VALUE OF OBJECTIVE FUNCTION                      ********************
 #OBJV:********************************************      740.278       **************************************************

 ********************                        FIRST ORDER CONDITIONAL ESTIMATION                      ********************
 ********************                             FINAL PARAMETER ESTIMATE                           ********************

 THETA - VECTOR OF FIXED EFFECTS PARAMETERS   *********
         TH 1      TH 2
         5.35E-03  1.42E+00

 OMEGA - COV MATRIX FOR RANDOM EFFECTS - ETAS  ********
            ETA1      ETA2
 ETA1
+        1.31E-01
 ETA2
+        0.00E+00  1.77E-01

 SIGMA - COV MATRIX FOR RANDOM EFFECTS - EPSILONS  ****
            EPS1
 EPS1
+        1.88E-02

 OMEGA - CORR MATRIX FOR RANDOM EFFECTS - ETAS  *******
            ETA1      ETA2
 ETA1
+        3.62E-01
 ETA2
+        0.00E+00  4.21E-01

 SIGMA - CORR MATRIX FOR RANDOM EFFECTS - EPSILONS  ***
            EPS1
 EPS1
+        1.37E-01

 ********************                        FIRST ORDER CONDITIONAL ESTIMATION                      ********************
 ********************                            STANDARD ERROR OF ESTIMATE                          ********************

 THETA - VECTOR OF FIXED EFFECTS PARAMETERS   *********
         TH 1      TH 2
         3.78E-04  8.64E-02

 OMEGA - COV MATRIX FOR RANDOM EFFECTS - ETAS  ********
            ETA1      ETA2
 ETA1
+        8.75E-02
 ETA2
+       .........  4.71E-02

 SIGMA - COV MATRIX FOR RANDOM EFFECTS - EPSILONS  ****
            EPS1
 EPS1
+        3.80E-03

 OMEGA - CORR MATRIX FOR RANDOM EFFECTS - ETAS  *******
            ETA1      ETA2
 ETA1
+        1.21E-01
 ETA2
+       .........  5.59E-02

 SIGMA - CORR MATRIX FOR RANDOM EFFECTS - EPSILONS  ***
            EPS1
 EPS1
+        1.39E-02

 ********************                        FIRST ORDER CONDITIONAL ESTIMATION                      ********************
 ********************                          COVARIANCE MATRIX OF ESTIMATE                         ********************

            TH 1      TH 2      OM11      OM12      OM22      SG11
 TH 1
+        1.43E-07
 TH 2
+        7.15E-06  7.47E-03
 OM11
+       -1.88E-05 -8.43E-04  7.65E-03
 OM12
+       ......... ......... ......... .........
 OM22
+        1.59E-07  2.44E-03 -5.02E-04 .........  2.21E-03
 SG11
+       -4.40E-07  3.56E-05  1.74E-04 .........  7.01E-06  1.45E-05

 ********************                        FIRST ORDER CONDITIONAL ESTIMATION                      ********************
 ********************                          CORRELATION MATRIX OF ESTIMATE                        ********************

            TH 1      TH 2      OM11      OM12      OM22      SG11
 TH 1
+        3.78E-04
 TH 2
+        2.19E-01  8.64E-02
 OM11
+       -5.69E-01 -1.11E-01  8.75E-02
 OM12
+       ......... ......... ......... .........
 OM22
+        8.93E-03  5.99E-01 -1.22E-01 .........  4.71E-02
 SG11
+       -3.06E-01  1.08E-01  5.23E-01 .........  3.92E-02  3.80E-03
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 #CPUT: Total CPU Time in Seconds,        2.112
