Tue Apr 28 12:48:28 CEST 2015
$PROBLEM    THEOPHYLLINE POPULATION DATA
$INPUT      ID DOSE TIME DV WT
$DATA      theo.csv IGNORE=@
$PRED
;THETA(1)=MEAN ABSORPTION RATE CONSTANT (1/HR)
;THETA(2)=MEAN ELIMINATION RATE CONSTANT (1/HR)
;THETA(3)=SLOPE OF CLEARANCE VS WEIGHT RELATIONSHIP (LITERS/HR/KG)
;DOSE=WT-ADJUSTED DOSE (MG/KG)
;DS=NON-WT-ADJUSTED DOSE (MG)
   IF (DOSE.NE.0) THEN
      DS=DOSE*WT
      W=WT
   ENDIF
   KA=THETA(1)+ETA(1)
   KE=THETA(2)+ETA(2)
   CL=THETA(3)*W+ETA(3)
   D=EXP(-KE*TIME)-EXP(-KA*TIME)
   E=CL*(KA-KE)
   F=DS*KE*KA/E*D
   Y=F+EPS(1)

$THETA  (0.1,3,10)
 (0.008,0.08,0.8)
 (0.004,0.04,0.9)
$OMEGA  BLOCK(3)
 2
 0.005 0.0001
 0.1 0.006 0.4
$SIGMA  0.4
$ESTIMATION MAXEVAL=9999 PRINT=5
$COVARIANCE
$TABLE      ID DOSE WT TIME FILE=MYTAB12

NM-TRAN MESSAGES
 WARNINGS AND ERRORS (IF ANY) FOR PROBLEM    1
 (WARNING  2) NM-TRAN INFERS THAT THE DATA ARE POPULATION.
 (WARNING  13) WITH USER-WRITTEN PRED OR $PRED, NM-TRAN CANNOT APPEND THE
 MDV DATA ITEM.

1NONLINEAR MIXED EFFECTS MODEL PROGRAM (NONMEM) VERSION 7.3.0
 ORIGINALLY DEVELOPED BY STUART BEAL, LEWIS SHEINER, AND ALISON BOECKMANN
 CURRENT DEVELOPERS ARE ROBERT BAUER, ICON DEVELOPMENT SOLUTIONS,
 AND ALISON BOECKMANN. IMPLEMENTATION, EFFICIENCY, AND STANDARDIZATION
 PERFORMED BY NOUS INFOSYSTEMS.
 PROBLEM NO.:         1
 THEOPHYLLINE POPULATION DATA
 TOT. NO. OF OBS RECS:      131
 TOT. NO. OF INDIVIDUALS:     12
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 #TBLN:      1
 #METH: First Order
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
 #TERM:
0MINIMIZATION SUCCESSFUL
 NO. OF FUNCTION EVALUATIONS USED:      208
 NO. OF SIG. DIGITS IN FINAL EST.:  4.2

 #TERE:
 Elapsed estimation time in seconds:     0.05
 Elapsed covariance time in seconds:     0.02

 ********************                                   FIRST ORDER                                  ********************
 #OBJT:**************                       MINIMUM VALUE OF OBJECTIVE FUNCTION                      ********************
 #OBJV:********************************************      103.963       **************************************************

 ********************                                   FIRST ORDER                                  ********************
 ********************                             FINAL PARAMETER ESTIMATE                           ********************

 THETA - VECTOR OF FIXED EFFECTS PARAMETERS   *********
         TH 1      TH 2      TH 3
         2.81E+00  7.79E-02  3.62E-02

 OMEGA - COV MATRIX FOR RANDOM EFFECTS - ETAS  ********
            ETA1      ETA2      ETA3
 ETA1
+        5.71E+00
 ETA2
+        7.56E-03  2.42E-04
 ETA3
+       -8.48E-02  9.08E-03  5.12E-01

 SIGMA - COV MATRIX FOR RANDOM EFFECTS - EPSILONS  ****
            EPS1
 EPS1
+        3.86E-01

 OMEGA - CORR MATRIX FOR RANDOM EFFECTS - ETAS  *******
            ETA1      ETA2      ETA3
 ETA1
+        2.39E+00
 ETA2
+        2.04E-01  1.55E-02
 ETA3
+       -4.96E-02  8.16E-01  7.16E-01

 SIGMA - CORR MATRIX FOR RANDOM EFFECTS - EPSILONS  ***
            EPS1
 EPS1
+        6.22E-01

 ********************                                   FIRST ORDER                                  ********************
 ********************                            STANDARD ERROR OF ESTIMATE                          ********************

 THETA - VECTOR OF FIXED EFFECTS PARAMETERS   *********
         TH 1      TH 2      TH 3
         7.13E-01  7.27E-03  4.50E-03

 OMEGA - COV MATRIX FOR RANDOM EFFECTS - ETAS  ********
            ETA1      ETA2      ETA3
 ETA1
+        4.98E+00
 ETA2
+        1.40E-02  1.31E-04
 ETA3
+        4.81E-01  3.79E-03  2.12E-01

 SIGMA - COV MATRIX FOR RANDOM EFFECTS - EPSILONS  ****
            EPS1
 EPS1
+        1.06E-01

 OMEGA - CORR MATRIX FOR RANDOM EFFECTS - ETAS  *******
            ETA1      ETA2      ETA3
 ETA1
+        1.04E+00
 ETA2
+        3.06E-01  4.22E-03
 ETA3
+        2.85E-01  9.96E-02  1.48E-01

 SIGMA - CORR MATRIX FOR RANDOM EFFECTS - EPSILONS  ***
            EPS1
 EPS1
+        8.55E-02

 ********************                                   FIRST ORDER                                  ********************
 ********************                          COVARIANCE MATRIX OF ESTIMATE                         ********************

            TH 1      TH 2      TH 3      OM11      OM12      OM13      OM22      OM23      OM33      SG11
 TH 1
+        5.08E-01
 TH 2
+        1.31E-03  5.28E-05
 TH 3
+        9.70E-05  3.08E-05  2.02E-05
 OM11
+        3.45E+00  7.30E-03 -2.76E-05  2.48E+01
 OM12
+        4.73E-03  7.53E-05  3.80E-05  2.59E-02  1.96E-04
 OM13
+        1.12E-02  1.65E-03  1.03E-03 -2.45E-01  5.11E-03  2.31E-01
 OM22
+        1.70E-05  5.34E-07  2.64E-07  5.75E-05  1.57E-06  4.42E-05  1.72E-08
 OM23
+        2.05E-04  1.55E-06  6.05E-07 -1.18E-03  2.69E-05  1.27E-03  3.50E-07  1.43E-05
 OM33
+        1.03E-02 -2.75E-04 -1.23E-04 -6.10E-02  6.73E-04  5.43E-02  9.27E-06  7.12E-04  4.48E-02
 SG11
+       -1.54E-02  2.01E-04  6.26E-05 -1.56E-01  6.21E-04  1.66E-02  7.84E-06  1.01E-04 -1.41E-03  1.13E-02

 ********************                                   FIRST ORDER                                  ********************
 ********************                          CORRELATION MATRIX OF ESTIMATE                        ********************

            TH 1      TH 2      TH 3      OM11      OM12      OM13      OM22      OM23      OM33      SG11
 TH 1
+        7.13E-01
 TH 2
+        2.54E-01  7.27E-03
 TH 3
+        3.03E-02  9.44E-01  4.50E-03
 OM11
+        9.71E-01  2.02E-01 -1.23E-03  4.98E+00
 OM12
+        4.74E-01  7.40E-01  6.04E-01  3.72E-01  1.40E-02
 OM13
+        3.28E-02  4.72E-01  4.77E-01 -1.02E-01  7.59E-01  4.81E-01
 OM22
+        1.82E-01  5.60E-01  4.48E-01  8.80E-02  8.57E-01  7.01E-01  1.31E-04
 OM23
+        7.59E-02  5.63E-02  3.56E-02 -6.24E-02  5.07E-01  7.01E-01  7.05E-01  3.79E-03
 OM33
+        6.80E-02 -1.79E-01 -1.29E-01 -5.78E-02  2.27E-01  5.34E-01  3.34E-01  8.89E-01  2.12E-01
 SG11
+       -2.04E-01  2.60E-01  1.31E-01 -2.95E-01  4.17E-01  3.25E-01  5.63E-01  2.50E-01 -6.27E-02  1.06E-01
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 #CPUT: Total CPU Time in Seconds,        0.101
