Fri Sep  9 15:43:31 CEST 2016
$PROBLEM    THEOPHYLLINE POPULATION DATA
$INPUT      ID DOSE TIME DV WT
$DATA      theo.csv IGNORE=@
$PRED
;THETA(1)=MEAN ABSORPTION RATE CONSTANT (1/HR)
;THETA(2)=MEAN ELIMINATION RATE CONSTANT (1/HR)
;THETA(3)=SLOPE OF CLEARANCE VS WEIGHT RELATIONSHIP (LITERS/HR/KG)
;DOSE=WT-ADJUSTED DOSE (MG/KG)
;DS=NON-WT-ADJUSTED DOSE (MG)
   IF (DOSE.NE.0) THEN
      DS=DOSE*WT
      WGT=WT
   ENDIF
   KA=THETA(1)*(THETA(4)*WGT+ETA(4))+ETA(1)
	TVKE=THETA(2)
	KE=TVKE+ETA(2)
   CL=THETA(3)*WGT+ETA(3)
   D=EXP(-KE*TIME)-EXP(-KA*TIME)
   E=CL*(KA-KE)
   F=DS*KE*KA/E*D
  IPRED=F
   W = THETA(5)
   Y=IPRED+W*EPS(1)

$THETA  (0.1,3,10)
 (0.008,0.08,0.8)
 (0.004,0.04,0.9)
$THETA  (0,1)
$THETA  0.6
$OMEGA  BLOCK(3)
 2
 0.001 0.05
 0.001 0.006 0.4
$OMEGA  0.1  FIX
$SIGMA  1  FIX
$ESTIMATION MAXEVAL=9999 METHOD=COND
$COVARIANCE UNCONDITIONAL
$NONPARAMETRIC UNCOND NPSUPP=300

NM-TRAN MESSAGES
 WARNINGS AND ERRORS (IF ANY) FOR PROBLEM    1
 (WARNING  2) NM-TRAN INFERS THAT THE DATA ARE POPULATION.
 (WARNING  13) WITH USER-WRITTEN PRED OR $PRED, NM-TRAN CANNOT APPEND THE
 MDV DATA ITEM.

1NONLINEAR MIXED EFFECTS MODEL PROGRAM (NONMEM) VERSION 7.3.0
 ORIGINALLY DEVELOPED BY STUART BEAL, LEWIS SHEINER, AND ALISON BOECKMANN
 CURRENT DEVELOPERS ARE ROBERT BAUER, ICON DEVELOPMENT SOLUTIONS,
 AND ALISON BOECKMANN. IMPLEMENTATION, EFFICIENCY, AND STANDARDIZATION
 PERFORMED BY NOUS INFOSYSTEMS.
 PROBLEM NO.:         1
 THEOPHYLLINE POPULATION DATA
 TOT. NO. OF OBS RECS:      131
 TOT. NO. OF INDIVIDUALS:     12
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 #TBLN:      1
 #METH: First Order Conditional Estimation
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
 #TERM:
0MINIMIZATION TERMINATED
 DUE TO ROUNDING ERRORS (ERROR=134)
 NO. OF FUNCTION EVALUATIONS USED:      735
 NO. OF SIG. DIGITS UNREPORTABLE
0PARAMETER ESTIMATE IS NEAR ITS BOUNDARY

 ETABAR IS THE ARITHMETIC MEAN OF THE ETA-ESTIMATES,
 AND THE P-VALUE IS GIVEN FOR THE NULL HYPOTHESIS THAT THE TRUE MEAN IS 0.

 ETABAR:        -6.4679E-05  2.8255E-06 -1.9720E-04  7.1778E-16
 SE:             1.4084E-02  6.3149E-04  4.3279E-02  2.9692E-15
 N:                      12          12          12          12

 P VAL.:         9.9634E-01  9.9643E-01  9.9636E-01  8.0898E-01

 ETAshrink(%):   9.6393E+01  1.2506E+01  1.2492E+01  1.0000E+02
 EBVshrink(%):   9.6560E+01  1.6545E+01  1.6532E+01  1.0000E+02
 EPSshrink(%):   3.2692E+00

 #TERE:
 Elapsed estimation time in seconds:     0.46
0R MATRIX ALGORITHMICALLY SINGULAR
0COVARIANCE MATRIX UNOBTAINABLE
0R MATRIX IS OUTPUT
0S MATRIX ALGORITHMICALLY SINGULAR
0S MATRIX IS OUTPUT
0T MATRIX - EQUAL TO RS*RMAT, WHERE S* IS A PSEUDO INVERSE OF S - IS OUTPUT
 Elapsed covariance time in seconds:     0.09

 ********************                        FIRST ORDER CONDITIONAL ESTIMATION                      ********************
 #OBJT:**************                       MINIMUM VALUE OF OBJECTIVE FUNCTION                      ********************
 #OBJV:********************************************      325.056       **************************************************

 ********************                        FIRST ORDER CONDITIONAL ESTIMATION                      ********************
 ********************                             FINAL PARAMETER ESTIMATE                           ********************

 THETA - VECTOR OF FIXED EFFECTS PARAMETERS   *********
         TH 1      TH 2      TH 3      TH 4      TH 5
         9.92E+00  3.51E-02  2.39E-02  5.62E+03  1.98E+00

 OMEGA - COV MATRIX FOR RANDOM EFFECTS - ETAS  ********
            ETA1      ETA2      ETA3      ETA4
 ETA1
+        2.00E+00
 ETA2
+       -1.52E-04  6.82E-06
 ETA3
+        1.04E-02 -4.67E-04  3.20E-02
 ETA4
+        0.00E+00  0.00E+00  0.00E+00  1.00E-01

 SIGMA - COV MATRIX FOR RANDOM EFFECTS - EPSILONS  ****
            EPS1
 EPS1
+        1.00E+00

 OMEGA - CORR MATRIX FOR RANDOM EFFECTS - ETAS  *******
            ETA1      ETA2      ETA3      ETA4
 ETA1
+        1.41E+00
 ETA2
+       -4.12E-02  2.61E-03
 ETA3
+        4.12E-02 -9.99E-01  1.79E-01
 ETA4
+        0.00E+00  0.00E+00  0.00E+00  3.16E-01

 SIGMA - CORR MATRIX FOR RANDOM EFFECTS - EPSILONS  ***
            EPS1
 EPS1
+        1.00E+00
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 #CPUT: Total CPU Time in Seconds,        0.860
