Tue 04/01/2014
01:01 PM
$PROBLEM  THEOPHYLLINE   SINGLE SUBJECT DATA
$INPUT  DOSE=AMT TIME CP=DV CAT
$DATA  DATA3B
$SUBROUTINES  ADVAN2

$PK
CALLFL=1
KA=THETA(1)
K=THETA(2)
SC=THETA(3)

$ERROR
IPRED=F
W=1.0
; first observation after dose is part of "first subject".  So, put in dummy record, CAT=3,
; and give it a residual variance that is very large, so it does not influence the fit.
IF(CAT==3.0) W=1.0E+10
Y=F+W*ERR(1)

$THETA  (0,1.7)  (0,.102)  (0,29)
$OMEGA 0.2

$SIML (567666 NORMAL) (33012 UNIFORM) BOOTSTRAP=-1 STRAT=CAT SUBP=100

$ESTIMATION MAXEVAL=9999  PRINT=2
$COVR
$TABLE TIME CAT AMT CP IPRED W NOAPPEND NOPRINT file=control3boot.tab

NM-TRAN MESSAGES
 WARNINGS AND ERRORS (IF ANY) FOR PROBLEM    1
 (WARNING  1) NM-TRAN INFERS THAT THE DATA ARE SINGLE-SUBJECT.
  NONMEM RUN CANNOT BE PARALLELIZED.

1NONLINEAR MIXED EFFECTS MODEL PROGRAM (NONMEM) VERSION 7.4.0 alpha2 (nm74a2)
 ORIGINALLY DEVELOPED BY STUART BEAL, LEWIS SHEINER, AND ALISON BOECKMANN
 CURRENT DEVELOPERS ARE ROBERT BAUER, ICON DEVELOPMENT SOLUTIONS,
 AND ALISON BOECKMANN. IMPLEMENTATION, EFFICIENCY, AND STANDARDIZATION
 PERFORMED BY NOUS INFOSYSTEMS.
 PROBLEM NO.:         1
 THEOPHYLLINE   SINGLE SUBJECT DATA
 TOT. NO. OF OBS RECS:       11
 TOT. NO. OF INDIVIDUALS:     11
 ONE COMPARTMENT MODEL WITH FIRST-ORDER ABSORPTION (ADVAN2)
 PROBLEM NO.:           1      SUBPROBLEM NO.:           1
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 Elapsed simulation  time in seconds:     0.02
 #TBLN:      1
 #METH: First Order
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
 #TERM:
0MINIMIZATION SUCCESSFUL
 NO. OF FUNCTION EVALUATIONS USED:       97
 NO. OF SIG. DIGITS IN FINAL EST.:  3.3

 #TERE:
 Elapsed estimation  time in seconds:     0.16
 Elapsed covariance  time in seconds:     0.00
 Elapsed postprocess time in seconds:     0.00

 ********************                                   FIRST ORDER                                  ********************
 #OBJT:**************                       MINIMUM VALUE OF OBJECTIVE FUNCTION                      ********************
 #OBJV:********************************************       39.427       **************************************************

 ********************                                   FIRST ORDER                                  ********************
 ********************                             FINAL PARAMETER ESTIMATE                           ********************

 THETA - VECTOR OF FIXED EFFECTS PARAMETERS   *********
         TH 1      TH 2      TH 3
         9.84E-01  1.05E-01  3.30E+01

 OMEGA - COV MATRIX FOR RANDOM EFFECTS - ETAS  ********
         ETA1
 ETA1
+        2.01E-01

 OMEGA - CORR MATRIX FOR RANDOM EFFECTS - ETAS  *******
         ETA1
 ETA1
+        4.49E-01

 ********************                                   FIRST ORDER                                  ********************
 ********************                            STANDARD ERROR OF ESTIMATE                          ********************

 THETA - VECTOR OF FIXED EFFECTS PARAMETERS   *********
         TH 1      TH 2      TH 3
         1.60E-01  9.08E-03  1.64E+00

 OMEGA - COV MATRIX FOR RANDOM EFFECTS - ETAS  ********
         ETA1
 ETA1
+        1.01E-01

 OMEGA - CORR MATRIX FOR RANDOM EFFECTS - ETAS  *******
         ETA1
 ETA1
+        1.13E-01

 ********************                                   FIRST ORDER                                  ********************
 ********************                          COVARIANCE MATRIX OF ESTIMATE                         ********************

            TH 1      TH 2      TH 3      OM11
 TH 1
+        2.56E-02
 TH 2
+       -1.60E-04  8.24E-05
 TH 3
+       -8.84E-03 -1.39E-02  2.69E+00
 OM11
+        7.60E-03  6.57E-04 -1.34E-01  1.03E-02

 ********************                                   FIRST ORDER                                  ********************
 ********************                          CORRELATION MATRIX OF ESTIMATE                        ********************

            TH 1      TH 2      TH 3      OM11
 TH 1
+        1.60E-01
 TH 2
+       -1.10E-01  9.08E-03
 TH 3
+       -3.36E-02 -9.36E-01  1.64E+00
 OM11
+        4.69E-01  7.15E-01 -8.04E-01  1.01E-01
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 PROBLEM NO.:           1      SUBPROBLEM NO.:           2
 Elapsed simulation  time in seconds:     0.00
 #TBLN:      2
 #METH: First Order
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
 #TERM:
0MINIMIZATION SUCCESSFUL
 NO. OF FUNCTION EVALUATIONS USED:      126
 NO. OF SIG. DIGITS IN FINAL EST.:  4.2

 #TERE:
 Elapsed estimation  time in seconds:     0.11
 Elapsed covariance  time in seconds:     0.00
 Elapsed postprocess time in seconds:     0.01

 ********************                                   FIRST ORDER                                  ********************
 #OBJT:**************                       MINIMUM VALUE OF OBJECTIVE FUNCTION                      ********************
 #OBJV:********************************************       39.128       **************************************************

 ********************                                   FIRST ORDER                                  ********************
 ********************                             FINAL PARAMETER ESTIMATE                           ********************

 THETA - VECTOR OF FIXED EFFECTS PARAMETERS   *********
         TH 1      TH 2      TH 3
         1.00E+00  1.00E-01  3.31E+01

 OMEGA - COV MATRIX FOR RANDOM EFFECTS - ETAS  ********
         ETA1
 ETA1
+        1.96E-01

 OMEGA - CORR MATRIX FOR RANDOM EFFECTS - ETAS  *******
         ETA1
 ETA1
+        4.43E-01

 ********************                                   FIRST ORDER                                  ********************
 ********************                            STANDARD ERROR OF ESTIMATE                          ********************

 THETA - VECTOR OF FIXED EFFECTS PARAMETERS   *********
         TH 1      TH 2      TH 3
         1.41E-01  1.03E-02  2.20E+00

 OMEGA - COV MATRIX FOR RANDOM EFFECTS - ETAS  ********
         ETA1
 ETA1
+        8.90E-02

 OMEGA - CORR MATRIX FOR RANDOM EFFECTS - ETAS  *******
         ETA1
 ETA1
+        1.01E-01

 ********************                                   FIRST ORDER                                  ********************
 ********************                          COVARIANCE MATRIX OF ESTIMATE                         ********************

            TH 1      TH 2      TH 3      OM11
 TH 1
+        2.00E-02
 TH 2
+       -8.21E-05  1.05E-04
 TH 3
+       -1.59E-02 -2.16E-02  4.85E+00
 OM11
+        3.17E-03  7.66E-04 -1.63E-01  7.93E-03

 ********************                                   FIRST ORDER                                  ********************
 ********************                          CORRELATION MATRIX OF ESTIMATE                        ********************

            TH 1      TH 2      TH 3      OM11
 TH 1
+        1.41E-01
 TH 2
+       -5.66E-02  1.03E-02
 TH 3
+       -5.12E-02 -9.58E-01  2.20E+00
 OM11
+        2.52E-01  8.39E-01 -8.33E-01  8.90E-02
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 #CPUT: Total CPU Time in Seconds,        8.783
