Thu Apr 11 09:33:39 AM CEST 2024
$PROBLEM PHENOBARB SIMPLE MODEL
$DATA ../.datasets/pheno.csv IGNORE=@
$INPUT ID TIME AMT WGT APGR DV FA1 FA2
$SUBROUTINE ADVAN1 TRANS2

$PK
IF(AMT.GT.0) BTIME=TIME
TAD=TIME-BTIME
TVCL=THETA(1)*WGT
TVV=THETA(2)*WGT
IF(APGR.LT.5) TVV=TVV*(1+THETA(3))
CL=TVCL*EXP(ETA(1))
V=TVV*EXP(ETA(2))
S1=V

$ERROR
W=F
Y=F+W*EPS(1)
IPRED=F
IRES=DV-IPRED
IWRES=IRES/W

$THETA (0,0.00469307) ; PTVCL
$THETA (0,1.00916) ; PTVV
$THETA (-.99,.1)
$OMEGA DIAGONAL(2)
 0.0309626  ;       IVCL
 0.031128  ;        IVV

$SIGMA 0.013241
$ESTIMATION METHOD=1 INTERACTION
$ESTIMATION METHOD=SAEM
$TABLE ID TIME AMT WGT APGR IPRED PRED TAD CWRES NPDE NOAPPEND
       NOPRINT ONEHEADER FILE=pheno.tab

NM-TRAN MESSAGES
 WARNINGS AND ERRORS (IF ANY) FOR PROBLEM    1
 (WARNING  2) NM-TRAN INFERS THAT THE DATA ARE POPULATION.
Note: Analytical 2nd Derivatives are constructed in FSUBS but are never used.
      You may insert $ABBR DERIV2=NO after the first $PROB to save FSUBS construction and compilation time

1NONLINEAR MIXED EFFECTS MODEL PROGRAM (NONMEM) VERSION 7.5.1
 ORIGINALLY DEVELOPED BY STUART BEAL, LEWIS SHEINER, AND ALISON BOECKMANN
 CURRENT DEVELOPERS ARE ROBERT BAUER, ICON DEVELOPMENT SOLUTIONS,
 AND ALISON BOECKMANN. IMPLEMENTATION, EFFICIENCY, AND STANDARDIZATION
 PERFORMED BY NOUS INFOSYSTEMS.
 PROBLEM NO.:         1
 PHENOBARB SIMPLE MODEL
 TOT. NO. OF OBS RECS:      155
 TOT. NO. OF INDIVIDUALS:       59
 ONE COMPARTMENT MODEL (ADVAN1)
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 #TBLN:      1
 #METH: First Order Conditional Estimation with Interaction
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
 #TERM:
0MINIMIZATION SUCCESSFUL
 NO. OF FUNCTION EVALUATIONS USED:      109
 NO. OF SIG. DIGITS IN FINAL EST.:  3.7

 ETABAR IS THE ARITHMETIC MEAN OF THE ETA-ESTIMATES,
 AND THE P-VALUE IS GIVEN FOR THE NULL HYPOTHESIS THAT THE TRUE MEAN IS 0.

 ETABAR:         1.6882E-03 -1.1974E-03
 SE:             1.1692E-02  1.8795E-02
 N:                      59          59

 P VAL.:         8.8519E-01  9.4920E-01

 ETASHRINKSD(%)  4.7581E+01  1.3581E+01
 ETASHRINKVR(%)  7.2522E+01  2.5318E+01
 EBVSHRINKSD(%)  4.7738E+01  1.3692E+01
 EBVSHRINKVR(%)  7.2687E+01  2.5509E+01
 RELATIVEINF(%)  2.5952E+01  7.0778E+01
 EPSSHRINKSD(%)  2.1199E+01
 EPSSHRINKVR(%)  3.7903E+01


 TOTAL DATA POINTS NORMALLY DISTRIBUTED (N):          155
 N*LOG(2PI) CONSTANT TO OBJECTIVE FUNCTION:    284.87094529344853
 OBJECTIVE FUNCTION VALUE WITHOUT CONSTANT:    586.27605629815832
 OBJECTIVE FUNCTION VALUE WITH CONSTANT:       871.14700159160680
 REPORTED OBJECTIVE FUNCTION DOES NOT CONTAIN CONSTANT

 TOTAL EFFECTIVE ETAS (NIND*NETA):                           118


 #TERE:
 Elapsed estimation  time in seconds:     0.21

 ********************               FIRST ORDER CONDITIONAL ESTIMATION WITH INTERACTION              ********************
 #OBJT:**************                       MINIMUM VALUE OF OBJECTIVE FUNCTION                      ********************
 #OBJV:********************************************      586.276       **************************************************

 ********************               FIRST ORDER CONDITIONAL ESTIMATION WITH INTERACTION              ********************
 ********************                             FINAL PARAMETER ESTIMATE                           ********************

 THETA - VECTOR OF FIXED EFFECTS PARAMETERS   *********
         TH 1      TH 2      TH 3
         4.70E-03  9.84E-01  1.59E-01

 OMEGA - COV MATRIX FOR RANDOM EFFECTS - ETAS  ********
         ETA1      ETA2
 ETA1
+        2.94E-02
 ETA2
+        0.00E+00  2.79E-02

 SIGMA - COV MATRIX FOR RANDOM EFFECTS - EPSILONS  ****
         EPS1
 EPS1
+        1.32E-02

 OMEGA - CORR MATRIX FOR RANDOM EFFECTS - ETAS  *******
         ETA1      ETA2
 ETA1
+        1.71E-01
 ETA2
+        0.00E+00  1.67E-01

 SIGMA - CORR MATRIX FOR RANDOM EFFECTS - EPSILONS  ***
         EPS1
 EPS1
+        1.15E-01
 #TBLN:      2
 #METH: Stochastic Approximation Expectation-Maximization
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
 #TERM:
 STOCHASTIC PORTION WAS NOT TESTED FOR CONVERGENCE
 REDUCED STOCHASTIC PORTION WAS COMPLETED

 ETABAR IS THE ARITHMETIC MEAN OF THE ETA-ESTIMATES,
 AND THE P-VALUE IS GIVEN FOR THE NULL HYPOTHESIS THAT THE TRUE MEAN IS 0.

 ETABAR:         1.9372E-04 -3.1923E-03
 SE:             1.2980E-02  1.8880E-02
 N:                      59          59

 P VAL.:         9.8809E-01  8.6573E-01

 ETASHRINKSD(%)  4.6226E+01  1.3434E+01
 ETASHRINKVR(%)  7.1084E+01  2.5064E+01
 EBVSHRINKSD(%)  4.6227E+01  1.3409E+01
 EBVSHRINKVR(%)  7.1085E+01  2.5020E+01
 RELATIVEINF(%)  2.7443E+01  7.1163E+01
 EPSSHRINKSD(%)  2.0713E+01
 EPSSHRINKVR(%)  3.7136E+01


 TOTAL DATA POINTS NORMALLY DISTRIBUTED (N):          155
 N*LOG(2PI) CONSTANT TO OBJECTIVE FUNCTION:    284.87094529344853
 OBJECTIVE FUNCTION VALUE WITHOUT CONSTANT:    140.23413919447799
 OBJECTIVE FUNCTION VALUE WITH CONSTANT:       425.10508448792655
 REPORTED OBJECTIVE FUNCTION DOES NOT CONTAIN CONSTANT

 TOTAL EFFECTIVE ETAS (NIND*NETA):                           118
 NIND*NETA*LOG(2PI) CONSTANT TO OBJECTIVE FUNCTION:    216.86949383630275
 OBJECTIVE FUNCTION VALUE WITHOUT CONSTANT:    140.23413919447799
 OBJECTIVE FUNCTION VALUE WITH CONSTANT:       357.10363303078077
 REPORTED OBJECTIVE FUNCTION DOES NOT CONTAIN CONSTANT


 #TERE:
 Elapsed estimation  time in seconds:    11.17

 ********************                STOCHASTIC APPROXIMATION EXPECTATION-MAXIMIZATION               ********************
 #OBJT:**************                        FINAL VALUE OF LIKELIHOOD FUNCTION                      ********************
 #OBJV:********************************************      140.234       **************************************************

 ********************                STOCHASTIC APPROXIMATION EXPECTATION-MAXIMIZATION               ********************
 ********************                             FINAL PARAMETER ESTIMATE                           ********************

 THETA - VECTOR OF FIXED EFFECTS PARAMETERS   *********
         TH 1      TH 2      TH 3
         4.59E-03  9.80E-01  1.52E-01

 OMEGA - COV MATRIX FOR RANDOM EFFECTS - ETAS  ********
         ETA1      ETA2
 ETA1
+        3.44E-02
 ETA2
+        0.00E+00  2.81E-02

 SIGMA - COV MATRIX FOR RANDOM EFFECTS - EPSILONS  ****
         EPS1
 EPS1
+        1.24E-02

 OMEGA - CORR MATRIX FOR RANDOM EFFECTS - ETAS  *******
         ETA1      ETA2
 ETA1
+        1.85E-01
 ETA2
+        0.00E+00  1.68E-01

 SIGMA - CORR MATRIX FOR RANDOM EFFECTS - EPSILONS  ***
         EPS1
 EPS1
+        1.11E-01
 Elapsed postprocess time in seconds:     0.08
 Elapsed finaloutput time in seconds:     0.01
 #CPUT: Total CPU Time in Seconds,       11.507
