$PROBLEM PHENOBARB SIMPLE MODEL
$DATA ../pheno.dta IGNORE=@
$INPUT ID TIME AMT WGT APGR DV FA1 FA2
$SUBROUTINE ADVAN5 TRANS1
$MODEL COMP=(TRANS1 DEFDOSE) COMP=(TRANS2) COMP=(DEPOT) COMP=(CENTRAL) COMP=(PERIPHERAL)

$PK
IF(AMT.GT.0) BTIME=TIME
TAD=TIME-BTIME
TVCL=THETA(1)*WGT
TVV=THETA(2)*WGT
IF(APGR.LT.5) TVV=TVV*(1+THETA(3))
CL=TVCL*EXP(ETA(1))
V=TVV*EXP(ETA(2))
K34=THETA(6)
K40=CL/V
K45=THETA(4)
K54=THETA(5)
K12=THETA(7)
K23=THETA(7)
S4=V

$ERROR
W=F
Y=F+W*EPS(1)
IPRED=F
IRES=DV-IPRED
IWRES=IRES/W

$THETA (0,0.00469307) ; POP_CL
$THETA (0,1.00916) ; POP_V
$THETA (-.99,.1)
$THETA (0,10)
$THETA (0,10)
$THETA (1,10)
$THETA (1,10)
$OMEGA DIAGONAL(2)
 0.0309626  ;       IVCL
 0.031128  ;        IVV

$SIGMA 1e-7
$ESTIMATION METHOD=1 INTERACTION
$COVARIANCE UNCONDITIONAL
$TABLE ID TIME DV AMT WGT APGR IPRED PRED RES TAD CWRES NPDE NOAPPEND
       NOPRINT ONEHEADER FILE=sdtab1
