$PROBLEM PHENOBARB SIMPLE MODEL
$DATA ../pheno.dta IGNORE=@
$INPUT ID TIME AMT WGT APGR DV FA1 FA2
$SUBROUTINE ADVAN11 TRANS4

$PK
IF(AMT.GT.0) BTIME=TIME
TAD=TIME-BTIME
TVCL=THETA(1)*WGT
TVV=THETA(2)*WGT
IF(APGR.LT.5) TVV=TVV*(1+THETA(3))
CL=TVCL*EXP(ETA(1))
V1 = TVV*EXP(ETA(2))
S1 = V1
Q2 = THETA(4)
V2 = THETA(5)
Q3 = THETA(6)
V3 = THETA(7)

$ERROR
W=F
Y=F+W*EPS(1)
IPRED=F
IRES=DV-IPRED
IWRES=IRES/W

$THETA (0,0.00469307) ; POP_CL
$THETA (0,1.00916) ; POP_V
$THETA (-.99,.1)
$THETA (0,0.1) ; POP_Q2
$THETA (0,2) ; POP_V2
$THETA (0,2) ; POP_Q3
$THETA (0,2) ; POP_V3
$OMEGA DIAGONAL(2)
 0.0309626  ;       IVCL
 0.031128  ;        IVV

$SIGMA 1e-7
$ESTIMATION METHOD=1 INTERACTION
$COVARIANCE UNCONDITIONAL
$TABLE ID TIME DV AMT WGT APGR IPRED PRED RES TAD CWRES NPDE NOAPPEND
       NOPRINT ONEHEADER FILE=sdtab1
