$PROBLEM PHENOBARB SIMPLE MODEL
$DATA pheno_zero_order.csv IGNORE=@
$INPUT ID TIME AMT RATE WGT APGR DV FA1 FA2
$SUBROUTINE ADVAN2 TRANS2

$PK
IF(AMT.GT.0) BTIME=TIME
TAD=TIME-BTIME
TVCL=THETA(1)*WGT
TVV=THETA(2)*WGT
IF(APGR.LT.5) TVV=TVV*(1+THETA(3))
CL=TVCL*EXP(ETA(1))
V=TVV*EXP(ETA(2))
S2=V
D1 = THETA(4)
KA = THETA(5)

$ERROR
W=F
Y=F+W*EPS(1)
IPRED=F
IRES=DV-IPRED
IWRES=IRES/W

$THETA (0,0.00469307) ; CL
$THETA (0,1.00916) ; V
$THETA (-.99,.1)
$THETA (0,0.1)
$THETA (0,0.1)
$OMEGA DIAGONAL(2)
 0.0309626  ;       IVCL
 0.031128  ;        IVV

$SIGMA 1e-7
$ESTIMATION METHOD=1 INTERACTION
$COVARIANCE UNCONDITIONAL
$TABLE ID TIME DV AMT WGT APGR IPRED PRED RES TAD CWRES NPDE NOAPPEND
       NOPRINT ONEHEADER FILE=sdtab1
