fre 22 jan 2021 11:15:14 CET
$PROBLEM    MOXONIDINE PK,FINAL ESTIMATES,simulated data
$INPUT      ID VISI XAT2=DROP DGRP DOSE FLAG=DROP ONO=DROP XIME=DROP
            DVO=DROP NEUY SCR AGE SEX NYH=DROP WT DROP ACE DIG DIU
            NUMB=DROP TAD TIME VIDD=DROP CRCL AMT SS II DROP CMT=DROP
            CONO=DROP DV EVID=DROP OVID=DROP
$DATA      mox_simulated.csv IGNORE=@
$SUBROUTINE ADVAN2 TRANS1
$PK
CL = THETA(1)*EXP(ETA(1))
V = THETA(2)*EXP(ETA(2))
KA = THETA(3)*EXP(ETA(3))
K = CL / V
S2 = V

$ERROR
IPRED = LOG(.025)
IF(F.GT.0) IPRED = LOG(F)
Y = IPRED + ERR(1)

$THETA  (0,26.1) ; POP_TVCL
$THETA  (0,100) ; POP_TVV
$THETA  (0,4.5) ; POP_TVKA
$OMEGA  BLOCK(2)
 0.0750  ;     IIV_CL
 0.0467  ;   IIV_CL_V
 0.0564  ;      IIV_V
$OMEGA  BLOCK(1)
 2.82  ;     IIV_KA
$SIGMA  0.109
$ESTIMATION METHOD=1 MAXEVAL=9999
$COVARIANCE

NM-TRAN MESSAGES
 WARNINGS AND ERRORS (IF ANY) FOR PROBLEM    1
 (WARNING  2) NM-TRAN INFERS THAT THE DATA ARE POPULATION.

1NONLINEAR MIXED EFFECTS MODEL PROGRAM (NONMEM) VERSION 7.4.4
 ORIGINALLY DEVELOPED BY STUART BEAL, LEWIS SHEINER, AND ALISON BOECKMANN
 CURRENT DEVELOPERS ARE ROBERT BAUER, ICON DEVELOPMENT SOLUTIONS,
 AND ALISON BOECKMANN. IMPLEMENTATION, EFFICIENCY, AND STANDARDIZATION
 PERFORMED BY NOUS INFOSYSTEMS.
 PROBLEM NO.:         1
 MOXONIDINE PK,FINAL ESTIMATES,simulated data
 TOT. NO. OF OBS RECS:     1022
 TOT. NO. OF INDIVIDUALS:       74
 ONE COMPARTMENT MODEL WITH FIRST-ORDER ABSORPTION (ADVAN2)
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 #TBLN:      1
 #METH: First Order Conditional Estimation
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
 #TERM:
0MINIMIZATION SUCCESSFUL
 NO. OF FUNCTION EVALUATIONS USED:      186
 NO. OF SIG. DIGITS IN FINAL EST.:  3.6

 ETABAR IS THE ARITHMETIC MEAN OF THE ETA-ESTIMATES,
 AND THE P-VALUE IS GIVEN FOR THE NULL HYPOTHESIS THAT THE TRUE MEAN IS 0.

 ETABAR:        -8.4964E-05 -1.5117E-02 -2.0484E-02
 SE:             7.4322E-02  8.6301E-02  3.6456E-02
 N:                      74          74          74

 P VAL.:         9.9909E-01  8.6095E-01  5.7420E-01

 ETASHRINKSD(%)  4.2592E-01  2.3540E+00  3.0793E+01
 ETASHRINKVR(%)  8.5002E-01  4.6526E+00  5.2104E+01
 EBVSHRINKSD(%)  1.1960E+00  2.9034E+00  2.8845E+01
 EBVSHRINKVR(%)  2.3776E+00  5.7226E+00  4.9370E+01
 EPSSHRINKSD(%)  8.7438E+00
 EPSSHRINKVR(%)  1.6723E+01


 TOTAL DATA POINTS NORMALLY DISTRIBUTED (N):         1022
 N*LOG(2PI) CONSTANT TO OBJECTIVE FUNCTION:    1878.3103618703510
 OBJECTIVE FUNCTION VALUE WITHOUT CONSTANT:   -624.52295772483524
 OBJECTIVE FUNCTION VALUE WITH CONSTANT:       1253.7874041455157
 REPORTED OBJECTIVE FUNCTION DOES NOT CONTAIN CONSTANT

 TOTAL EFFECTIVE ETAS (NIND*NETA):                           222


 #TERE:
 Elapsed estimation  time in seconds:     1.31
 Elapsed covariance  time in seconds:     0.82
 Elapsed postprocess time in seconds:     0.00

 ********************                        FIRST ORDER CONDITIONAL ESTIMATION                      ********************
 #OBJT:**************                       MINIMUM VALUE OF OBJECTIVE FUNCTION                      ********************
 #OBJV:********************************************     -624.523       **************************************************

 ********************                        FIRST ORDER CONDITIONAL ESTIMATION                      ********************
 ********************                             FINAL PARAMETER ESTIMATE                           ********************

 THETA - VECTOR OF FIXED EFFECTS PARAMETERS   *********
         TH 1      TH 2      TH 3
         3.28E+01  1.12E+02  1.22E+00

 OMEGA - COV MATRIX FOR RANDOM EFFECTS - ETAS  ********
         ETA1      ETA2      ETA3
 ETA1
+        4.18E-01
 ETA2
+        3.96E-01  5.86E-01
 ETA3
+        0.00E+00  0.00E+00  2.08E-01

 SIGMA - COV MATRIX FOR RANDOM EFFECTS - EPSILONS  ****
         EPS1
 EPS1
+        1.14E-01

 OMEGA - CORR MATRIX FOR RANDOM EFFECTS - ETAS  *******
         ETA1      ETA2      ETA3
 ETA1
+        6.46E-01
 ETA2
+        8.00E-01  7.65E-01
 ETA3
+        0.00E+00  0.00E+00  4.56E-01

 SIGMA - CORR MATRIX FOR RANDOM EFFECTS - EPSILONS  ***
         EPS1
 EPS1
+        3.38E-01

 ********************                        FIRST ORDER CONDITIONAL ESTIMATION                      ********************
 ********************                            STANDARD ERROR OF ESTIMATE                          ********************

 THETA - VECTOR OF FIXED EFFECTS PARAMETERS   *********
         TH 1      TH 2      TH 3
         2.46E+00  1.01E+01  9.35E-02

 OMEGA - COV MATRIX FOR RANDOM EFFECTS - ETAS  ********
         ETA1      ETA2      ETA3
 ETA1
+        7.02E-02
 ETA2
+        8.71E-02  1.21E-01
 ETA3
+       ......... .........  8.88E-02

 SIGMA - COV MATRIX FOR RANDOM EFFECTS - EPSILONS  ****
         EPS1
 EPS1
+        5.87E-03

 OMEGA - CORR MATRIX FOR RANDOM EFFECTS - ETAS  *******
         ETA1      ETA2      ETA3
 ETA1
+        5.43E-02
 ETA2
+        5.04E-02  7.94E-02
 ETA3
+       ......... .........  9.74E-02

 SIGMA - CORR MATRIX FOR RANDOM EFFECTS - EPSILONS  ***
         EPS1
 EPS1
+        8.67E-03

 ********************                        FIRST ORDER CONDITIONAL ESTIMATION                      ********************
 ********************                          COVARIANCE MATRIX OF ESTIMATE                         ********************

            TH 1      TH 2      TH 3      OM11      OM12      OM13      OM22      OM23      OM33      SG11
 TH 1
+        6.07E+00
 TH 2
+        1.84E+01  1.02E+02
 TH 3
+       -7.47E-02 -7.98E-02  8.74E-03
 OM11
+       -1.10E-02  4.64E-02 -5.29E-04  4.93E-03
 OM12
+        1.44E-02  1.96E-01 -3.43E-04  5.53E-03  7.59E-03
 OM13
+       ......... ......... ......... ......... ......... .........
 OM22
+        4.88E-02  4.48E-01  2.87E-04  6.07E-03  9.58E-03 .........  1.48E-02
 OM23
+       ......... ......... ......... ......... ......... ......... ......... .........
 OM33
+        1.63E-02 -5.87E-02 -7.42E-04 -3.43E-04 -1.21E-03 ......... -2.55E-03 .........  7.89E-03
 SG11
+        1.64E-03  4.42E-03 -5.98E-05  4.30E-05  3.01E-05 .........  3.34E-05 ......... -9.51E-05  3.44E-05

 ********************                        FIRST ORDER CONDITIONAL ESTIMATION                      ********************
 ********************                          CORRELATION MATRIX OF ESTIMATE                        ********************

            TH 1      TH 2      TH 3      OM11      OM12      OM13      OM22      OM23      OM33      SG11
 TH 1
+        2.46E+00
 TH 2
+        7.40E-01  1.01E+01
 TH 3
+       -3.24E-01 -8.47E-02  9.35E-02
 OM11
+       -6.36E-02  6.54E-02 -8.06E-02  7.02E-02
 OM12
+        6.69E-02  2.23E-01 -4.21E-02  9.03E-01  8.71E-02
 OM13
+       ......... ......... ......... ......... ......... .........
 OM22
+        1.63E-01  3.65E-01  2.52E-02  7.12E-01  9.05E-01 .........  1.21E-01
 OM23
+       ......... ......... ......... ......... ......... ......... ......... .........
 OM33
+        7.46E-02 -6.56E-02 -8.93E-02 -5.50E-02 -1.57E-01 ......... -2.37E-01 .........  8.88E-02
 SG11
+        1.13E-01  7.47E-02 -1.09E-01  1.04E-01  5.89E-02 .........  4.69E-02 ......... -1.82E-01  5.87E-03
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 Elapsed finaloutput time in seconds:     0.00
 #CPUT: Total CPU Time in Seconds,        2.148
