$PROBLEM MOXONIDINE PK,FINAL ESTIMATES, simulated data
$INPUT ID VISI XAT2=DROP DGRP DOSE FLAG=DROP ONO=DROP
       XIME=DROP DVO=DROP NEUY SCR AGE SEX NYH=DROP WT DROP ACE
       DIG DIU NUMB=DROP TAD TIME VIDD=DROP CRCL AMT SS II DROP
       CMT=DROP CONO=DROP DV EVID=DROP OVID=DROP
$DATA       mox_simulated_log.csv IGNORE=@
$SUBROUTINE ADVAN2 TRANS1
$PK
CL = THETA(1)*EXP(ETA(1))
V = THETA(2)*EXP(ETA(2))
KA = THETA(3)*EXP(ETA(3))
K = CL / V
S2 = V

$ERROR
IPRED = LOG(.025)
IF(F.GT.0) IPRED = LOG(F)
Y = IPRED + ERR(1)

$THETA  (0,26.1) ; POP_TVCL
$THETA  (0,100) ; POP_TVV
$THETA  (0,4.5) ; POP_TVKA
$OMEGA  BLOCK(2)
0.0750  ; IIV_CL
0.0467  ; IIV_CL_V
0.0564  ; IIV_V
$OMEGA  BLOCK(1)
2.82    ; IIV_KA
$SIGMA  0.109

$ESTIMATION METHOD=1 MAXEVAL=9999
$COVARIANCE
