$PROBLEM
$INPUT ID VISI DAT1 DGRP DOSE FLAG ONO XIME DVO NEUY SCR AGE SEX NYHA WT COMP IACE DIG DIU NUMB TAD TIME VID CRCL AMT SS II VID1 CMT=DROP CONO DV EVID OVID SHR SHR2 RATE
$DATA mx19B_ZO.csv IGNORE=@
$SUBROUTINES ADVAN1  TRANS2
$PK
CL = THETA(1) * EXP(ETA(1))
VC = THETA(2) * EXP(ETA(2))
MAT = THETA(3) * EXP(ETA(3))
D1 = 2*MAT
V = VC
$ERROR
CONC = A(1)/VC
Y = CONC + EPS(1) + CONC * EPS(2)
$ESTIMATION METHOD=0
$COVARIANCE PRINT=E
$THETA (0, 10.0, Inf) ; POP_CL
$THETA (0, 100.0, Inf) ; POP_VC
$THETA (0, 3.0, Inf) ; POP_MAT
$OMEGA 0 FIX; IIV_CL
$OMEGA 0 FIX; IIV_VC
$OMEGA 0 FIX; IIV_MAT
$SIGMA 0.1; RUV_ADD
$SIGMA 0.1; RUV_PROP
