fre 13 aug 2021 14:24:19 CEST
$PROBLEM    MOXONIDINE PK,FINAL ESTIMATES,simulated data
$INPUT      ID VISI XAT2=DROP DGRP DOSE FLAG=DROP ONO=DROP XIME=DROP
            DVO=DROP NEUY SCR AGE SEX NYH=DROP WT DROP ACE DIG DIU
            NUMB=DROP TAD TIME VIDD=DROP CRCL AMT SS II DROP CMT=DROP
            CONO=DROP DV EVID=DROP OVID=DROP
$DATA      mox_simulated.csv IGNORE=@
$SUBROUTINE ADVAN3 TRANS1
$PK
K12 = THETA(1)*EXP(ETA(1))
K21 = THETA(2)*EXP(ETA(2))
K   = THETA(3)*EXP(ETA(3))

$ERROR
IPRED = LOG(.025)
IF(F.GT.0) IPRED = LOG(F)
Y = IPRED+ERR(1)

$THETA  (0,2) ; POP_K12
$THETA  (0,20) ; POP_K21
$THETA  (0,4.5) ; POP_K
$OMEGA  0.0750
 0.0564
 0.0564
$SIGMA  0.109
$ESTIMATION METHOD=1 MAXEVAL=9999
$COVARIANCE PRECOND=1 UNCONDITIONAL

NM-TRAN MESSAGES
 WARNINGS AND ERRORS (IF ANY) FOR PROBLEM    1
 (WARNING  2) NM-TRAN INFERS THAT THE DATA ARE POPULATION.

1NONLINEAR MIXED EFFECTS MODEL PROGRAM (NONMEM) VERSION 7.5.0
 ORIGINALLY DEVELOPED BY STUART BEAL, LEWIS SHEINER, AND ALISON BOECKMANN
 CURRENT DEVELOPERS ARE ROBERT BAUER, ICON DEVELOPMENT SOLUTIONS,
 AND ALISON BOECKMANN. IMPLEMENTATION, EFFICIENCY, AND STANDARDIZATION
 PERFORMED BY NOUS INFOSYSTEMS.
 PROBLEM NO.:         1
 MOXONIDINE PK,FINAL ESTIMATES,simulated data
 TOT. NO. OF OBS RECS:     1022
 TOT. NO. OF INDIVIDUALS:       74
 TWO COMPARTMENT MODEL (ADVAN3)
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 #TBLN:      1
 #METH: First Order Conditional Estimation
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
 #TERM:
0MINIMIZATION SUCCESSFUL
 NO. OF FUNCTION EVALUATIONS USED:      383
 NO. OF SIG. DIGITS IN FINAL EST.:  3.6
0PARAMETER ESTIMATE IS NEAR ITS BOUNDARY

 ETABAR IS THE ARITHMETIC MEAN OF THE ETA-ESTIMATES,
 AND THE P-VALUE IS GIVEN FOR THE NULL HYPOTHESIS THAT THE TRUE MEAN IS 0.

 ETABAR:        -1.4918E-07  1.9251E-06  2.4908E-04
 SE:             4.8113E-07  4.1812E-07  3.7046E-03
 N:                      74          74          74

 P VAL.:         7.5652E-01  4.1452E-06  9.4639E-01

 ETASHRINKSD(%)  9.9848E+01  9.9848E+01  7.3799E+01
 ETASHRINKVR(%)  1.0000E+02  1.0000E+02  9.3135E+01
 EBVSHRINKSD(%)  9.9824E+01  9.9808E+01  7.3976E+01
 EBVSHRINKVR(%)  1.0000E+02  1.0000E+02  9.3228E+01
 RELATIVEINF(%)  7.8972E-05  1.7340E-04  1.1570E+00
 EPSSHRINKSD(%)  2.4457E-01
 EPSSHRINKVR(%)  4.8854E-01


 TOTAL DATA POINTS NORMALLY DISTRIBUTED (N):         1022
 N*LOG(2PI) CONSTANT TO OBJECTIVE FUNCTION:    1878.3103618703510
 OBJECTIVE FUNCTION VALUE WITHOUT CONSTANT:    2729.8440792541296
 OBJECTIVE FUNCTION VALUE WITH CONSTANT:       4608.1544411244804
 REPORTED OBJECTIVE FUNCTION DOES NOT CONTAIN CONSTANT

 TOTAL EFFECTIVE ETAS (NIND*NETA):                           222


 #TERE:
 Elapsed estimation  time in seconds:     2.37
 TESTING R MATRIX FOR POSITIVE DEFINITNESS
 R MATRIX IS NOT POSITIVE DEFINITE
 PRECONDITIONING CYCLE NO.            1
0S MATRIX ALGORITHMICALLY SINGULAR
0S MATRIX IS OUTPUT
0INVERSE COVARIANCE MATRIX SET TO RS*RMAT, WHERE S* IS A PSEUDO INVERSE OF S
 Elapsed covariance  time in seconds:     1.04
 Elapsed postprocess time in seconds:     0.00

 ********************                        FIRST ORDER CONDITIONAL ESTIMATION                      ********************
 #OBJT:**************                       MINIMUM VALUE OF OBJECTIVE FUNCTION                      ********************
 #OBJV:********************************************     2729.844       **************************************************

 ********************                        FIRST ORDER CONDITIONAL ESTIMATION                      ********************
 ********************                             FINAL PARAMETER ESTIMATE                           ********************

 THETA - VECTOR OF FIXED EFFECTS PARAMETERS   *********
         TH 1      TH 2      TH 3
         1.09E+01  2.00E-01  1.32E+01

 OMEGA - COV MATRIX FOR RANDOM EFFECTS - ETAS  ********
         ETA1      ETA2      ETA3
 ETA1
+        7.50E-06
 ETA2
+        0.00E+00  5.64E-06
 ETA3
+        0.00E+00  0.00E+00  1.50E-02

 SIGMA - COV MATRIX FOR RANDOM EFFECTS - EPSILONS  ****
         EPS1
 EPS1
+        5.29E+00

 OMEGA - CORR MATRIX FOR RANDOM EFFECTS - ETAS  *******
         ETA1      ETA2      ETA3
 ETA1
+        2.74E-03
 ETA2
+        0.00E+00  2.37E-03
 ETA3
+        0.00E+00  0.00E+00  1.22E-01

 SIGMA - CORR MATRIX FOR RANDOM EFFECTS - EPSILONS  ***
         EPS1
 EPS1
+        2.30E+00

 ********************                        FIRST ORDER CONDITIONAL ESTIMATION                      ********************
 ********************                            STANDARD ERROR OF ESTIMATE                          ********************

 THETA - VECTOR OF FIXED EFFECTS PARAMETERS   *********
         TH 1      TH 2      TH 3
         9.92E-01  0.00E+00  7.98E-01

 OMEGA - COV MATRIX FOR RANDOM EFFECTS - ETAS  ********
         ETA1      ETA2      ETA3
 ETA1
+        0.00E+00
 ETA2
+       .........  0.00E+00
 ETA3
+       ......... .........  3.76E-02

 SIGMA - COV MATRIX FOR RANDOM EFFECTS - EPSILONS  ****
         EPS1
 EPS1
+        3.07E-01

 OMEGA - CORR MATRIX FOR RANDOM EFFECTS - ETAS  *******
         ETA1      ETA2      ETA3
 ETA1
+        0.00E+00
 ETA2
+       .........  0.00E+00
 ETA3
+       ......... .........  1.54E-01

 SIGMA - CORR MATRIX FOR RANDOM EFFECTS - EPSILONS  ***
         EPS1
 EPS1
+        6.67E-02

 ********************                        FIRST ORDER CONDITIONAL ESTIMATION                      ********************
 ********************                          COVARIANCE MATRIX OF ESTIMATE                         ********************

            TH 1      TH 2      TH 3      OM11      OM12      OM13      OM22      OM23      OM33      SG11
 TH 1
+        9.85E-01
 TH 2
+        0.00E+00  0.00E+00
 TH 3
+        3.68E-01  0.00E+00  6.37E-01
 OM11
+        0.00E+00  0.00E+00  0.00E+00  0.00E+00
 OM12
+       ......... ......... ......... ......... .........
 OM13
+       ......... ......... ......... ......... ......... .........
 OM22
+        0.00E+00  0.00E+00  0.00E+00  0.00E+00 ......... .........  0.00E+00
 OM23
+       ......... ......... ......... ......... ......... ......... ......... .........
 OM33
+        3.54E-03  0.00E+00 -2.84E-03  0.00E+00 ......... .........  0.00E+00 .........  1.42E-03
 SG11
+       -7.97E-02  0.00E+00  6.07E-02  0.00E+00 ......... .........  0.00E+00 ......... -3.40E-03  9.43E-02

 ********************                        FIRST ORDER CONDITIONAL ESTIMATION                      ********************
 ********************                          CORRELATION MATRIX OF ESTIMATE                        ********************

            TH 1      TH 2      TH 3      OM11      OM12      OM13      OM22      OM23      OM33      SG11
 TH 1
+        9.92E-01
 TH 2
+        0.00E+00  0.00E+00
 TH 3
+        4.65E-01  0.00E+00  7.98E-01
 OM11
+        0.00E+00  0.00E+00  0.00E+00  0.00E+00
 OM12
+       ......... ......... ......... ......... .........
 OM13
+       ......... ......... ......... ......... ......... .........
 OM22
+        0.00E+00  0.00E+00  0.00E+00  0.00E+00 ......... .........  0.00E+00
 OM23
+       ......... ......... ......... ......... ......... ......... ......... .........
 OM33
+        9.49E-02  0.00E+00 -9.46E-02  0.00E+00 ......... .........  0.00E+00 .........  3.76E-02
 SG11
+       -2.61E-01  0.00E+00  2.48E-01  0.00E+00 ......... .........  0.00E+00 ......... -2.94E-01  3.07E-01
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 Elapsed finaloutput time in seconds:     0.00
 #CPUT: Total CPU Time in Seconds,        3.541
