mån 11 sep 2023 08:36:31 CEST
$PROBLEM    PHENOBARB SIMPLE MODEL
$INPUT      ID TIME AMT WGT APGR DV
$DATA      pheno5.csv IGNORE=@
$SUBROUTINE ADVAN1 TRANS2
$PK
CL=THETA(1)*EXP(ETA(1))
VC=THETA(2)*EXP(ETA(2))
V=VC
S1=VC

$ERROR
CONC=A(1)/VC
Y=CONC+CONC*EPS(1)

$THETA  (0,0.00469307) ; POP_CL
$THETA  (0,1.00916) ; POP_V
$OMEGA  0.0309626  ;       IVCL
$OMEGA  0.031128  ;        IVV
$SIGMA  0.013241
$ESTIMATION METHOD=1 MAXEVAL=99999 INTERACTION
$COVARIANCE
$TABLE      ID TIME DV PRED NOAPPEND FILE=sdtab_pheno

NM-TRAN MESSAGES
 WARNINGS AND ERRORS (IF ANY) FOR PROBLEM    1
 (WARNING  2) NM-TRAN INFERS THAT THE DATA ARE POPULATION.

1NONLINEAR MIXED EFFECTS MODEL PROGRAM (NONMEM) VERSION 7.5.0
 ORIGINALLY DEVELOPED BY STUART BEAL, LEWIS SHEINER, AND ALISON BOECKMANN
 CURRENT DEVELOPERS ARE ROBERT BAUER, ICON DEVELOPMENT SOLUTIONS,
 AND ALISON BOECKMANN. IMPLEMENTATION, EFFICIENCY, AND STANDARDIZATION
 PERFORMED BY NOUS INFOSYSTEMS.
 PROBLEM NO.:         1
 PHENOBARB SIMPLE MODEL
 TOT. NO. OF OBS RECS:       14
 TOT. NO. OF INDIVIDUALS:        5
 ONE COMPARTMENT MODEL (ADVAN1)
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 #TBLN:      1
 #METH: First Order Conditional Estimation with Interaction
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
 #TERM:
0MINIMIZATION SUCCESSFUL
 NO. OF FUNCTION EVALUATIONS USED:      105
 NO. OF SIG. DIGITS IN FINAL EST.:  3.2

 ETABAR IS THE ARITHMETIC MEAN OF THE ETA-ESTIMATES,
 AND THE P-VALUE IS GIVEN FOR THE NULL HYPOTHESIS THAT THE TRUE MEAN IS 0.

 ETABAR:         4.1367E-02 -9.4689E-03
 SE:             1.6671E-01  1.0419E-01
 N:                       5           5

 P VAL.:         8.0403E-01  9.2759E-01

 ETASHRINKSD(%)  8.2793E+00  1.0000E-10
 ETASHRINKVR(%)  1.5873E+01  1.0000E-10
 EBVSHRINKSD(%)  1.9126E+01  4.9860E+00
 EBVSHRINKVR(%)  3.4594E+01  9.7234E+00
 RELATIVEINF(%)  6.4331E+01  8.8792E+01
 EPSSHRINKSD(%)  3.3146E+01
 EPSSHRINKVR(%)  5.5306E+01


 TOTAL DATA POINTS NORMALLY DISTRIBUTED (N):           14
 N*LOG(2PI) CONSTANT TO OBJECTIVE FUNCTION:    25.730278929730837
 OBJECTIVE FUNCTION VALUE WITHOUT CONSTANT:    51.789038703434535
 OBJECTIVE FUNCTION VALUE WITH CONSTANT:       77.519317633165372
 REPORTED OBJECTIVE FUNCTION DOES NOT CONTAIN CONSTANT

 TOTAL EFFECTIVE ETAS (NIND*NETA):                            10


 #TERE:
 Elapsed estimation  time in seconds:     0.03
 Elapsed covariance  time in seconds:     0.02
 Elapsed postprocess time in seconds:     0.01

 ********************               FIRST ORDER CONDITIONAL ESTIMATION WITH INTERACTION              ********************
 #OBJT:**************                       MINIMUM VALUE OF OBJECTIVE FUNCTION                      ********************
 #OBJV:********************************************       51.789       **************************************************

 ********************               FIRST ORDER CONDITIONAL ESTIMATION WITH INTERACTION              ********************
 ********************                             FINAL PARAMETER ESTIMATE                           ********************

 THETA - VECTOR OF FIXED EFFECTS PARAMETERS   *********
         TH 1      TH 2
         5.39E-03  1.43E+00

 OMEGA - COV MATRIX FOR RANDOM EFFECTS - ETAS  ********
         ETA1      ETA2
 ETA1
+        2.06E-01
 ETA2
+        0.00E+00  6.09E-02

 SIGMA - COV MATRIX FOR RANDOM EFFECTS - EPSILONS  ****
         EPS1
 EPS1
+        8.29E-03

 OMEGA - CORR MATRIX FOR RANDOM EFFECTS - ETAS  *******
         ETA1      ETA2
 ETA1
+        4.54E-01
 ETA2
+        0.00E+00  2.47E-01

 SIGMA - CORR MATRIX FOR RANDOM EFFECTS - EPSILONS  ***
         EPS1
 EPS1
+        9.11E-02

 ********************               FIRST ORDER CONDITIONAL ESTIMATION WITH INTERACTION              ********************
 ********************                            STANDARD ERROR OF ESTIMATE                          ********************

 THETA - VECTOR OF FIXED EFFECTS PARAMETERS   *********
         TH 1      TH 2
         1.31E-03  1.52E-01

 OMEGA - COV MATRIX FOR RANDOM EFFECTS - ETAS  ********
         ETA1      ETA2
 ETA1
+        6.31E-02
 ETA2
+       .........  3.54E-02

 SIGMA - COV MATRIX FOR RANDOM EFFECTS - EPSILONS  ****
         EPS1
 EPS1
+        2.60E-03

 OMEGA - CORR MATRIX FOR RANDOM EFFECTS - ETAS  *******
         ETA1      ETA2
 ETA1
+        6.95E-02
 ETA2
+       .........  7.17E-02

 SIGMA - CORR MATRIX FOR RANDOM EFFECTS - EPSILONS  ***
         EPS1
 EPS1
+        1.43E-02

 ********************               FIRST ORDER CONDITIONAL ESTIMATION WITH INTERACTION              ********************
 ********************                          COVARIANCE MATRIX OF ESTIMATE                         ********************

            TH 1      TH 2      OM11      OM12      OM22      SG11
 TH 1
+        1.72E-06
 TH 2
+        1.23E-04  2.31E-02
 OM11
+       -3.09E-05  2.80E-03  3.98E-03
 OM12
+       ......... ......... ......... .........
 OM22
+       -8.10E-07 -3.60E-03 -1.32E-03 .........  1.25E-03
 SG11
+       -7.60E-07  1.34E-04  1.60E-04 ......... -5.70E-05  6.78E-06

 ********************               FIRST ORDER CONDITIONAL ESTIMATION WITH INTERACTION              ********************
 ********************                          CORRELATION MATRIX OF ESTIMATE                        ********************

            TH 1      TH 2      OM11      OM12      OM22      SG11
 TH 1
+        1.31E-03
 TH 2
+        6.20E-01  1.52E-01
 OM11
+       -3.74E-01  2.91E-01  6.31E-02
 OM12
+       ......... ......... ......... .........
 OM22
+       -1.75E-02 -6.70E-01 -5.92E-01 .........  3.54E-02
 SG11
+       -2.23E-01  3.39E-01  9.73E-01 ......... -6.18E-01  2.60E-03
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 Elapsed finaloutput time in seconds:     0.00
 #CPUT: Total CPU Time in Seconds,        0.076
