$PROBLEM PHENOBARB SIMPLE MODEL

$INPUT ID TIME AMT WGT APGR DV
$DATA pheno5.csv IGNORE=@

$SUBROUTINE ADVAN1 TRANS2

$PK
CL=THETA(1)*EXP(ETA(1))
VC=THETA(2)*EXP(ETA(2))
V=VC
S1=VC

$ERROR
CONC=A(1)/VC
Y=CONC+CONC*EPS(1)

$THETA (0,0.00469307) ; POP_CL
$THETA (0,1.00916) ; POP_V
$OMEGA 0.0309626 ; IVCL
$OMEGA 0.031128  ; IVV
$SIGMA 0.013241


$ESTIMATION METHOD=1 MAXEVAL=99999 INTERACTION
$COV

$TABLE ID TIME DV PRED NOAPPEND FILE=sdtab_pheno
