ons 15 dec 2021 14:16:46 CET
$PROBLEM    PHENOBARB SIMPLE MODEL
$DATA      pheno.dta IGNORE=@
$INPUT      ID TIME AMT WGT APGR DV
$SUBROUTINE ADVAN3 TRANS1
$PK
K=THETA(1)*EXP(ETA(1))
K12=THETA(2)*EXP(ETA(2))
K21=THETA(3)*EXP(ETA(3))
$ERROR
Y=F+F*EPS(1)
$THETA  (0,0.00499295) ; POP_K
$THETA  (0,0.166672) ; POP_K12
$THETA  (0,0.446654) ; POP_K21
$OMEGA  0.214263  ;        IVK
$OMEGA  1.90709  ;      IVK12
$OMEGA  3.2795E-05  ;      IVK21
$SIGMA  0.0269087
$ESTIMATION METHOD=1 INTERACTION

NM-TRAN MESSAGES
 WARNINGS AND ERRORS (IF ANY) FOR PROBLEM    1
 (WARNING  2) NM-TRAN INFERS THAT THE DATA ARE POPULATION.

1NONLINEAR MIXED EFFECTS MODEL PROGRAM (NONMEM) VERSION 7.5.0
 ORIGINALLY DEVELOPED BY STUART BEAL, LEWIS SHEINER, AND ALISON BOECKMANN
 CURRENT DEVELOPERS ARE ROBERT BAUER, ICON DEVELOPMENT SOLUTIONS,
 AND ALISON BOECKMANN. IMPLEMENTATION, EFFICIENCY, AND STANDARDIZATION
 PERFORMED BY NOUS INFOSYSTEMS.
 PROBLEM NO.:         1
 PHENOBARB SIMPLE MODEL
 TOT. NO. OF OBS RECS:      155
 TOT. NO. OF INDIVIDUALS:       59
 TWO COMPARTMENT MODEL (ADVAN3)
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 #TBLN:      1
 #METH: First Order Conditional Estimation with Interaction
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
 #TERM:
0MINIMIZATION SUCCESSFUL
 HOWEVER, PROBLEMS OCCURRED WITH THE MINIMIZATION.
 REGARD THE RESULTS OF THE ESTIMATION STEP CAREFULLY, AND ACCEPT THEM ONLY
 AFTER CHECKING THAT THE COVARIANCE STEP PRODUCES REASONABLE OUTPUT.
 NO. OF FUNCTION EVALUATIONS USED:      198
 NO. OF SIG. DIGITS IN FINAL EST.:  3.0

 ETABAR IS THE ARITHMETIC MEAN OF THE ETA-ESTIMATES,
 AND THE P-VALUE IS GIVEN FOR THE NULL HYPOTHESIS THAT THE TRUE MEAN IS 0.

 ETABAR:        -1.0238E-02  1.1281E-01 -7.3651E-07
 SE:             3.5567E-02  1.5161E-01  3.0614E-06
 N:                      59          59          59

 P VAL.:         7.7346E-01  4.5683E-01  8.0988E-01

 ETASHRINKSD(%)  4.0478E+01  1.4943E+01  9.9586E+01
 ETASHRINKVR(%)  6.4571E+01  2.7653E+01  9.9998E+01
 EBVSHRINKSD(%)  4.2119E+01  1.2591E+01  9.9566E+01
 EBVSHRINKVR(%)  6.6498E+01  2.3597E+01  9.9998E+01
 RELATIVEINF(%)  2.8291E+01  4.2736E+01  9.3195E-04
 EPSSHRINKSD(%)  1.9490E+01
 EPSSHRINKVR(%)  3.5182E+01


 TOTAL DATA POINTS NORMALLY DISTRIBUTED (N):          155
 N*LOG(2PI) CONSTANT TO OBJECTIVE FUNCTION:    284.87094529344853
 OBJECTIVE FUNCTION VALUE WITHOUT CONSTANT:    753.85817028137376
 OBJECTIVE FUNCTION VALUE WITH CONSTANT:       1038.7291155748223
 REPORTED OBJECTIVE FUNCTION DOES NOT CONTAIN CONSTANT

 TOTAL EFFECTIVE ETAS (NIND*NETA):                           177


 #TERE:
 Elapsed estimation  time in seconds:     1.26
 Elapsed postprocess time in seconds:     0.00

 ********************               FIRST ORDER CONDITIONAL ESTIMATION WITH INTERACTION              ********************
 #OBJT:**************                       MINIMUM VALUE OF OBJECTIVE FUNCTION                      ********************
 #OBJV:********************************************      753.858       **************************************************

 ********************               FIRST ORDER CONDITIONAL ESTIMATION WITH INTERACTION              ********************
 ********************                             FINAL PARAMETER ESTIMATE                           ********************

 THETA - VECTOR OF FIXED EFFECTS PARAMETERS   *********
         TH 1      TH 2      TH 3
         4.99E-03  1.67E-01  4.47E-01

 OMEGA - COV MATRIX FOR RANDOM EFFECTS - ETAS  ********
         ETA1      ETA2      ETA3
 ETA1
+        2.14E-01
 ETA2
+        0.00E+00  1.91E+00
 ETA3
+        0.00E+00  0.00E+00  3.27E-05

 SIGMA - COV MATRIX FOR RANDOM EFFECTS - EPSILONS  ****
         EPS1
 EPS1
+        2.69E-02

 OMEGA - CORR MATRIX FOR RANDOM EFFECTS - ETAS  *******
         ETA1      ETA2      ETA3
 ETA1
+        4.63E-01
 ETA2
+        0.00E+00  1.38E+00
 ETA3
+        0.00E+00  0.00E+00  5.72E-03

 SIGMA - CORR MATRIX FOR RANDOM EFFECTS - EPSILONS  ***
         EPS1
 EPS1
+        1.64E-01
 Elapsed finaloutput time in seconds:     0.00
 #CPUT: Total CPU Time in Seconds,        1.320
