$PROBLEM PHENOBARB SIMPLE MODEL
$DATA pheno.dta IGNORE=@
$INPUT ID TIME AMT WGT APGR DV FA1 FA2
$SUBROUTINE ADVAN13 TOL=9
$MODEL COMP=(CENTRAL)

$PK
CL = THETA(1)*EXP(ETA(1))
VC = THETA(2)*EXP(ETA(2))
V = VC

$DES
KE = CL / VC
EXTRA = 2 * A(1)
DADT(1) = -KE * A(1) + EXTRA

$ERROR
CONC = A(1) / VC
Y = CONC + CONC*EPS(1)

$THETA (0,0.00469307) ; POP_CL
$THETA  (0,1.00916) ; POP_V
$OMEGA  DIAGONAL(2)
0.0309626  ; IVCL
0.031128  ; IVV
$SIGMA  0.0130865
$ESTIMATION METHOD=1 INTERACTION PRINT=1 MAXEVAL=0
$TABLE ID TIME DV PRED NOAPPEND FILE=sdtab_pheno_des
