ons  3 jan 2024 14:51:07 CET
$PROBLEM    PHENOBARB SIMPLE MODEL
$INPUT      ID TIME AMT WGT APGR DV
$DATA      pheno.dta IGNORE=@
$SUBROUTINE ADVAN1 TRANS2
$PK
MU_1=LOG(THETA(1))
MU_2=LOG(THETA(2))
CL=EXP(MU_1+ETA(1))
VC=EXP(MU_2+ETA(2))
V=VC

$ERROR
CONC=A(1)/VC
Y=CONC+CONC*EPS(1)

$THETA  (0,0.00469307) ; POP_CL
$THETA  (0,1.00916) ; POP_V
$OMEGA  0.0309626  ;       IVCL
$OMEGA  0.031128  ;        IVV
$SIGMA  0.013241
$ESTIMATION METHOD=1 MAXEVAL=99999 INTERACTION MSFO=my.msf

$PROBLEM
$INPUT      ID TIME AMT WGT APGR DV
$DATA      pheno.dta IGNORE=@ REWIND
$MSFI      my.msf
$ESTIMATION METHOD=IMP EONLY=1 ISAMPLE=100
$COVARIANCE UNCONDITIONAL

NM-TRAN MESSAGES
 WARNINGS AND ERRORS (IF ANY) FOR PROBLEM    1
 (WARNING  2) NM-TRAN INFERS THAT THE DATA ARE POPULATION.
 (WARNING  23) $PK DOES NOT DEFINE A SCALE PARAMETER FOR THE CENTRAL
 COMPARTMENT.  WITH THIS TRANS, IT MAY NOT BE POSSIBLE TO SEPARATELY
 OBTAIN ESTIMATES OF PARAMETERS AFFECTING CLEARANCE AND VOLUME.
 WARNINGS AND ERRORS (IF ANY) FOR PROBLEM    2
 (WARNING  2) NM-TRAN INFERS THAT THE DATA ARE POPULATION.

1NONLINEAR MIXED EFFECTS MODEL PROGRAM (NONMEM) VERSION 7.5.0
 ORIGINALLY DEVELOPED BY STUART BEAL, LEWIS SHEINER, AND ALISON BOECKMANN
 CURRENT DEVELOPERS ARE ROBERT BAUER, ICON DEVELOPMENT SOLUTIONS,
 AND ALISON BOECKMANN. IMPLEMENTATION, EFFICIENCY, AND STANDARDIZATION
 PERFORMED BY NOUS INFOSYSTEMS.
 PROBLEM NO.:         1
 PHENOBARB SIMPLE MODEL
 TOT. NO. OF OBS RECS:      155
 TOT. NO. OF INDIVIDUALS:       59
 ONE COMPARTMENT MODEL (ADVAN1)
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 #TBLN:      1
 #METH: First Order Conditional Estimation with Interaction
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
 #TERM:
0MINIMIZATION SUCCESSFUL
 NO. OF FUNCTION EVALUATIONS USED:      118
 NO. OF SIG. DIGITS IN FINAL EST.:  3.1

 ETABAR IS THE ARITHMETIC MEAN OF THE ETA-ESTIMATES,
 AND THE P-VALUE IS GIVEN FOR THE NULL HYPOTHESIS THAT THE TRUE MEAN IS 0.

 ETABAR:         1.0293E-02 -4.4099E-03
 SE:             2.7296E-02  5.6804E-02
 N:                      59          59

 P VAL.:         7.0612E-01  9.3812E-01

 ETASHRINKSD(%)  3.6544E+01  1.9725E+00
 ETASHRINKVR(%)  5.9734E+01  3.9062E+00
 EBVSHRINKSD(%)  3.7728E+01  3.0279E+00
 EBVSHRINKVR(%)  6.1222E+01  5.9641E+00
 RELATIVEINF(%)  3.8339E+01  9.2971E+01
 EPSSHRINKSD(%)  2.8942E+01
 EPSSHRINKVR(%)  4.9508E+01


 TOTAL DATA POINTS NORMALLY DISTRIBUTED (N):          155
 N*LOG(2PI) CONSTANT TO OBJECTIVE FUNCTION:    284.87094529344853
 OBJECTIVE FUNCTION VALUE WITHOUT CONSTANT:    730.89472681501240
 OBJECTIVE FUNCTION VALUE WITH CONSTANT:       1015.7656721084609
 REPORTED OBJECTIVE FUNCTION DOES NOT CONTAIN CONSTANT

 TOTAL EFFECTIVE ETAS (NIND*NETA):                           118


 #TERE:
 Elapsed estimation  time in seconds:     0.38
 Elapsed postprocess time in seconds:     0.00

 ********************               FIRST ORDER CONDITIONAL ESTIMATION WITH INTERACTION              ********************
 #OBJT:**************                       MINIMUM VALUE OF OBJECTIVE FUNCTION                      ********************
 #OBJV:********************************************      730.895       **************************************************

 ********************               FIRST ORDER CONDITIONAL ESTIMATION WITH INTERACTION              ********************
 ********************                             FINAL PARAMETER ESTIMATE                           ********************

 THETA - VECTOR OF FIXED EFFECTS PARAMETERS   *********
         TH 1      TH 2
         5.82E-03  1.45E+00

 OMEGA - COV MATRIX FOR RANDOM EFFECTS - ETAS  ********
         ETA1      ETA2
 ETA1
+        1.11E-01
 ETA2
+        0.00E+00  2.02E-01

 SIGMA - COV MATRIX FOR RANDOM EFFECTS - EPSILONS  ****
         EPS1
 EPS1
+        1.64E-02

 OMEGA - CORR MATRIX FOR RANDOM EFFECTS - ETAS  *******
         ETA1      ETA2
 ETA1
+        3.33E-01
 ETA2
+        0.00E+00  4.49E-01

 SIGMA - CORR MATRIX FOR RANDOM EFFECTS - EPSILONS  ***
         EPS1
 EPS1
+        1.28E-01
 Elapsed finaloutput time in seconds:     0.00

 PROBLEM NO.:         2

 TOT. NO. OF OBS RECS:      155
 TOT. NO. OF INDIVIDUALS:       59
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 #TBLN:      2
 #METH: Objective Function Evaluation by Importance Sampling
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
 #TERM:
 EXPECTATION ONLY PROCESS WAS NOT TESTED FOR CONVERGENCE


 ETABAR IS THE ARITHMETIC MEAN OF THE ETA-ESTIMATES,
 AND THE P-VALUE IS GIVEN FOR THE NULL HYPOTHESIS THAT THE TRUE MEAN IS 0.

 ETABAR:        -6.6066E-04 -1.3675E-02
 SE:             3.6063E-02  5.7302E-02
 N:                      59          59

 P VAL.:         9.8538E-01  8.1138E-01

 ETASHRINKSD(%)  1.6163E+01  1.1131E+00
 ETASHRINKVR(%)  2.9714E+01  2.2139E+00
 EBVSHRINKSD(%)  3.5715E+01  2.2592E+00
 EBVSHRINKVR(%)  5.8674E+01  4.4674E+00
 RELATIVEINF(%)  4.0970E+01  9.4711E+01
 EPSSHRINKSD(%)  2.5667E+01
 EPSSHRINKVR(%)  4.4746E+01


 TOTAL DATA POINTS NORMALLY DISTRIBUTED (N):          155
 N*LOG(2PI) CONSTANT TO OBJECTIVE FUNCTION:    284.87094529344853
 OBJECTIVE FUNCTION VALUE WITHOUT CONSTANT:    735.47457331895100
 OBJECTIVE FUNCTION VALUE WITH CONSTANT:       1020.3455186123995
 REPORTED OBJECTIVE FUNCTION DOES NOT CONTAIN CONSTANT

 TOTAL EFFECTIVE ETAS (NIND*NETA):                           118


 #TERE:
 Elapsed estimation  time in seconds:     1.18
 Elapsed covariance  time in seconds:     0.03

 ********************               OBJECTIVE FUNCTION EVALUATION BY IMPORTANCE SAMPLING             ********************
 #OBJT:**************                        FINAL VALUE OF OBJECTIVE FUNCTION                       ********************
 #OBJV:********************************************      735.475       **************************************************

 ********************               OBJECTIVE FUNCTION EVALUATION BY IMPORTANCE SAMPLING             ********************
 ********************                             FINAL PARAMETER ESTIMATE                           ********************

 THETA - VECTOR OF FIXED EFFECTS PARAMETERS   *********
         TH 1      TH 2
         5.82E-03  1.45E+00

 OMEGA - COV MATRIX FOR RANDOM EFFECTS - ETAS  ********
         ETA1      ETA2
 ETA1
+        1.11E-01
 ETA2
+        0.00E+00  2.02E-01

 SIGMA - COV MATRIX FOR RANDOM EFFECTS - EPSILONS  ****
         EPS1
 EPS1
+        1.64E-02

 OMEGA - CORR MATRIX FOR RANDOM EFFECTS - ETAS  *******
         ETA1      ETA2
 ETA1
+        3.33E-01
 ETA2
+        0.00E+00  4.49E-01

 SIGMA - CORR MATRIX FOR RANDOM EFFECTS - EPSILONS  ***
         EPS1
 EPS1
+        1.28E-01

 ********************               OBJECTIVE FUNCTION EVALUATION BY IMPORTANCE SAMPLING             ********************
 ********************                         STANDARD ERROR OF ESTIMATE (RSR)                       ********************

 THETA - VECTOR OF FIXED EFFECTS PARAMETERS   *********
         TH 1      TH 2
         5.01E-04  8.84E-02

 OMEGA - COV MATRIX FOR RANDOM EFFECTS - ETAS  ********
         ETA1      ETA2
 ETA1
+        1.89E-02
 ETA2
+        0.00E+00  1.01E-01

 SIGMA - COV MATRIX FOR RANDOM EFFECTS - EPSILONS  ****
         EPS1
 EPS1
+        3.43E-03

 OMEGA - CORR MATRIX FOR RANDOM EFFECTS - ETAS  *******
         ETA1      ETA2
 ETA1
+        2.83E-02
 ETA2
+       .........  1.12E-01

 SIGMA - CORR MATRIX FOR RANDOM EFFECTS - EPSILONS  ***
         EPS1
 EPS1
+        1.34E-02

 ********************               OBJECTIVE FUNCTION EVALUATION BY IMPORTANCE SAMPLING             ********************
 ********************                       COVARIANCE MATRIX OF ESTIMATE (RSR)                      ********************

            TH 1      TH 2      OM11      OM12      OM22      SG11
 TH 1
+        2.51E-07
 TH 2
+        1.54E-05  7.81E-03
 OM11
+        1.58E-07 -3.63E-04  3.56E-04
 OM12
+       ......... ......... ......... .........
 OM22
+        3.31E-06  5.19E-03 -1.07E-03  0.00E+00  1.02E-02
 SG11
+       -5.61E-07  5.54E-05 -8.80E-07  0.00E+00  1.65E-04  1.18E-05

 ********************               OBJECTIVE FUNCTION EVALUATION BY IMPORTANCE SAMPLING             ********************
 ********************                       CORRELATION MATRIX OF ESTIMATE (RSR)                     ********************

            TH 1      TH 2      OM11      OM12      OM22      SG11
 TH 1
+        5.01E-04
 TH 2
+        3.48E-01  8.84E-02
 OM11
+        1.67E-02 -2.18E-01  1.89E-02
 OM12
+       ......... ......... ......... .........
 OM22
+        6.56E-02  5.83E-01 -5.62E-01  0.00E+00  1.01E-01
 SG11
+       -3.26E-01  1.83E-01 -1.36E-02  0.00E+00  4.76E-01  3.43E-03
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 Elapsed postprocess time in seconds:     0.00
 Elapsed finaloutput time in seconds:     0.00
 #CPUT: Total CPU Time in Seconds,        1.679
