$PROBLEM PHENOBARB SIMPLE MODEL

$INPUT ID TIME AMT WGT APGR DV
$DATA pheno.dta IGNORE=@

$SUBROUTINE ADVAN1 TRANS2

$PK
MU_1=LOG(THETA(1))
MU_2=LOG(THETA(2))
CL=EXP(MU_1+ETA(1))
VC=EXP(MU_2+ETA(2))
V=VC

$ERROR
CONC=A(1)/VC
Y=CONC+CONC*EPS(1)

$THETA (0,0.00469307) ; POP_CL
$THETA (0,1.00916) ; POP_V
$OMEGA 0.0309626 ; IVCL
$OMEGA 0.031128  ; IVV
$SIGMA 0.013241


$ESTIMATION METHOD=1 MAXEVAL=99999 INTERACTION MSFO=my.msf


$PROBLEM

$INPUT ID TIME AMT WGT APGR DV
$DATA pheno.dta REWIND IGNORE=@
$MSFI my.msf
$ESTIMATION METHOD=IMP EONLY=1 ISAMPLE=100
$COV UNCONDITIONAL
