$PROBLEM PHENOBARB SIMPLE MODEL
$DATA pheno.dta IGNORE=@
$INPUT ID TIME AMT WGT APGR DV
$SUBROUTINE ADVAN1 TRANS1
$PK
K=THETA(1)*EXP(ETA(1))
$ERROR
Y=F+F*EPS(1)
$THETA  (0,0.00889354) ; POP_K
$OMEGA  0.32795  ;        IVK
$SIGMA  0.0814813
$ESTIMATION METHOD=1 INTERACTION
