$PROBLEM PHENOBARB SIMPLE MODEL
$DATA pheno.dta IGNORE=@
$INPUT ID TIME AMT WGT APGR DV
$SUBROUTINE ADVAN1 TRANS2

$ABBR REPLACE THETA(CL)=THETA(1)
$ABBR REPLACE THETA(V)=THETA(2)
$ABBR REPLACE ETA(CL)=ETA(1)
$ABBR REPLACE ETA(V)=ETA(2)

$PK
CL=THETA(CL)*EXP(ETA(CL))
V=THETA(V)*EXP(ETA(V))
S1=V

$ERROR
Y=F+F*EPS(1)

$THETA (0,0.00469307) ; TVCL
$THETA (0,1.00916) ; TVV
$OMEGA 0.0309626  ; IVCL
$OMEGA 0.031128  ; IVV
$SIGMA 0.013241

$ESTIMATION METHOD=1 INTERACTION
