Fri Sep 22 13:17:07 CEST 2023
$PROBLEM    PHENOBARB SIMPLE MODEL
$DATA      pheno.dta IGNORE=@
$INPUT      ID TIME AMT WGT APGR DV
$SUBROUTINE ADVAN1 TRANS2
$PK
CL=THETA(1)*EXP(ETA(1))
V=THETA(2)*EXP(ETA(2))
S1=V

$ERROR
Y=F+F*EPS(1)

$THETA  (0,0.00469307) ; TVCL
$THETA  (0,1.00916) ; TVV
$OMEGA  0.0309626  ;       IVCL
$OMEGA  0.031128  ;        IVV
$SIGMA  0.013241
$ESTIMATION METHOD=1 INTERACTION MSFO=pheno_design.msf

$PROBLEM    DESIGN
$DATA      pheno.dta IGNORE=@ REWIND
$INPUT      ID TIME AMT WGT APGR DV
$MSFI      pheno_design.msf
$DESIGN     APPROX=FO FIMDIAG=1 GROUPSIZE=1 OFVTYPE=1

NM-TRAN MESSAGES
 WARNINGS AND ERRORS (IF ANY) FOR PROBLEM    1
 (WARNING  2) NM-TRAN INFERS THAT THE DATA ARE POPULATION.
 WARNINGS AND ERRORS (IF ANY) FOR PROBLEM    2
 (WARNING  2) NM-TRAN INFERS THAT THE DATA ARE POPULATION.
Note: Analytical 2nd Derivatives are constructed in FSUBS but are never used.
      You may insert $ABBR DERIV2=NO after the first $PROB to save FSUBS construction and compilation time

1NONLINEAR MIXED EFFECTS MODEL PROGRAM (NONMEM) VERSION 7.5.1
 ORIGINALLY DEVELOPED BY STUART BEAL, LEWIS SHEINER, AND ALISON BOECKMANN
 CURRENT DEVELOPERS ARE ROBERT BAUER, ICON DEVELOPMENT SOLUTIONS,
 AND ALISON BOECKMANN. IMPLEMENTATION, EFFICIENCY, AND STANDARDIZATION
 PERFORMED BY NOUS INFOSYSTEMS.
 PROBLEM NO.:         1
 PHENOBARB SIMPLE MODEL
 TOT. NO. OF OBS RECS:      155
 TOT. NO. OF INDIVIDUALS:       59
 ONE COMPARTMENT MODEL (ADVAN1)
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 #TBLN:      1
 #METH: First Order Conditional Estimation with Interaction
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
 #TERM:
0MINIMIZATION TERMINATED
 DUE TO MAX. NO. OF FUNCTION EVALUATIONS EXCEEDED
 NO. OF FUNCTION EVALUATIONS USED:      225
 NO. OF SIG. DIGITS UNREPORTABLE

 ETABAR IS THE ARITHMETIC MEAN OF THE ETA-ESTIMATES,
 AND THE P-VALUE IS GIVEN FOR THE NULL HYPOTHESIS THAT THE TRUE MEAN IS 0.

 ETABAR:         1.4876E-02  2.9134E-05
 SE:             3.1412E-02  5.6382E-02
 N:                      59          59

 P VAL.:         6.3579E-01  9.9959E-01

 ETASHRINKSD(%)  3.4344E+01  2.8213E+00
 ETASHRINKVR(%)  5.6893E+01  5.5629E+00
 EBVSHRINKSD(%)  3.4768E+01  3.0269E+00
 EBVSHRINKVR(%)  5.7448E+01  5.9621E+00
 RELATIVEINF(%)  4.2088E+01  9.3013E+01
 EPSSHRINKSD(%)  3.0140E+01
 EPSSHRINKVR(%)  5.1196E+01


 TOTAL DATA POINTS NORMALLY DISTRIBUTED (N):          155
 N*LOG(2PI) CONSTANT TO OBJECTIVE FUNCTION:    284.87094529344853
 OBJECTIVE FUNCTION VALUE WITHOUT CONSTANT:    730.96990602857545
 OBJECTIVE FUNCTION VALUE WITH CONSTANT:       1015.8408513220240
 REPORTED OBJECTIVE FUNCTION DOES NOT CONTAIN CONSTANT

 TOTAL EFFECTIVE ETAS (NIND*NETA):                           118


 #TERE:
 Elapsed estimation  time in seconds:     1.24
 Elapsed postprocess time in seconds:     0.00

 ********************               FIRST ORDER CONDITIONAL ESTIMATION WITH INTERACTION              ********************
 #OBJT:**************                       MINIMUM VALUE OF OBJECTIVE FUNCTION                      ********************
 #OBJV:********************************************      730.970       **************************************************

 ********************               FIRST ORDER CONDITIONAL ESTIMATION WITH INTERACTION              ********************
 ********************                             FINAL PARAMETER ESTIMATE                           ********************

 THETA - VECTOR OF FIXED EFFECTS PARAMETERS   *********
         TH 1      TH 2
         5.84E-03  1.44E+00

 OMEGA - COV MATRIX FOR RANDOM EFFECTS - ETAS  ********
         ETA1      ETA2
 ETA1
+        1.35E-01
 ETA2
+        0.00E+00  1.99E-01

 SIGMA - COV MATRIX FOR RANDOM EFFECTS - EPSILONS  ****
         EPS1
 EPS1
+        1.57E-02

 OMEGA - CORR MATRIX FOR RANDOM EFFECTS - ETAS  *******
         ETA1      ETA2
 ETA1
+        3.67E-01
 ETA2
+        0.00E+00  4.46E-01

 SIGMA - CORR MATRIX FOR RANDOM EFFECTS - EPSILONS  ***
         EPS1
 EPS1
+        1.25E-01
 Elapsed finaloutput time in seconds:     0.01

 PROBLEM NO.:         2
 DESIGN
 TOT. NO. OF OBS RECS:      155
 TOT. NO. OF INDIVIDUALS:       59
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 #TBLN:      2
 #METH: First Order (Evaluation): D-OPTIMALITY
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
 #TERM:

 ETABAR IS THE ARITHMETIC MEAN OF THE ETA-ESTIMATES,
 AND THE P-VALUE IS GIVEN FOR THE NULL HYPOTHESIS THAT THE TRUE MEAN IS 0.

 ETABAR:         1.4876E-02  2.9134E-05
 SE:             3.1412E-02  5.6382E-02
 N:                      59          59

 P VAL.:         6.3579E-01  9.9959E-01

 ETASHRINKSD(%)  3.4344E+01  2.8213E+00
 ETASHRINKVR(%)  5.6893E+01  5.5629E+00
 EBVSHRINKSD(%)  3.4768E+01  3.0269E+00
 EBVSHRINKVR(%)  5.7448E+01  5.9621E+00
 RELATIVEINF(%)  4.2088E+01  9.3013E+01
 EPSSHRINKSD(%)  5.1142E+01
 EPSSHRINKVR(%)  7.6129E+01

 #TERE:
 Elapsed opt. design time in seconds:     0.02
 Elapsed postprocess time in seconds:     0.00

 ********************                      FIRST ORDER (EVALUATION): D-OPTIMALITY                    ********************
 #OBJT:**************                MINIMUM VALUE OF OBJECTIVE FUNCTION: D-OPTIMALITY               ********************
 #OBJV:********************************************      -44.507       **************************************************

 ********************                      FIRST ORDER (EVALUATION): D-OPTIMALITY                    ********************
 ********************                             FINAL PARAMETER ESTIMATE                           ********************

 THETA - VECTOR OF FIXED EFFECTS PARAMETERS   *********
         TH 1      TH 2
         5.84E-03  1.44E+00

 OMEGA - COV MATRIX FOR RANDOM EFFECTS - ETAS  ********
         ETA1      ETA2
 ETA1
+        1.35E-01
 ETA2
+        0.00E+00  1.99E-01

 SIGMA - COV MATRIX FOR RANDOM EFFECTS - EPSILONS  ****
         EPS1
 EPS1
+        1.57E-02

 OMEGA - CORR MATRIX FOR RANDOM EFFECTS - ETAS  *******
         ETA1      ETA2
 ETA1
+        3.67E-01
 ETA2
+        0.00E+00  4.46E-01

 SIGMA - CORR MATRIX FOR RANDOM EFFECTS - EPSILONS  ***
         EPS1
 EPS1
+        1.25E-01

 ********************                      FIRST ORDER (EVALUATION): D-OPTIMALITY                    ********************
 ********************                            STANDARD ERROR OF ESTIMATE                          ********************

 THETA - VECTOR OF FIXED EFFECTS PARAMETERS   *********
         TH 1      TH 2
         4.40E-04  8.66E-02

 OMEGA - COV MATRIX FOR RANDOM EFFECTS - ETAS  ********
         ETA1      ETA2
 ETA1
+        5.26E-02
 ETA2
+       .........  3.90E-02

 SIGMA - COV MATRIX FOR RANDOM EFFECTS - EPSILONS  ****
         EPS1
 EPS1
+        2.93E-03

 OMEGA - CORR MATRIX FOR RANDOM EFFECTS - ETAS  *******
         ETA1      ETA2
 ETA1
+        7.16E-02
 ETA2
+       .........  4.37E-02

 SIGMA - CORR MATRIX FOR RANDOM EFFECTS - EPSILONS  ***
         EPS1
 EPS1
+        1.17E-02

 ********************                      FIRST ORDER (EVALUATION): D-OPTIMALITY                    ********************
 ********************                          COVARIANCE MATRIX OF ESTIMATE                         ********************

     TH 1 | TH 1      TH 2 | TH 1      TH 2 | TH 2    OM11 | TH 1      OM11 | TH 2      OM11 | OM11      OM22 | TH 1
     1.94E-07        -4.51E-06         7.51E-03         0.00E+00         0.00E+00         2.77E-03         0.00E+00
   OM22 | TH 2      OM22 | OM11      OM22 | OM22      SG11 | TH 1      SG11 | TH 2      SG11 | OM11      SG11 | OM22
     0.00E+00        -1.52E-07         1.52E-03         0.00E+00         0.00E+00        -4.65E-05        -5.56E-06
   SG11 | SG11
     8.56E-06

 ********************                      FIRST ORDER (EVALUATION): D-OPTIMALITY                    ********************
 ********************                          CORRELATION MATRIX OF ESTIMATE                        ********************

     TH 1 | TH 1      TH 2 | TH 1      TH 2 | TH 2    OM11 | TH 1      OM11 | TH 2      OM11 | OM11      OM22 | TH 1
     4.40E-04        -1.18E-01         8.66E-02         0.00E+00         0.00E+00         5.26E-02         0.00E+00
   OM22 | TH 2      OM22 | OM11      OM22 | OM22      SG11 | TH 1      SG11 | TH 2      SG11 | OM11      SG11 | OM22
     0.00E+00        -7.40E-05         3.90E-02         0.00E+00         0.00E+00        -3.02E-01        -4.87E-02
   SG11 | SG11
     2.93E-03
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 Elapsed finaloutput time in seconds:     0.00
 #CPUT: Total CPU Time in Seconds,        1.232
