$PROBLEM PHENOBARB SIMPLE MODEL
$DATA pheno.dta IGNORE=@
$INPUT ID TIME AMT WGT APGR DV
$SUBROUTINE ADVAN1 TRANS2

$THETA CL=(0,0.00469307) ; TVCL
$THETA V=(0,1.00916) ; TVV
$OMEGA CL=0.0309626  ; IVCL
$OMEGA V=0.031128  ; IVV
$SIGMA 0.013241

$PK
CL=THETA(CL)*EXP(ETA(CL))
V=THETA(V)*EXP(ETA(V))
S1=V

$ERROR
Y=F+F*EPS(1)

$ESTIMATION METHOD=1 INTERACTION
