Mon Aug 14 02:29:01 PM CEST 2023
$PROBLEM direct_effect_linear
$INPUT ID TIME AMT WGT APGR DV DVID
$DATA ../.datasets/structsearch_run1.csv IGNORE=@
$SUBROUTINES ADVAN1 TRANS2
$ABBR REPLACE ETA_CL=ETA(1)
$ABBR REPLACE ETA_VC=ETA(2)
$ABBR REPLACE ETA_E0=ETA(3)
$PK
SLOPE = THETA(4)
E0 = THETA(3)*EXP(ETA_E0)
CL = THETA(1)*EXP(ETA_CL)
VC = THETA(2)*EXP(ETA_VC)
V = VC
$ERROR
IPRED = A(1)/VC
IF (IPRED.EQ.0) THEN
    IPREDADJ = 2.22500000000000E-16
ELSE
    IPREDADJ = IPRED
END IF
Y = IPRED + EPS(1)*IPREDADJ
E = A(1)*SLOPE/V + E0
Y_2 = E + E*EPS(2)
IF (DVID.EQ.1) THEN
    Y = Y
ELSE
    Y = Y_2
END IF
$THETA  (0,0.00274199) FIX ; POP_CL
$THETA  (0,1.44692) FIX ; POP_VC
$THETA  (0,5.75005) FIX ; POP_E0
$THETA  (0,0.1) ; POP_Slope
$OMEGA BLOCK(2) FIX
1e-05	; IIV_CL
-3.08041e-07	; IIV_CL_IIV_VC
9.90949e-06	; IIV_VC
$OMEGA  9e-06 FIX ; IIV_E0
$SIGMA  0.00630501 FIX ; sigma
$SIGMA  0.338363 FIX ; sigma1
$ESTIMATION METHOD=COND INTER MAXEVAL=99999
$TABLE ID TIME DV CIPREDI CWRES FILE=mytab NOAPPEND NOPRINT

NM-TRAN MESSAGES
 WARNINGS AND ERRORS (IF ANY) FOR PROBLEM    1
 (WARNING  2) NM-TRAN INFERS THAT THE DATA ARE POPULATION.
 (WARNING  23) $PK DOES NOT DEFINE A SCALE PARAMETER FOR THE CENTRAL
 COMPARTMENT.  WITH THIS TRANS, IT MAY NOT BE POSSIBLE TO SEPARATELY
 OBTAIN ESTIMATES OF PARAMETERS AFFECTING CLEARANCE AND VOLUME.
Note: Analytical 2nd Derivatives are constructed in FSUBS but are never used.
      You may insert $ABBR DERIV2=NO after the first $PROB to save FSUBS construction and compilation time

1NONLINEAR MIXED EFFECTS MODEL PROGRAM (NONMEM) VERSION 7.5.1
 ORIGINALLY DEVELOPED BY STUART BEAL, LEWIS SHEINER, AND ALISON BOECKMANN
 CURRENT DEVELOPERS ARE ROBERT BAUER, ICON DEVELOPMENT SOLUTIONS,
 AND ALISON BOECKMANN. IMPLEMENTATION, EFFICIENCY, AND STANDARDIZATION
 PERFORMED BY NOUS INFOSYSTEMS.
 PROBLEM NO.:         1
 direct_effect_linear
 TOT. NO. OF OBS RECS:        9
 TOT. NO. OF INDIVIDUALS:        2
 ONE COMPARTMENT MODEL (ADVAN1)
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 #TBLN:      1
 #METH: First Order Conditional Estimation with Interaction
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
 #TERM:
0MINIMIZATION SUCCESSFUL
 NO. OF FUNCTION EVALUATIONS USED:       28
 NO. OF SIG. DIGITS IN FINAL EST.:  3.9

 ETABAR IS THE ARITHMETIC MEAN OF THE ETA-ESTIMATES,
 AND THE P-VALUE IS GIVEN FOR THE NULL HYPOTHESIS THAT THE TRUE MEAN IS 0.

 ETABAR:        -1.1817E-07  4.5146E-07 -8.6506E-06
 SE:             1.0499E-05  7.6783E-05  5.0919E-06
 N:                       2           2           2

 P VAL.:         9.9102E-01  9.9531E-01  8.9337E-02

 ETASHRINKSD(%)  9.9530E+01  9.6551E+01  9.9760E+01
 ETASHRINKVR(%)  9.9998E+01  9.9881E+01  9.9999E+01
 EBVSHRINKSD(%)  9.9453E+01  9.4208E+01  9.9126E+01
 EBVSHRINKVR(%)  9.9997E+01  9.9665E+01  9.9992E+01
 RELATIVEINF(%)  2.1111E-03  2.0166E-01  7.6357E-03
 EPSSHRINKSD(%)  4.2982E-02  1.1152E+01
 EPSSHRINKVR(%)  8.5946E-02  2.1061E+01


 TOTAL DATA POINTS NORMALLY DISTRIBUTED (N):            9
 N*LOG(2PI) CONSTANT TO OBJECTIVE FUNCTION:    16.540893597684107
 OBJECTIVE FUNCTION VALUE WITHOUT CONSTANT:    23.662180956994135
 OBJECTIVE FUNCTION VALUE WITH CONSTANT:       40.203074554678238
 REPORTED OBJECTIVE FUNCTION DOES NOT CONTAIN CONSTANT

 TOTAL EFFECTIVE ETAS (NIND*NETA):                             6


 #TERE:
 Elapsed estimation  time in seconds:     0.00
 Elapsed postprocess time in seconds:     0.02

 ********************               FIRST ORDER CONDITIONAL ESTIMATION WITH INTERACTION              ********************
 #OBJT:**************                       MINIMUM VALUE OF OBJECTIVE FUNCTION                      ********************
 #OBJV:********************************************       23.662       **************************************************

 ********************               FIRST ORDER CONDITIONAL ESTIMATION WITH INTERACTION              ********************
 ********************                             FINAL PARAMETER ESTIMATE                           ********************

 THETA - VECTOR OF FIXED EFFECTS PARAMETERS   *********
         TH 1      TH 2      TH 3      TH 4
         2.74E-03  1.45E+00  5.75E+00  2.03E-02

 OMEGA - COV MATRIX FOR RANDOM EFFECTS - ETAS  ********
         ETA_CL    ETA_VC    ETA_E0
 ETA_CL
+        1.00E-05
 ETA_VC
+       -3.08E-07  9.91E-06
 ETA_E0
+        0.00E+00  0.00E+00  9.00E-06

 SIGMA - COV MATRIX FOR RANDOM EFFECTS - EPSILONS  ****
         EPS1      EPS2
 EPS1
+        6.31E-03
 EPS2
+        0.00E+00  3.38E-01

 OMEGA - CORR MATRIX FOR RANDOM EFFECTS - ETAS  *******
         ETA_CL    ETA_VC    ETA_E0
 ETA_CL
+        3.16E-03
 ETA_VC
+       -3.09E-02  3.15E-03
 ETA_E0
+        0.00E+00  0.00E+00  3.00E-03

 SIGMA - CORR MATRIX FOR RANDOM EFFECTS - EPSILONS  ***
         EPS1      EPS2
 EPS1
+        7.94E-02
 EPS2
+        0.00E+00  5.82E-01
 Elapsed finaloutput time in seconds:     0.00
 #CPUT: Total CPU Time in Seconds,        0.036
