$PROBLEM PHENOBARB SIMPLE MODEL
$DATA pheno_pd.csv IGNORE=@
$INPUT ID TIME AMT WGT APGR DV DVID
$SUBROUTINE ADVAN1 TRANS2

$PK
CL = THETA(1)*EXP(ETA(1))
VC = THETA(2)*EXP(ETA(2))
V=VC

$ERROR
CONC = A(1)/VC
Y = CONC + CONC*EPS(1)

$THETA (0,0.00469307) ; TVCL
$THETA (0,1.00916) ; TVV
$OMEGA 0.0309626  ; IVCL
$OMEGA 0.031128  ; IVV
$SIGMA 0.013241

$ESTIMATION METHOD=1 INTERACTION NOHABORT
$TABLE ID TIME DV CIPREDI CWRES FILE=pheno_pd_mytab NOAPPEND NOPRINT
