fre 23 okt 2020 10:47:23 CEST
$PROBLEM    PHENOBARB SIMPLE MODEL
$INPUT      ID DV MDV OPRED D_EPS1 TIME AMT WGT APGR D_ETA1 D_ETA2
            D_ETA3 D_ETA4 OETA1 OETA2 OETA3 OETA4 D_EPSETA1_1
            D_EPSETA1_2 D_EPSETA1_3 D_EPSETA1_4
$DATA      ../../add_etas_linbase.dta IGNORE=@ IGNORE(MDV.NEN.0)
$PRED
BASE1=D_ETA1*(ETA(1)-OETA1)
BASE2=D_ETA2*(ETA(2)-OETA2)
BASE3=D_ETA3*(ETA(3)-OETA3)
BASE4=D_ETA4*(ETA(4)-OETA4)
BSUM1=BASE1+BASE2+BASE3+BASE4
BASE_TERMS=BSUM1
IPRED=OPRED+BASE_TERMS
ERR1=EPS(1)*(D_EPS1+D_EPSETA1_1*(ETA(1)-OETA1))
ERR2=EPS(1)*(D_EPSETA1_2*(ETA(2)-OETA2))
ERR3=EPS(1)*(D_EPSETA1_3*(ETA(3)-OETA3))
ERR4=EPS(1)*(D_EPSETA1_4*(ETA(4)-OETA4))
ESUM1=ERR1+ERR2+ERR3+ERR4
ERROR_TERMS=ESUM1
Y=IPRED+ERROR_TERMS
$OMEGA  0.111053  ;       IVCL
$OMEGA  0.201526  ;        IVV
$OMEGA  0.0001
$OMEGA  0.0001
$SIGMA  0.0164177
$ETAS       FILE=pheno.phi
$ESTIMATION MCETA=1 METHOD=COND INTERACTION MAXEVALS=9999999 PRINT=1

NM-TRAN MESSAGES
 WARNINGS AND ERRORS (IF ANY) FOR PROBLEM    1
 (WARNING  2) NM-TRAN INFERS THAT THE DATA ARE POPULATION.

1NONLINEAR MIXED EFFECTS MODEL PROGRAM (NONMEM) VERSION 7.4.4
 ORIGINALLY DEVELOPED BY STUART BEAL, LEWIS SHEINER, AND ALISON BOECKMANN
 CURRENT DEVELOPERS ARE ROBERT BAUER, ICON DEVELOPMENT SOLUTIONS,
 AND ALISON BOECKMANN. IMPLEMENTATION, EFFICIENCY, AND STANDARDIZATION
 PERFORMED BY NOUS INFOSYSTEMS.
 PROBLEM NO.:         1
 PHENOBARB SIMPLE MODEL
 TOT. NO. OF OBS RECS:      155
 TOT. NO. OF INDIVIDUALS:       59
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 #TBLN:      1
 #METH: First Order Conditional Estimation with Interaction
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
 #TERM:
0MINIMIZATION SUCCESSFUL
 NO. OF FUNCTION EVALUATIONS USED:      125
 NO. OF SIG. DIGITS IN FINAL EST.:  5.4

 ETABAR IS THE ARITHMETIC MEAN OF THE ETA-ESTIMATES,
 AND THE P-VALUE IS GIVEN FOR THE NULL HYPOTHESIS THAT THE TRUE MEAN IS 0.

 ETABAR:         1.0381E-02 -4.7131E-03  9.0360E-06 -2.3332E-06
 SE:             2.8275E-02  5.6794E-02  2.4613E-05  2.8115E-05
 N:                      59          59          59          59

 P VAL.:         7.1353E-01  9.3386E-01  7.1353E-01  9.3386E-01

 ETASHRINKSD(%)  3.5378E+01  2.1017E+00  9.8093E+01  9.7822E+01
 ETASHRINKVR(%)  5.8240E+01  4.1592E+00  9.9964E+01  9.9953E+01
 EBVSHRINKSD(%)  3.6903E+01  2.9523E+00  9.8138E+01  9.7841E+01
 EBVSHRINKVR(%)  6.0188E+01  5.8175E+00  9.9965E+01  9.9953E+01
 EPSSHRINKSD(%)  2.8246E+01
 EPSSHRINKVR(%)  4.8513E+01


 TOTAL DATA POINTS NORMALLY DISTRIBUTED (N):          155
 N*LOG(2PI) CONSTANT TO OBJECTIVE FUNCTION:    284.87094529344853
 OBJECTIVE FUNCTION VALUE WITHOUT CONSTANT:    730.84697789365532
 OBJECTIVE FUNCTION VALUE WITH CONSTANT:       1015.7179231871039
 REPORTED OBJECTIVE FUNCTION DOES NOT CONTAIN CONSTANT

 TOTAL EFFECTIVE ETAS (NIND*NETA):                           236


 #TERE:
 Elapsed estimation  time in seconds:     0.16
 Elapsed postprocess time in seconds:     0.00

 ********************               FIRST ORDER CONDITIONAL ESTIMATION WITH INTERACTION              ********************
 #OBJT:**************                       MINIMUM VALUE OF OBJECTIVE FUNCTION                      ********************
 #OBJV:********************************************      730.847       **************************************************

 ********************               FIRST ORDER CONDITIONAL ESTIMATION WITH INTERACTION              ********************
 ********************                             FINAL PARAMETER ESTIMATE                           ********************

 OMEGA - COV MATRIX FOR RANDOM EFFECTS - ETAS  ********
         ETA1      ETA2      ETA3      ETA4
 ETA1
+        1.15E-01
 ETA2
+        0.00E+00  2.02E-01
 ETA3
+        0.00E+00  0.00E+00  1.00E-04
 ETA4
+        0.00E+00  0.00E+00  0.00E+00  1.00E-04

 SIGMA - COV MATRIX FOR RANDOM EFFECTS - EPSILONS  ****
         EPS1
 EPS1
+        1.57E-02

 OMEGA - CORR MATRIX FOR RANDOM EFFECTS - ETAS  *******
         ETA1      ETA2      ETA3      ETA4
 ETA1
+        3.39E-01
 ETA2
+        0.00E+00  4.49E-01
 ETA3
+        0.00E+00  0.00E+00  1.00E-02
 ETA4
+        0.00E+00  0.00E+00  0.00E+00  1.00E-02

 SIGMA - CORR MATRIX FOR RANDOM EFFECTS - EPSILONS  ***
         EPS1
 EPS1
+        1.25E-01
 Elapsed finaloutput time in seconds:     0.00
 #CPUT: Total CPU Time in Seconds,        0.165
