$SIZES      DIMNEW=-10000
$PROBLEM    PHENOBARB SIMPLE MODEL
$INPUT      ID DV MDV OPRED D_EPS1 TIME AMT WGT APGR D_ETA1 D_ETA2
            OETA1 OETA2 D_EPSETA1_1 D_EPSETA1_2
$DATA      ../pheno_linbase.dta IGNORE=@ IGNORE(MDV.NEN.0)
$PRED ETAB1 = (EXP(ETA(1))**THETA(1) - 1) / (THETA(1))
ETAB2 = (EXP(ETA(2))**THETA(2) - 1) / (THETA(2))

BASE1=D_ETA1*(ETAB1-OETA1)
BASE2=D_ETA2*(ETAB2-OETA2)
BSUM1=BASE1+BASE2
BASE_TERMS=BSUM1
IPRED=OPRED+BASE_TERMS
ERR1=EPS(1)*(D_EPS1+D_EPSETA1_1*(ETAB1-OETA1))
ERR2=EPS(1)*(D_EPSETA1_2*(ETAB2-OETA2))
ESUM1=ERR1+ERR2
ERROR_TERMS=ESUM1
Y=IPRED+ERROR_TERMS
$THETA  (-3,0.01,3)
$THETA  (-3,0.01,3)
$OMEGA  0.111053  ;       IVCL
$OMEGA  0.201526  ;        IVV
$SIGMA  0.0164177
$ETAS       FILE=/home/rikard/testing/qa_dir11/pheno_linbase.phi
$ESTIMATION METHOD=COND INTERACTION MAXEVALS=9999999 PRINT=1 MCETA=10
$COVARIANCE OMITTED
