ons  4 nov 2020 09:44:42 CET
$PROBLEM    PHENOBARB SIMPLE MODEL
$DATA      pheno.dta IGNORE=@
$INPUT      ID TIME AMT WGT APGR DV FA1
$SUBROUTINE ADVAN1 TRANS2
$PK IOV_1 = 0
IF (FA1.EQ.0) IOV_1 = ETA(3)
IF (FA1.EQ.1) IOV_1 = ETA(5)
IOV_2 = 0
IF (FA1.EQ.0) IOV_2 = ETA(4)
IF (FA1.EQ.1) IOV_2 = ETA(6)
ETAI1 = ETA(1) + IOV_1
ETAI2 = ETA(2) + IOV_2

CL=THETA(1)*EXP(ETAI1)
V=THETA(2)*EXP(ETAI2)
S1=V

$ERROR
Y=F+F*EPS(1)

$THETA  (0,0.00469307) ; TVCL
$THETA  (0,1.00916) ; TVV
$OMEGA  BLOCK(2)
 0.0309626  ;       IVCL
 0.001 0.031128  ;        IVV
$OMEGA  BLOCK(2)
 0.00309626  ;      IVCL_
 0.0001 0.0031128  ;       IVV_
$OMEGA  BLOCK(2) SAME
$SIGMA  0.013241
$ESTIMATION METHOD=1 INTERACTION

NM-TRAN MESSAGES
 WARNINGS AND ERRORS (IF ANY) FOR PROBLEM    1
 (WARNING  2) NM-TRAN INFERS THAT THE DATA ARE POPULATION.

1NONLINEAR MIXED EFFECTS MODEL PROGRAM (NONMEM) VERSION 7.4.4
 ORIGINALLY DEVELOPED BY STUART BEAL, LEWIS SHEINER, AND ALISON BOECKMANN
 CURRENT DEVELOPERS ARE ROBERT BAUER, ICON DEVELOPMENT SOLUTIONS,
 AND ALISON BOECKMANN. IMPLEMENTATION, EFFICIENCY, AND STANDARDIZATION
 PERFORMED BY NOUS INFOSYSTEMS.
 PROBLEM NO.:         1
 PHENOBARB SIMPLE MODEL
 TOT. NO. OF OBS RECS:      155
 TOT. NO. OF INDIVIDUALS:       59
 ONE COMPARTMENT MODEL (ADVAN1)
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 #TBLN:      1
 #METH: First Order Conditional Estimation with Interaction
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
 #TERM:
0MINIMIZATION SUCCESSFUL
 NO. OF FUNCTION EVALUATIONS USED:      424
 NO. OF SIG. DIGITS IN FINAL EST.:  3.5
0PARAMETER ESTIMATE IS NEAR ITS BOUNDARY
 THIS MUST BE ADDRESSED BEFORE THE COVARIANCE STEP CAN BE IMPLEMENTED

 ETABAR IS THE ARITHMETIC MEAN OF THE ETA-ESTIMATES,
 AND THE P-VALUE IS GIVEN FOR THE NULL HYPOTHESIS THAT THE TRUE MEAN IS 0.

 ETABAR:         6.4639E-03  1.7790E-03 -4.4826E-03 -3.2308E-03  9.0872E-03  6.5495E-03
 SE:             1.6503E-02  4.5428E-03  6.9212E-02  4.9884E-02  1.9353E-02  1.3948E-02
 N:                      59          59          59          59          59          59

 P VAL.:         6.9530E-01  6.9535E-01  9.4836E-01  9.4836E-01  6.3867E-01  6.3867E-01

 ETASHRINKSD(%)  5.0742E+01  5.0765E+01  3.4953E+00  3.4952E+00  7.3016E+01  7.3016E+01
 ETASHRINKVR(%)  7.5737E+01  7.5759E+01  6.8684E+00  6.8682E+00  9.2719E+01  9.2719E+01
 EBVSHRINKSD(%)  5.1365E+01  5.1388E+01  4.3449E+00  4.3448E+00  7.3264E+01  7.3264E+01
 EBVSHRINKVR(%)  7.6347E+01  7.6369E+01  8.5011E+00  8.5009E+00  9.2852E+01  9.2852E+01
 EPSSHRINKSD(%)  2.6262E+01
 EPSSHRINKVR(%)  4.5627E+01


 TOTAL DATA POINTS NORMALLY DISTRIBUTED (N):          155
 N*LOG(2PI) CONSTANT TO OBJECTIVE FUNCTION:    284.87094529344853
 OBJECTIVE FUNCTION VALUE WITHOUT CONSTANT:    688.57974053270084
 OBJECTIVE FUNCTION VALUE WITH CONSTANT:       973.45068582614931
 REPORTED OBJECTIVE FUNCTION DOES NOT CONTAIN CONSTANT

 TOTAL EFFECTIVE ETAS (NIND*NETA):                           348


 #TERE:
 Elapsed estimation  time in seconds:     1.77
 Elapsed postprocess time in seconds:     0.00

 ********************               FIRST ORDER CONDITIONAL ESTIMATION WITH INTERACTION              ********************
 #OBJT:**************                       MINIMUM VALUE OF OBJECTIVE FUNCTION                      ********************
 #OBJV:********************************************      688.580       **************************************************

 ********************               FIRST ORDER CONDITIONAL ESTIMATION WITH INTERACTION              ********************
 ********************                             FINAL PARAMETER ESTIMATE                           ********************

 THETA - VECTOR OF FIXED EFFECTS PARAMETERS   *********
         TH 1      TH 2
         6.77E-03  1.41E+00

 OMEGA - COV MATRIX FOR RANDOM EFFECTS - ETAS  ********
         ETA1      ETA2      ETA3      ETA4      ETA5      ETA6
 ETA1
+        6.74E-02
 ETA2
+        1.85E-02  5.11E-03
 ETA3
+        0.00E+00  0.00E+00  3.09E-01
 ETA4
+        0.00E+00  0.00E+00  2.22E-01  1.60E-01
 ETA5
+        0.00E+00  0.00E+00  0.00E+00  0.00E+00  3.09E-01
 ETA6
+        0.00E+00  0.00E+00  0.00E+00  0.00E+00  2.22E-01  1.60E-01

 SIGMA - COV MATRIX FOR RANDOM EFFECTS - EPSILONS  ****
         EPS1
 EPS1
+        1.14E-02

 OMEGA - CORR MATRIX FOR RANDOM EFFECTS - ETAS  *******
         ETA1      ETA2      ETA3      ETA4      ETA5      ETA6
 ETA1
+        2.60E-01
 ETA2
+        1.00E+00  7.15E-02
 ETA3
+        0.00E+00  0.00E+00  5.56E-01
 ETA4
+        0.00E+00  0.00E+00  1.00E+00  4.00E-01
 ETA5
+        0.00E+00  0.00E+00  0.00E+00  0.00E+00  5.56E-01
 ETA6
+        0.00E+00  0.00E+00  0.00E+00  0.00E+00  1.00E+00  4.00E-01

 SIGMA - CORR MATRIX FOR RANDOM EFFECTS - EPSILONS  ***
         EPS1
 EPS1
+        1.07E-01
 Elapsed finaloutput time in seconds:     0.00
 #CPUT: Total CPU Time in Seconds,        1.778
