$PROBLEM    PHENOBARB SIMPLE MODEL
$DATA      pheno.dta IGNORE=@
$INPUT      ID TIME AMT WGT APGR DV FA1
$SUBROUTINE ADVAN1 TRANS2
$PK IOV_1 = 0
IF (FA1.EQ.0) IOV_1 = ETA(3)
IF (FA1.EQ.1) IOV_1 = ETA(5)
IOV_2 = 0
IF (FA1.EQ.0) IOV_2 = ETA(4)
IF (FA1.EQ.1) IOV_2 = ETA(6)
ETAI1 = ETA(1) + IOV_1
ETAI2 = ETA(2) + IOV_2

CL=THETA(1)*EXP(ETAI1)
V=THETA(2)*EXP(ETAI2)
S1=V

$ERROR
Y=F+F*EPS(1)

$THETA  (0,0.00469307) ; TVCL
$THETA  (0,1.00916) ; TVV
$OMEGA  BLOCK(2)
 0.0309626  ;       IVCL
 0.001 0.031128  ;        IVV
$OMEGA  BLOCK(2)
 0.00309626  ; IOVCL
 0.0001 0.0031128  ;        IOVV
$OMEGA  BLOCK(2) SAME
$SIGMA  0.013241
$ESTIMATION METHOD=1 INTERACTION
