Wed 18 May 2022 05:13:06 PM CEST
$PROBLEM
$INPUT      ID VISI AGE SEX WT COMP IACE DIG DIU TAD TIME CRCL AMT SS
            II VID1 DV EVID SHR SHR2
$DATA      moxo_simulated_resmod.csv IGNORE=@
$SUBROUTINE ADVAN2 TRANS2
$PK
VC = THETA(1) * EXP(ETA(1))
CL = THETA(2) * EXP(ETA(2))
MAT = THETA(3) * EXP(ETA(3))
KA = 1/MAT
V = VC
$ERROR
Y = A(2)/VC + A(2)/VC * EPS(1)
$THETA  (0,100,Inf) ; POP_VC
$THETA  (0,10.0,Inf) ; POP_CL
$THETA  (0,3.0,Inf) ; POP_MAT
$OMEGA  BLOCK(2)
 0.1  ;     IIV_VC
 0.01  ; IIV_VC_IIV_CL
 0.1  ;     IIV_CL
$OMEGA  0.1  ;    IIV_MAT
$SIGMA  0.1  ;   RUV_PROP
$ESTIMATION METHOD=COND INTERACTION MAXEVAL=9999 SADDLE_RESET=1
$TABLE      ID TIME CWRES CIPREDI VC CL MAT DV PRED RES WRES IPREDI
            IWRESI FILE=mytab NOAPPEND NOPRINT

NM-TRAN MESSAGES
 WARNINGS AND ERRORS (IF ANY) FOR PROBLEM    1
 (WARNING  2) NM-TRAN INFERS THAT THE DATA ARE POPULATION.
 (WARNING  23) $PK DOES NOT DEFINE A SCALE PARAMETER FOR THE CENTRAL
 COMPARTMENT.  WITH THIS TRANS, IT MAY NOT BE POSSIBLE TO SEPARATELY
 OBTAIN ESTIMATES OF PARAMETERS AFFECTING CLEARANCE AND VOLUME.

1NONLINEAR MIXED EFFECTS MODEL PROGRAM (NONMEM) VERSION 7.5.0
 ORIGINALLY DEVELOPED BY STUART BEAL, LEWIS SHEINER, AND ALISON BOECKMANN
 CURRENT DEVELOPERS ARE ROBERT BAUER, ICON DEVELOPMENT SOLUTIONS,
 AND ALISON BOECKMANN. IMPLEMENTATION, EFFICIENCY, AND STANDARDIZATION
 PERFORMED BY NOUS INFOSYSTEMS.
 PROBLEM NO.:         1

 TOT. NO. OF OBS RECS:     1006
 TOT. NO. OF INDIVIDUALS:       73
 ONE COMPARTMENT MODEL WITH FIRST-ORDER ABSORPTION (ADVAN2)
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 #TBLN:      1
 #METH: First Order Conditional Estimation with Interaction
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
 #TERM:
0MINIMIZATION SUCCESSFUL
 NO. OF FUNCTION EVALUATIONS USED:      360
 NO. OF SIG. DIGITS IN FINAL EST.:  3.3

 ETABAR IS THE ARITHMETIC MEAN OF THE ETA-ESTIMATES,
 AND THE P-VALUE IS GIVEN FOR THE NULL HYPOTHESIS THAT THE TRUE MEAN IS 0.

 ETABAR:        -1.7620E-02  1.3942E-03  8.6744E-02
 SE:             2.8058E-02  3.0122E-02  8.0523E-02
 N:                      73          73          73

 P VAL.:         5.3002E-01  9.6308E-01  2.8137E-01

 ETASHRINKSD(%)  1.3426E+01  3.6286E+00  1.7481E+01
 ETASHRINKVR(%)  2.5049E+01  7.1255E+00  3.1907E+01
 EBVSHRINKSD(%)  1.3751E+01  4.4166E+00  1.4751E+01
 EBVSHRINKVR(%)  2.5611E+01  8.6381E+00  2.7325E+01
 RELATIVEINF(%)  6.8308E+01  9.3315E+01  7.0671E+01
 EPSSHRINKSD(%)  7.2706E+00
 EPSSHRINKVR(%)  1.4013E+01

 TOTAL DATA POINTS NORMALLY DISTRIBUTED (N):         1006
 N*LOG(2PI) CONSTANT TO OBJECTIVE FUNCTION:    1848.9043288078014
 OBJECTIVE FUNCTION VALUE WITHOUT CONSTANT:   -2460.7044690252656
 OBJECTIVE FUNCTION VALUE WITH CONSTANT:      -611.80014021746410
 REPORTED OBJECTIVE FUNCTION DOES NOT CONTAIN CONSTANT

 TOTAL EFFECTIVE ETAS (NIND*NETA):                           219

 #TERE:
 Elapsed estimation  time in seconds:     9.73
 Elapsed postprocess time in seconds:     0.09

 ********************               FIRST ORDER CONDITIONAL ESTIMATION WITH INTERACTION              ********************
 #OBJT:**************                       MINIMUM VALUE OF OBJECTIVE FUNCTION                      ********************
 #OBJV:********************************************    -2460.704       **************************************************

 ********************               FIRST ORDER CONDITIONAL ESTIMATION WITH INTERACTION              ********************
 ********************                             FINAL PARAMETER ESTIMATE                           ********************

 THETA - VECTOR OF FIXED EFFECTS PARAMETERS   *********
         TH 1      TH 2      TH 3
         1.07E+02  2.75E+01  5.32E-01

 OMEGA - COV MATRIX FOR RANDOM EFFECTS - ETAS  ********
         ETA1      ETA2      ETA3
 ETA1
+        7.77E-02
 ETA2
+        3.89E-02  7.23E-02
 ETA3
+        0.00E+00  0.00E+00  7.05E-01

 SIGMA - COV MATRIX FOR RANDOM EFFECTS - EPSILONS  ****
         EPS1
 EPS1
+        9.33E-02

 OMEGA - CORR MATRIX FOR RANDOM EFFECTS - ETAS  *******
         ETA1      ETA2      ETA3
 ETA1
+        2.79E-01
 ETA2
+        5.19E-01  2.69E-01
 ETA3
+        0.00E+00  0.00E+00  8.40E-01

 SIGMA - CORR MATRIX FOR RANDOM EFFECTS - EPSILONS  ***
         EPS1
 EPS1
+        3.05E-01
 Elapsed finaloutput time in seconds:     0.06
 #CPUT: Total CPU Time in Seconds,       10.567
