ons 20 jan 2021 14:24:33 CET
$PROBLEM    PHENOBARB SIMPLE MODEL
$DATA      pheno.dta IGNORE=@
$INPUT      ID TIME AMT WGT APGR DV
$SUBROUTINE ADVAN1 TRANS2
$PK
CL=THETA(1)*EXP(ETA(1))
WGT_MEDIAN = 1.30000
CLWGT = EXP(THETA(3)*(WGT - WGT_MEDIAN))
CL = CL*CLWGT
V=THETA(2)*EXP(ETA(2))
S1=V

$ERROR
Y=F+F*EPS(1)

$THETA  (0,0.00469307) ; TVCL
$THETA  (0,1.00916) ; TVV
$THETA  (-0.8696,0.001,0.8696) ; POP_CLWGT
$OMEGA  BLOCK(2)
 0.0309626  ;       IVCL
 0.01 0.031128  ;        IVV
$SIGMA  0.013241
$ESTIMATION METHOD=1 INTERACTION
$COVARIANCE

NM-TRAN MESSAGES
 WARNINGS AND ERRORS (IF ANY) FOR PROBLEM    1
 (WARNING  2) NM-TRAN INFERS THAT THE DATA ARE POPULATION.

1NONLINEAR MIXED EFFECTS MODEL PROGRAM (NONMEM) VERSION 7.4.4
 ORIGINALLY DEVELOPED BY STUART BEAL, LEWIS SHEINER, AND ALISON BOECKMANN
 CURRENT DEVELOPERS ARE ROBERT BAUER, ICON DEVELOPMENT SOLUTIONS,
 AND ALISON BOECKMANN. IMPLEMENTATION, EFFICIENCY, AND STANDARDIZATION
 PERFORMED BY NOUS INFOSYSTEMS.
 PROBLEM NO.:         1
 PHENOBARB SIMPLE MODEL
 TOT. NO. OF OBS RECS:      155
 TOT. NO. OF INDIVIDUALS:       59
 ONE COMPARTMENT MODEL (ADVAN1)
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 #TBLN:      1
 #METH: First Order Conditional Estimation with Interaction
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
 #TERM:
0MINIMIZATION SUCCESSFUL
 NO. OF FUNCTION EVALUATIONS USED:      190
 NO. OF SIG. DIGITS IN FINAL EST.:  3.2

 ETABAR IS THE ARITHMETIC MEAN OF THE ETA-ESTIMATES,
 AND THE P-VALUE IS GIVEN FOR THE NULL HYPOTHESIS THAT THE TRUE MEAN IS 0.

 ETABAR:         9.0596E-04 -9.5004E-04
 SE:             1.5351E-02  5.0952E-02
 N:                      59          59

 P VAL.:         9.5294E-01  9.8512E-01

 ETASHRINKSD(%)  3.4786E+01  1.9561E+00
 ETASHRINKVR(%)  5.7472E+01  3.8740E+00
 EBVSHRINKSD(%)  3.5486E+01  2.7799E+00
 EBVSHRINKVR(%)  5.8379E+01  5.4825E+00
 EPSSHRINKSD(%)  2.5632E+01
 EPSSHRINKVR(%)  4.4694E+01


 TOTAL DATA POINTS NORMALLY DISTRIBUTED (N):          155
 N*LOG(2PI) CONSTANT TO OBJECTIVE FUNCTION:    284.87094529344853
 OBJECTIVE FUNCTION VALUE WITHOUT CONSTANT:    675.80068820930251
 OBJECTIVE FUNCTION VALUE WITH CONSTANT:       960.67163350275109
 REPORTED OBJECTIVE FUNCTION DOES NOT CONTAIN CONSTANT

 TOTAL EFFECTIVE ETAS (NIND*NETA):                           118


 #TERE:
 Elapsed estimation  time in seconds:     0.39
 Elapsed covariance  time in seconds:     0.25
 Elapsed postprocess time in seconds:     0.00

 ********************               FIRST ORDER CONDITIONAL ESTIMATION WITH INTERACTION              ********************
 #OBJT:**************                       MINIMUM VALUE OF OBJECTIVE FUNCTION                      ********************
 #OBJV:********************************************      675.801       **************************************************

 ********************               FIRST ORDER CONDITIONAL ESTIMATION WITH INTERACTION              ********************
 ********************                             FINAL PARAMETER ESTIMATE                           ********************

 THETA - VECTOR OF FIXED EFFECTS PARAMETERS   *********
         TH 1      TH 2      TH 3
         5.93E-03  1.40E+00  6.17E-01

 OMEGA - COV MATRIX FOR RANDOM EFFECTS - ETAS  ********
         ETA1      ETA2
 ETA1
+        3.33E-02
 ETA2
+        3.03E-02  1.62E-01

 SIGMA - COV MATRIX FOR RANDOM EFFECTS - EPSILONS  ****
         EPS1
 EPS1
+        1.30E-02

 OMEGA - CORR MATRIX FOR RANDOM EFFECTS - ETAS  *******
         ETA1      ETA2
 ETA1
+        1.82E-01
 ETA2
+        4.12E-01  4.03E-01

 SIGMA - CORR MATRIX FOR RANDOM EFFECTS - EPSILONS  ***
         EPS1
 EPS1
+        1.14E-01

 ********************               FIRST ORDER CONDITIONAL ESTIMATION WITH INTERACTION              ********************
 ********************                            STANDARD ERROR OF ESTIMATE                          ********************

 THETA - VECTOR OF FIXED EFFECTS PARAMETERS   *********
         TH 1      TH 2      TH 3
         3.35E-04  7.57E-02  9.54E-02

 OMEGA - COV MATRIX FOR RANDOM EFFECTS - ETAS  ********
         ETA1      ETA2
 ETA1
+        2.16E-02
 ETA2
+        3.86E-02  4.11E-02

 SIGMA - COV MATRIX FOR RANDOM EFFECTS - EPSILONS  ****
         EPS1
 EPS1
+        2.31E-03

 OMEGA - CORR MATRIX FOR RANDOM EFFECTS - ETAS  *******
         ETA1      ETA2
 ETA1
+        5.91E-02
 ETA2
+        4.24E-01  5.10E-02

 SIGMA - CORR MATRIX FOR RANDOM EFFECTS - EPSILONS  ***
         EPS1
 EPS1
+        1.02E-02

 ********************               FIRST ORDER CONDITIONAL ESTIMATION WITH INTERACTION              ********************
 ********************                          COVARIANCE MATRIX OF ESTIMATE                         ********************

            TH 1      TH 2      TH 3      OM11      OM12      OM22      SG11
 TH 1
+        1.12E-07
 TH 2
+        7.45E-06  5.73E-03
 TH 3
+       -1.87E-05 -2.91E-03  9.10E-03
 OM11
+       -8.94E-07  1.91E-04 -1.00E-03  4.65E-04
 OM12
+        3.24E-06  1.10E-03 -3.03E-03  6.42E-04  1.49E-03
 OM22
+        2.49E-06  1.67E-03 -3.51E-04  9.58E-06  2.62E-04  1.69E-03
 SG11
+       -5.92E-08 -3.25E-05  6.95E-05  6.75E-06 -1.41E-05 -2.74E-06  5.35E-06

 ********************               FIRST ORDER CONDITIONAL ESTIMATION WITH INTERACTION              ********************
 ********************                          CORRELATION MATRIX OF ESTIMATE                        ********************

            TH 1      TH 2      TH 3      OM11      OM12      OM22      SG11
 TH 1
+        3.35E-04
 TH 2
+        2.94E-01  7.57E-02
 TH 3
+       -5.84E-01 -4.03E-01  9.54E-02
 OM11
+       -1.24E-01  1.17E-01 -4.87E-01  2.16E-02
 OM12
+        2.51E-01  3.77E-01 -8.21E-01  7.72E-01  3.86E-02
 OM22
+        1.81E-01  5.36E-01 -8.96E-02  1.08E-02  1.65E-01  4.11E-02
 SG11
+       -7.65E-02 -1.86E-01  3.15E-01  1.35E-01 -1.57E-01 -2.89E-02  2.31E-03
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 Elapsed finaloutput time in seconds:     0.00
 #CPUT: Total CPU Time in Seconds,        0.660
