$PROBLEM PHENOBARB SIMPLE MODEL
$DATA pheno.dta IGNORE=@
$INPUT ID TIME AMT WGT APGR DV
$SUBROUTINE ADVAN1 TRANS2

$PK
CL=THETA(1)*EXP(ETA(1))
WGT_MEDIAN = 1.30000
CLWGT = EXP(THETA(3)*(WGT - WGT_MEDIAN))
CL = CL*CLWGT
V=THETA(2)*EXP(ETA(2))
S1=V

$ERROR
Y=F+F*EPS(1)

$THETA (0,0.00469307) ; TVCL
$THETA (0,1.00916) ; TVV
$THETA  (-0.8696,0.001,0.8696) ; POP_CLWGT
$OMEGA BLOCK(2)
0.0309626  ; IVCL
0.01
0.031128  ; IVV
$SIGMA 0.013241

$ESTIMATION METHOD=1 INTERACTION
$COVARIANCE
