tis 22 jun 2021 15:59:52 CEST
$PROBLEM    PHENOBARB SIMPLE MODEL
$DATA      ../../est_data3.dta IGNORE=@
$INPUT      ID TIME AMT WGT APGR DV
$SUBROUTINE ADVAN1 TRANS2
$PK
CL=THETA(1)*EXP(ETA(1))
V=THETA(2)*EXP(ETA(2))
S1=V

$ERROR
Y=F+F*EPS(1)

$THETA  (0,0.00469307) ; TVCL
$THETA  (0,1.00916) ; TVV
$OMEGA  0.0309626  ;       IVCL
$OMEGA  0.031128  ;        IVV
$SIGMA  0.013241
$ESTIMATION METHOD=1 INTERACTION
$COVARIANCE

NM-TRAN MESSAGES
 WARNINGS AND ERRORS (IF ANY) FOR PROBLEM    1
 (WARNING  2) NM-TRAN INFERS THAT THE DATA ARE POPULATION.

1NONLINEAR MIXED EFFECTS MODEL PROGRAM (NONMEM) VERSION 7.5.0
 ORIGINALLY DEVELOPED BY STUART BEAL, LEWIS SHEINER, AND ALISON BOECKMANN
 CURRENT DEVELOPERS ARE ROBERT BAUER, ICON DEVELOPMENT SOLUTIONS,
 AND ALISON BOECKMANN. IMPLEMENTATION, EFFICIENCY, AND STANDARDIZATION
 PERFORMED BY NOUS INFOSYSTEMS.
 PROBLEM NO.:         1
 PHENOBARB SIMPLE MODEL
 TOT. NO. OF OBS RECS:      121
 TOT. NO. OF INDIVIDUALS:       45
 ONE COMPARTMENT MODEL (ADVAN1)
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 #TBLN:      1
 #METH: First Order Conditional Estimation with Interaction
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
 #TERM:
0MINIMIZATION SUCCESSFUL
 NO. OF FUNCTION EVALUATIONS USED:      148
 NO. OF SIG. DIGITS IN FINAL EST.:  3.4

 ETABAR IS THE ARITHMETIC MEAN OF THE ETA-ESTIMATES,
 AND THE P-VALUE IS GIVEN FOR THE NULL HYPOTHESIS THAT THE TRUE MEAN IS 0.

 ETABAR:         2.5791E-02 -8.6217E-03
 SE:             5.0030E-02  6.7885E-02
 N:                      45          45

 P VAL.:         6.0620E-01  8.9894E-01

 ETASHRINKSD(%)  2.7971E+01  1.4254E+00
 ETASHRINKVR(%)  4.8118E+01  2.8305E+00
 EBVSHRINKSD(%)  2.9713E+01  2.7827E+00
 EBVSHRINKVR(%)  5.0598E+01  5.4880E+00
 RELATIVEINF(%)  4.8973E+01  9.3690E+01
 EPSSHRINKSD(%)  3.1294E+01
 EPSSHRINKVR(%)  5.2795E+01


 TOTAL DATA POINTS NORMALLY DISTRIBUTED (N):          121
 N*LOG(2PI) CONSTANT TO OBJECTIVE FUNCTION:    222.38312503553078
 OBJECTIVE FUNCTION VALUE WITHOUT CONSTANT:    579.10963514945581
 OBJECTIVE FUNCTION VALUE WITH CONSTANT:       801.49276018498654
 REPORTED OBJECTIVE FUNCTION DOES NOT CONTAIN CONSTANT

 TOTAL EFFECTIVE ETAS (NIND*NETA):                            90


 #TERE:
 Elapsed estimation  time in seconds:     0.35
 Elapsed covariance  time in seconds:     0.19
 Elapsed postprocess time in seconds:     0.00

 ********************               FIRST ORDER CONDITIONAL ESTIMATION WITH INTERACTION              ********************
 #OBJT:**************                       MINIMUM VALUE OF OBJECTIVE FUNCTION                      ********************
 #OBJV:********************************************      579.110       **************************************************

 ********************               FIRST ORDER CONDITIONAL ESTIMATION WITH INTERACTION              ********************
 ********************                             FINAL PARAMETER ESTIMATE                           ********************

 THETA - VECTOR OF FIXED EFFECTS PARAMETERS   *********
         TH 1      TH 2
         5.77E-03  1.48E+00

 OMEGA - COV MATRIX FOR RANDOM EFFECTS - ETAS  ********
         ETA1      ETA2
 ETA1
+        2.22E-01
 ETA2
+        0.00E+00  2.18E-01

 SIGMA - COV MATRIX FOR RANDOM EFFECTS - EPSILONS  ****
         EPS1
 EPS1
+        1.53E-02

 OMEGA - CORR MATRIX FOR RANDOM EFFECTS - ETAS  *******
         ETA1      ETA2
 ETA1
+        4.71E-01
 ETA2
+        0.00E+00  4.67E-01

 SIGMA - CORR MATRIX FOR RANDOM EFFECTS - EPSILONS  ***
         EPS1
 EPS1
+        1.24E-01

 ********************               FIRST ORDER CONDITIONAL ESTIMATION WITH INTERACTION              ********************
 ********************                            STANDARD ERROR OF ESTIMATE                          ********************

 THETA - VECTOR OF FIXED EFFECTS PARAMETERS   *********
         TH 1      TH 2
         6.18E-04  1.01E-01

 OMEGA - COV MATRIX FOR RANDOM EFFECTS - ETAS  ********
         ETA1      ETA2
 ETA1
+        1.77E-01
 ETA2
+       .........  5.69E-02

 SIGMA - COV MATRIX FOR RANDOM EFFECTS - EPSILONS  ****
         EPS1
 EPS1
+        3.74E-03

 OMEGA - CORR MATRIX FOR RANDOM EFFECTS - ETAS  *******
         ETA1      ETA2
 ETA1
+        1.88E-01
 ETA2
+       .........  6.09E-02

 SIGMA - CORR MATRIX FOR RANDOM EFFECTS - EPSILONS  ***
         EPS1
 EPS1
+        1.51E-02

 ********************               FIRST ORDER CONDITIONAL ESTIMATION WITH INTERACTION              ********************
 ********************                          COVARIANCE MATRIX OF ESTIMATE                         ********************

            TH 1      TH 2      OM11      OM12      OM22      SG11
 TH 1
+        3.81E-07
 TH 2
+        2.76E-05  1.03E-02
 OM11
+        2.98E-05  2.71E-03  3.13E-02
 OM12
+       ......... ......... ......... .........
 OM22
+        3.60E-06  3.57E-03 -1.13E-03 .........  3.23E-03
 SG11
+       -1.05E-06  3.56E-05 -3.62E-04 .........  8.12E-05  1.40E-05

 ********************               FIRST ORDER CONDITIONAL ESTIMATION WITH INTERACTION              ********************
 ********************                          CORRELATION MATRIX OF ESTIMATE                        ********************

            TH 1      TH 2      OM11      OM12      OM22      SG11
 TH 1
+        6.18E-04
 TH 2
+        4.41E-01  1.01E-01
 OM11
+        2.72E-01  1.51E-01  1.77E-01
 OM12
+       ......... ......... ......... .........
 OM22
+        1.02E-01  6.19E-01 -1.12E-01 .........  5.69E-02
 SG11
+       -4.52E-01  9.38E-02 -5.46E-01 .........  3.81E-01  3.74E-03
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 Elapsed finaloutput time in seconds:     0.00
 #CPUT: Total CPU Time in Seconds,        0.575
