$PROBLEM    PHENOBARB SIMPLE MODEL
$DATA      ../pred_data0.dta IGNORE=@
$INPUT      ID TIME AMT WGT APGR DV
$SUBROUTINE ADVAN1 TRANS2
$PK
CL=THETA(1)*EXP(ETA(1))
V=THETA(2)*EXP(ETA(2))
S1=V

$ERROR
Y=F+F*EPS(1)

$THETA  (0,0.00571671) ; TVCL
$THETA  (0,1.43048) ; TVV
$OMEGA  0.0824682  ;       IVCL
$OMEGA  0.174335  ;        IVV
$SIGMA  0.0182988
$ESTIMATION METHOD=1 INTERACTION MAXEVALS=0
$COVARIANCE
