tor  7 jan 2021 08:39:12 CET
$PROBLEM    PHENOBARB SIMPLE MODEL
$DATA      ../../frem_dataset.dta IGNORE=@
$INPUT      ID TIME AMT WGT APGR DV MDV FREMTYPE
$SUBROUTINE ADVAN1 TRANS2
$PK
CL=THETA(1)*EXP(ETA(1))
V=THETA(2)*EXP(ETA(2))
S1=V

    SDC3 = 2.23763568135
    SDC4 = 0.704564727537
$ERROR
Y=F+F*EPS(1)

;;;FREM CODE BEGIN COMPACT
;;;DO NOT MODIFY
    IF (FREMTYPE.EQ.100) THEN
;      APGR  2.23763568135
       Y = THETA(3) + ETA(3)*SDC3 + EPS(2)
       IPRED = THETA(3) + ETA(3)*SDC3
    END IF
    IF (FREMTYPE.EQ.200) THEN
;      WGT  0.704564727537
       Y = THETA(4) + ETA(4)*SDC4 + EPS(2)
       IPRED = THETA(4) + ETA(4)*SDC4
    END IF
;;;FREM CODE END COMPACT
$THETA  (0,0.00581756) ; TVCL
$THETA  (0,1.44555) ; TVV
$THETA  6.42372881356 FIX ; TV_APGR
 1.52542372881 FIX ; TV_WGT
$OMEGA  BLOCK(4)
 0.126  ;       IVCL
 0.0201906 0.224959  ;        IVV
 -0.0120416 0.115427 1.00003  ;   BSV_APGR
 0.208475 0.415588 0.24408 1.00776  ;    BSV_WGT
$SIGMA  0.0164177
$SIGMA  0.0000001  FIX  ;     EPSCOV
$ESTIMATION METHOD=1 INTERACTION NONINFETA=1 MCETA=1
$COVARIANCE UNCONDITIONAL PRECOND=1
$ETAS       FILE=model_4_input.phi

NM-TRAN MESSAGES
 WARNINGS AND ERRORS (IF ANY) FOR PROBLEM    1
 (WARNING  2) NM-TRAN INFERS THAT THE DATA ARE POPULATION.
 (WARNING  3) THERE MAY BE AN ERROR IN THE ABBREVIATED CODE. THE FOLLOWING
 ONE OR MORE RANDOM VARIABLES ARE DEFINED WITH "IF" STATEMENTS THAT DO NOT
 PROVIDE DEFINITIONS FOR BOTH THE "THEN" AND "ELSE" CASES. IF ALL
 CONDITIONS FAIL, THE VALUES OF THESE VARIABLES WILL BE ZERO.
   IPRED

1NONLINEAR MIXED EFFECTS MODEL PROGRAM (NONMEM) VERSION 7.4.4
 ORIGINALLY DEVELOPED BY STUART BEAL, LEWIS SHEINER, AND ALISON BOECKMANN
 CURRENT DEVELOPERS ARE ROBERT BAUER, ICON DEVELOPMENT SOLUTIONS,
 AND ALISON BOECKMANN. IMPLEMENTATION, EFFICIENCY, AND STANDARDIZATION
 PERFORMED BY NOUS INFOSYSTEMS.
 PROBLEM NO.:         1
 PHENOBARB SIMPLE MODEL
 TOT. NO. OF OBS RECS:      273
 TOT. NO. OF INDIVIDUALS:       59
 ONE COMPARTMENT MODEL (ADVAN1)
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 #TBLN:      1
 #METH: First Order Conditional Estimation with Interaction
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
 #TERM:
0MINIMIZATION TERMINATED
 DUE TO MAX. NO. OF FUNCTION EVALUATIONS EXCEEDED
 NO. OF FUNCTION EVALUATIONS USED:      644
 NO. OF SIG. DIGITS UNREPORTABLE

 ETABAR IS THE ARITHMETIC MEAN OF THE ETA-ESTIMATES,
 AND THE P-VALUE IS GIVEN FOR THE NULL HYPOTHESIS THAT THE TRUE MEAN IS 0.

 ETABAR:         5.5528E-04  4.9484E-04  3.9154E-11  1.8526E-09
 SE:             5.8635E-02  5.2529E-02  1.2908E-01  1.2908E-01
 N:                      59          59          59          59

 P VAL.:         9.9244E-01  9.9248E-01  1.0000E+00  1.0000E+00

 ETASHRINKSD(%)  3.2560E+00  3.2165E+00  1.9388E+00  1.6870E+00
 ETASHRINKVR(%)  6.4060E+00  6.3296E+00  3.8401E+00  3.3455E+00
 EBVSHRINKSD(%)  1.3475E+00  1.3344E+00  9.6025E-07  9.7353E-06
 EBVSHRINKVR(%)  2.6769E+00  2.6509E+00  1.9205E-06  1.9471E-05
 EPSSHRINKSD(%)  1.5331E+01  9.9915E+01
 EPSSHRINKVR(%)  2.8312E+01  1.0000E+02


 TOTAL DATA POINTS NORMALLY DISTRIBUTED (N):          273
 N*LOG(2PI) CONSTANT TO OBJECTIVE FUNCTION:    501.74043912975128
 OBJECTIVE FUNCTION VALUE WITHOUT CONSTANT:    753.30274333914326
 OBJECTIVE FUNCTION VALUE WITH CONSTANT:       1255.0431824688944
 REPORTED OBJECTIVE FUNCTION DOES NOT CONTAIN CONSTANT

 TOTAL EFFECTIVE ETAS (NIND*NETA):                           236


 #TERE:
 Elapsed estimation  time in seconds:     2.79
 TESTING R MATRIX FOR POSITIVE DEFINITNESS
 R MATRIX IS NOT POSITIVE DEFINITE
 PRECONDITIONING CYCLE NO.            1
0S MATRIX UNOBTAINABLE
0COVARIANCE STEP ABORTED
 Elapsed covariance  time in seconds:     1.00
 Elapsed postprocess time in seconds:     0.00

 ********************               FIRST ORDER CONDITIONAL ESTIMATION WITH INTERACTION              ********************
 #OBJT:**************                       MINIMUM VALUE OF OBJECTIVE FUNCTION                      ********************
 #OBJV:********************************************      753.303       **************************************************

 ********************               FIRST ORDER CONDITIONAL ESTIMATION WITH INTERACTION              ********************
 ********************                             FINAL PARAMETER ESTIMATE                           ********************

 THETA - VECTOR OF FIXED EFFECTS PARAMETERS   *********
         TH 1      TH 2      TH 3      TH 4
         7.08E-03  1.39E+00  6.42E+00  1.53E+00

 OMEGA - COV MATRIX FOR RANDOM EFFECTS - ETAS  ********
         ETA1      ETA2      ETA3      ETA4
 ETA1
+        2.20E-01
 ETA2
+        1.95E-01  1.77E-01
 ETA3
+        6.27E-02  1.17E-01  1.04E+00
 ETA4
+        4.47E-01  4.02E-01  2.49E-01  1.03E+00

 SIGMA - COV MATRIX FOR RANDOM EFFECTS - EPSILONS  ****
         EPS1      EPS2
 EPS1
+        1.53E-02
 EPS2
+        0.00E+00  1.00E-07

 OMEGA - CORR MATRIX FOR RANDOM EFFECTS - ETAS  *******
         ETA1      ETA2      ETA3      ETA4
 ETA1
+        4.70E-01
 ETA2
+        9.89E-01  4.20E-01
 ETA3
+        1.31E-01  2.73E-01  1.02E+00
 ETA4
+        9.36E-01  9.40E-01  2.40E-01  1.02E+00

 SIGMA - CORR MATRIX FOR RANDOM EFFECTS - EPSILONS  ***
         EPS1      EPS2
 EPS1
+        1.23E-01
 EPS2
+        0.00E+00  3.16E-04
 Elapsed finaloutput time in seconds:     0.00
 #CPUT: Total CPU Time in Seconds,        3.799
