$PROBLEM    PHENOBARB SIMPLE MODEL
$DATA      ../../pheno.dta IGNORE=@
$INPUT      ID TIME AMT WGT APGR DV
$SUBROUTINE ADVAN1 TRANS2
$PK
CL=THETA(1)*EXP(ETA(1))
V=THETA(2)*EXP(ETA(2))
S1=V

FREMTYPE=0
$ERROR
Y=F+F*EPS(1)

$THETA  (0,0.00581756) ; TVCL
$THETA  (0,1.44555) ; TVV
$OMEGA  0.111053  ;       IVCL
$OMEGA  0.201526  ;        IVV
$SIGMA  0.0164177
$ESTIMATION MAXEVALS=0 METHOD=ZERO
$TABLE      ID TIME AMT WGT APGR DV MDV FREMTYPE NOAPPEND NOPRINT
            ONEHEADER FORMAT=sG15.9 FILE=filtered_plus_type0.dta
