Tue Dec 19 08:56:22 AM CET 2023
$PROBLEM LAGTIME(ON)
$INPUT ID VISI XAT2=DROP DGRP DOSE FLAG=DROP ONO=DROP
       XIME=DROP NEUY SCR AGE SEX NYHA=DROP WT DROP ACE
       DIG DIU NUMB=DROP TAD TIME VIDD=DROP CLCR AMT SS II DROP
       CMT=DROP CONO=DROP DV EVID=DROP OVID=DROP
$DATA ../.datasets/BASE.csv IGNORE=@
$SUBROUTINES ADVAN2 TRANS2
$PK
MDT = THETA(4)
CL = THETA(1) * EXP(ETA(1))
VC = THETA(2) * EXP(ETA(2))
MAT = THETA(3) * EXP(ETA(3))
KA = 1/MAT
V = VC
ALAG1 = MDT
$ERROR
CONC = A(2)/VC
Y = CONC + CONC * EPS(1)
$ESTIMATION METHOD=0
$THETA (0, 24.5328, Inf) ; POP_CL
$THETA (0, 104.23, Inf) ; POP_VC
$THETA (0, 0.433676, Inf) ; POP_MAT
$THETA  (0,0.125) ; POP_MDT
$OMEGA 0.481858; IIV_CL
$OMEGA 0.593654; IIV_VC
$OMEGA 0.000129949; IIV_MAT
$SIGMA 0.209972; RUV_PROP
$TABLE ID TIME DV CWRES CIPREDI NOAPPEND FILE=mytab_mox2

NM-TRAN MESSAGES
 WARNINGS AND ERRORS (IF ANY) FOR PROBLEM    1
 (WARNING  2) NM-TRAN INFERS THAT THE DATA ARE POPULATION.
 (WARNING  23) $PK DOES NOT DEFINE A SCALE PARAMETER FOR THE CENTRAL
 COMPARTMENT.  WITH THIS TRANS, IT MAY NOT BE POSSIBLE TO SEPARATELY
 OBTAIN ESTIMATES OF PARAMETERS AFFECTING CLEARANCE AND VOLUME.
Note: Analytical 2nd Derivatives are constructed in FSUBS but are never used.
      You may insert $ABBR DERIV2=NO after the first $PROB to save FSUBS construction and compilation time

1NONLINEAR MIXED EFFECTS MODEL PROGRAM (NONMEM) VERSION 7.5.1
 ORIGINALLY DEVELOPED BY STUART BEAL, LEWIS SHEINER, AND ALISON BOECKMANN
 CURRENT DEVELOPERS ARE ROBERT BAUER, ICON DEVELOPMENT SOLUTIONS,
 AND ALISON BOECKMANN. IMPLEMENTATION, EFFICIENCY, AND STANDARDIZATION
 PERFORMED BY NOUS INFOSYSTEMS.
 PROBLEM NO.:         1
 LAGTIME(ON)
 TOT. NO. OF OBS RECS:     1006
 TOT. NO. OF INDIVIDUALS:       73
 ONE COMPARTMENT MODEL WITH FIRST-ORDER ABSORPTION (ADVAN2)
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 #TBLN:      1
 #METH: First Order
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
 #TERM:
0MINIMIZATION SUCCESSFUL
 NO. OF FUNCTION EVALUATIONS USED:      264
 NO. OF SIG. DIGITS IN FINAL EST.:  4.4

 TOTAL DATA POINTS NORMALLY DISTRIBUTED (N):         1006
 N*LOG(2PI) CONSTANT TO OBJECTIVE FUNCTION:    1848.9043288078014
 OBJECTIVE FUNCTION VALUE WITHOUT CONSTANT:   -1313.3623108957931
 OBJECTIVE FUNCTION VALUE WITH CONSTANT:       535.54201791200830
 REPORTED OBJECTIVE FUNCTION DOES NOT CONTAIN CONSTANT

 TOTAL EFFECTIVE ETAS (NIND*NETA):                           219


 #TERE:
 Elapsed estimation  time in seconds:     0.18
 Elapsed postprocess time in seconds:     0.02

 ********************                                   FIRST ORDER                                  ********************
 #OBJT:**************                       MINIMUM VALUE OF OBJECTIVE FUNCTION                      ********************
 #OBJV:********************************************    -1313.362       **************************************************

 ********************                                   FIRST ORDER                                  ********************
 ********************                             FINAL PARAMETER ESTIMATE                           ********************

 THETA - VECTOR OF FIXED EFFECTS PARAMETERS   *********
         TH 1      TH 2      TH 3      TH 4
         2.43E+01  1.09E+02  2.60E-01  1.55E-01

 OMEGA - COV MATRIX FOR RANDOM EFFECTS - ETAS  ********
         ETA1      ETA2      ETA3
 ETA1
+        4.71E-01
 ETA2
+        0.00E+00  5.95E-01
 ETA3
+        0.00E+00  0.00E+00  3.13E-01

 SIGMA - COV MATRIX FOR RANDOM EFFECTS - EPSILONS  ****
         EPS1
 EPS1
+        1.94E-01

 OMEGA - CORR MATRIX FOR RANDOM EFFECTS - ETAS  *******
         ETA1      ETA2      ETA3
 ETA1
+        6.86E-01
 ETA2
+        0.00E+00  7.72E-01
 ETA3
+        0.00E+00  0.00E+00  5.59E-01

 SIGMA - CORR MATRIX FOR RANDOM EFFECTS - EPSILONS  ***
         EPS1
 EPS1
+        4.41E-01
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 Elapsed finaloutput time in seconds:     0.03
 #CPUT: Total CPU Time in Seconds,        0.385
