$PROBLEM
$INPUT ID VISI XAT2=DROP DGRP DOSE FLAG=DROP ONO=DROP
       XIME=DROP NEUY SCR AGE SEX NYHA=DROP WT DROP ACE
       DIG DIU NUMB=DROP TAD TIME VIDD=DROP CLCR AMT SS II DROP
       CMT=DROP CONO=DROP DV EVID=DROP OVID=DROP
$DATA /tmp/tool_results/modelsearch/models/.datasets/input_model.csv IGNORE=@
$SUBROUTINES ADVAN2  TRANS2
$PK
CL = THETA(1) * EXP(ETA(1))
VC = THETA(2) * EXP(ETA(2))
MAT = THETA(3) * EXP(ETA(3))
KA = 1/MAT
V = VC
$ERROR
CONC = A(2)/VC
Y = CONC + CONC * EPS(1)
$ESTIMATION METHOD=0
$THETA (0, 10.0, Inf) ; POP_CL
$THETA (0, 100, Inf) ; POP_VC
$THETA (0, 3.0, Inf) ; POP_MAT
$OMEGA 0.1; IIV_CL
$OMEGA 0.1; IIV_VC
$OMEGA 0.1; IIV_MAT
$SIGMA 0.1; RUV_PROP
$TABLE ID TIME DV CWRES CIPREDI NOAPPEND FILE=mytab_mox2
