Tue Dec 19 08:56:27 AM CET 2023
$PROBLEM PERIPHERALS(1)
$INPUT ID VISI XAT2=DROP DGRP DOSE FLAG=DROP ONO=DROP
       XIME=DROP NEUY SCR AGE SEX NYHA=DROP WT DROP ACE
       DIG DIU NUMB=DROP TAD TIME VIDD=DROP CLCR AMT SS II DROP
       CMT=DROP CONO=DROP DV EVID=DROP OVID=DROP
$DATA ../.datasets/modelsearch_run2.csv IGNORE=@
$SUBROUTINES ADVAN4 TRANS4
$ABBR REPLACE ETA_MDT=ETA(4)
$PK
VP1 = THETA(6)
QP1 = THETA(5)
MDT = THETA(4)*EXP(ETA_MDT)
CL = THETA(1) * EXP(ETA(1))
VC = THETA(2) * EXP(ETA(2))
MAT = THETA(3) * EXP(ETA(3))
KA = 1/MAT
V2 = VC
ALAG1 = MDT
Q = QP1
V3 = VP1
$ERROR
CONC = A(2)/VC
Y = CONC + CONC * EPS(1)
$ESTIMATION METHOD=0
$THETA (0, 24.2927, Inf) ; POP_CL
$THETA (0, 109.163, Inf) ; POP_VC
$THETA (0, 0.260324, Inf) ; POP_MAT
$THETA  (0,0.155413) ; POP_MDT
$THETA  (0,24.2927,999999) ; POP_QP1
$THETA  (0,5.45815,999999) ; POP_VP1
$OMEGA 0.470976; IIV_CL
$OMEGA 0.59527; IIV_VC
$OMEGA 0.312688; IIV_MAT
$OMEGA  0.01 ; IIV_MDT
$SIGMA 0.19422; RUV_PROP
$TABLE ID TIME DV CWRES CIPREDI NOAPPEND FILE=mytab_mox2

NM-TRAN MESSAGES
 WARNINGS AND ERRORS (IF ANY) FOR PROBLEM    1
 (WARNING  2) NM-TRAN INFERS THAT THE DATA ARE POPULATION.
 (WARNING  23) $PK DOES NOT DEFINE A SCALE PARAMETER FOR THE CENTRAL
 COMPARTMENT.  WITH THIS TRANS, IT MAY NOT BE POSSIBLE TO SEPARATELY
 OBTAIN ESTIMATES OF PARAMETERS AFFECTING CLEARANCE AND VOLUME.
Note: Analytical 2nd Derivatives are constructed in FSUBS but are never used.
      You may insert $ABBR DERIV2=NO after the first $PROB to save FSUBS construction and compilation time

1NONLINEAR MIXED EFFECTS MODEL PROGRAM (NONMEM) VERSION 7.5.1
 ORIGINALLY DEVELOPED BY STUART BEAL, LEWIS SHEINER, AND ALISON BOECKMANN
 CURRENT DEVELOPERS ARE ROBERT BAUER, ICON DEVELOPMENT SOLUTIONS,
 AND ALISON BOECKMANN. IMPLEMENTATION, EFFICIENCY, AND STANDARDIZATION
 PERFORMED BY NOUS INFOSYSTEMS.
 PROBLEM NO.:         1
 PERIPHERALS(1)
 TOT. NO. OF OBS RECS:     1006
 TOT. NO. OF INDIVIDUALS:       73
 TWO COMPARTMENT MODEL WITH FIRST-ORDER ABSORPTION (ADVAN4)
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 #TBLN:      1
 #METH: First Order
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
 #TERM:
0MINIMIZATION SUCCESSFUL
 NO. OF FUNCTION EVALUATIONS USED:      391
 NO. OF SIG. DIGITS IN FINAL EST.:  3.6
0PARAMETER ESTIMATE IS NEAR ITS BOUNDARY
 THIS MUST BE ADDRESSED BEFORE THE COVARIANCE STEP CAN BE IMPLEMENTED

 TOTAL DATA POINTS NORMALLY DISTRIBUTED (N):         1006
 N*LOG(2PI) CONSTANT TO OBJECTIVE FUNCTION:    1848.9043288078014
 OBJECTIVE FUNCTION VALUE WITHOUT CONSTANT:   -1325.5514674535077
 OBJECTIVE FUNCTION VALUE WITH CONSTANT:       523.35286135429374
 REPORTED OBJECTIVE FUNCTION DOES NOT CONTAIN CONSTANT

 TOTAL EFFECTIVE ETAS (NIND*NETA):                           292


 #TERE:
 Elapsed estimation  time in seconds:     0.65
 Elapsed postprocess time in seconds:     0.05

 ********************                                   FIRST ORDER                                  ********************
 #OBJT:**************                       MINIMUM VALUE OF OBJECTIVE FUNCTION                      ********************
 #OBJV:********************************************    -1325.551       **************************************************

 ********************                                   FIRST ORDER                                  ********************
 ********************                             FINAL PARAMETER ESTIMATE                           ********************

 THETA - VECTOR OF FIXED EFFECTS PARAMETERS   *********
            TH 1      TH 2      TH 3      TH 4      TH 5      TH 6
            2.48E+01  5.45E+01  6.08E-01  1.58E-01  9.64E+01  4.75E+01

 OMEGA - COV MATRIX FOR RANDOM EFFECTS - ETAS  ********
            ETA1      ETA2      ETA3      ETA_MDT
 ETA1
+           4.95E-01
 ETA2
+           0.00E+00  2.32E+00
 ETA3
+           0.00E+00  0.00E+00  2.32E-01
 ETA_MDT
+           0.00E+00  0.00E+00  0.00E+00  1.00E-06

 SIGMA - COV MATRIX FOR RANDOM EFFECTS - EPSILONS  ****
            EPS1
 EPS1
+           2.00E-01

 OMEGA - CORR MATRIX FOR RANDOM EFFECTS - ETAS  *******
            ETA1      ETA2      ETA3      ETA_MDT
 ETA1
+           7.04E-01
 ETA2
+           0.00E+00  1.52E+00
 ETA3
+           0.00E+00  0.00E+00  4.82E-01
 ETA_MDT
+           0.00E+00  0.00E+00  0.00E+00  1.00E-03

 SIGMA - CORR MATRIX FOR RANDOM EFFECTS - EPSILONS  ***
            EPS1
 EPS1
+           4.47E-01
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 Elapsed finaloutput time in seconds:     0.08
 #CPUT: Total CPU Time in Seconds,        0.983
