$PROBLEM ABSORPTION(ZO);PERIPHERALS(1)
$INPUT ID VISI XAT2=DROP DGRP DOSE FLAG=DROP ONO=DROP
       XIME=DROP NEUY SCR AGE SEX NYHA=DROP WT DROP ACE
       DIG DIU NUMB=DROP TAD TIME VIDD=DROP CLCR AMT SS II DROP
       CMT=DROP CONO=DROP DV EVID=DROP OVID=DROP RATE
$DATA ../.datasets/modelsearch_run1.csv IGNORE=@
$SUBROUTINES ADVAN3 TRANS4
$ABBR REPLACE ETA_MDT=ETA(4)
$PK
VP1 = THETA(6)
QP1 = THETA(5)
MDT = THETA(4)*EXP(ETA_MDT)
CL = THETA(1) * EXP(ETA(1))
VC = THETA(2) * EXP(ETA(2))
MAT = THETA(3) * EXP(ETA(3))
V1 = VC
ALAG1 = MDT
D1 = 2*MAT
Q = QP1
V2 = VP1
$ERROR
CONC = A(1)/VC
Y = CONC + CONC * EPS(1)
$ESTIMATION METHOD=0
$THETA (0, 24.188, Inf) ; POP_CL
$THETA (0, 110.048, Inf) ; POP_VC
$THETA (0, 0.291237, Inf) ; POP_MAT
$THETA  (0,0.0629449) ; POP_MDT
$THETA  (0,24.188,999999) ; POP_QP1
$THETA  (0,5.502400000000001,999999) ; POP_VP1
$OMEGA 0.469803; IIV_CL
$OMEGA 0.597461; IIV_VC
$OMEGA 0.09516; IIV_MAT
$OMEGA  0.01 ; IIV_MDT
$SIGMA 0.19694; RUV_PROP
$TABLE ID TIME DV CWRES CIPREDI NOAPPEND FILE=mytab_mox3
