$PROBLEM LAGTIME();PERIPHERALS(1)
$INPUT ID VISI XAT2=DROP DGRP DOSE FLAG=DROP ONO=DROP
       XIME=DROP NEUY SCR AGE SEX NYHA=DROP WT DROP ACE
       DIG DIU NUMB=DROP TAD TIME VIDD=DROP CLCR AMT SS II DROP
       CMT=DROP CONO=DROP DV EVID=DROP OVID=DROP
$DATA /tmp/tool_results/modelsearch/models/.datasets/input_model.csv IGNORE=@
$SUBROUTINES ADVAN4  TRANS4
$PK
VP1 = THETA(6)
QP1 = THETA(5)
MDT = THETA(4)*EXP(ETA(4))
CL = THETA(1) * EXP(ETA(1))
VC = THETA(2) * EXP(ETA(2))
MAT = THETA(3) * EXP(ETA(3))
KA = 1/MAT
V2 = VC
ALAG1 = MDT
Q = QP1
V3 = VP1
$ERROR
CONC = A(2)/VC
Y = CONC + CONC * EPS(1)
$ESTIMATION METHOD=0
$THETA (0, 24.2927, Inf) ; POP_CL
$THETA (0, 109.164, Inf) ; POP_VC
$THETA (0, 0.260324, Inf) ; POP_MAT
$THETA  (0,0.155413) ; POP_MDT
$THETA  (0,24.2927,999999) ; POP_QP1
$THETA  (0,5.458200000000001,999999) ; POP_VP1
$OMEGA 0.470974; IIV_CL
$OMEGA 0.595276; IIV_VC
$OMEGA 0.312692; IIV_MAT
$OMEGA  0.01 ; IIV_MDT
$SIGMA 0.194221; RUV_PROP
$TABLE ID TIME DV CWRES CIPREDI NOAPPEND FILE=mytab_mox4
