$PROBLEM baseline_model
$DATA ../.datasets/input_model.csv IGNORE=@
$INPUT ID TIME AMT WGT APGR DV DVID
$SUBROUTINE ADVAN1 TRANS2

$ABBR REPLACE ETA_B=ETA(3)
$PK
B = THETA(3)*EXP(ETA_B)
CL = THETA(1)*EXP(ETA(1))
VC = THETA(2)*EXP(ETA(2))
V=VC

$ERROR
CONC = A(1)/VC
Y = CONC + CONC*EPS(1)
E = B
Y_2 = E + E*EPS(2)

IF (DVID.EQ.1) THEN
    Y = Y
ELSE
    Y = Y_2
END IF
$THETA (0,0.00273872) FIX ; TVCL
$THETA (0,1.44718) FIX ; TVV
$THETA  (0,0.1) ; POP_B
$OMEGA 3.09626e-06 FIX  ; IVCL
$OMEGA 3.1128e-06 FIX  ; IVV
$OMEGA  0.09 ; IIV_B
$SIGMA 0.00630754 FIX

$SIGMA  0.09 ; sigma
$ESTIMATION METHOD=1 INTERACTION

$TABLE ID TIME CWRES NOAPPEND
       NOPRINT ONEHEADER FILE=pd_sdtab1
