Wed Sep 27 02:17:52 PM CEST 2023
$PROBLEM EFFECTCOMP_EMAX
$DATA ../.datasets/input_model.csv IGNORE=@
$INPUT ID TIME AMT WGT APGR DV DVID
$SUBROUTINE ADVAN13 TOL=9

$MODEL COMPARTMENT=(CENTRAL DEFDOSE) COMPARTMENT=(EFFECT)
$ABBR REPLACE ETA_E_MAX=ETA(3)
$ABBR REPLACE ETA_B=ETA(4)
$PK
EC_50 = THETA(6)
E_MAX = THETA(5)*(ETA_E_MAX + 1)
B = THETA(4)*EXP(ETA_B)
MET = THETA(3)
CL = THETA(1)*EXP(ETA(1))
VC = THETA(2)*EXP(ETA(2))
V=VC
KE0 = 1/MET

$DES
DADT(1) = -A(1)*CL/V
DADT(2) = A(1)*KE0/V - A(2)*KE0
$ERROR
CONC = A(1)/VC
Y = CONC + CONC*EPS(1)
E = B*(A(2)*E_MAX/(A(2) + EC_50) + 1)
Y_2 = E + E*EPS(2)

IF (DVID.EQ.1) THEN
    Y = Y
ELSE
    Y = Y_2
END IF
$THETA (0,0.00273872) FIX ; TVCL
$THETA (0,1.44718) FIX ; TVV
$THETA  (0,0.1) ; POP_MET
$THETA  (0,5.75005) ; POP_B
$THETA  (-1,0.1) ; POP_E_MAX
$THETA  (0,0.1) ; POP_EC_50
$OMEGA 3.09626e-06 FIX  ; IVCL
$OMEGA 3.1128e-06 FIX  ; IVV
$OMEGA  0.09 ; IIV_E_MAX
$OMEGA  0.09 ; IIV_B
$SIGMA 0.00630754 FIX

$SIGMA  0.338363 ; sigma
$ESTIMATION METHOD=1 INTERACTION

$TABLE ID TIME CWRES NOAPPEND
       NOPRINT ONEHEADER FILE=pd_sdtab3

NM-TRAN MESSAGES
 WARNINGS AND ERRORS (IF ANY) FOR PROBLEM    1
 (WARNING  2) NM-TRAN INFERS THAT THE DATA ARE POPULATION.
Note: Analytical 2nd Derivatives are constructed in FSUBS but are never used.
      You may insert $ABBR DERIV2=NO after the first $PROB to save FSUBS construction and compilation time

1NONLINEAR MIXED EFFECTS MODEL PROGRAM (NONMEM) VERSION 7.5.1
 ORIGINALLY DEVELOPED BY STUART BEAL, LEWIS SHEINER, AND ALISON BOECKMANN
 CURRENT DEVELOPERS ARE ROBERT BAUER, ICON DEVELOPMENT SOLUTIONS,
 AND ALISON BOECKMANN. IMPLEMENTATION, EFFICIENCY, AND STANDARDIZATION
 PERFORMED BY NOUS INFOSYSTEMS.
 PROBLEM NO.:         1
 EFFECTCOMP_EMAX
 TOT. NO. OF OBS RECS:        9
 TOT. NO. OF INDIVIDUALS:        2
 GENERAL NONLINEAR KINETICS MODEL WITH STIFF/NONSTIFF EQUATIONS (LSODA, ADVAN13)
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 #TBLN:      1
 #METH: First Order Conditional Estimation with Interaction
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
 #TERM:
0MINIMIZATION SUCCESSFUL
 NO. OF FUNCTION EVALUATIONS USED:      586
 NO. OF SIG. DIGITS IN FINAL EST.:  3.7
0PARAMETER ESTIMATE IS NEAR ITS BOUNDARY
 THIS MUST BE ADDRESSED BEFORE THE COVARIANCE STEP CAN BE IMPLEMENTED

 ETABAR IS THE ARITHMETIC MEAN OF THE ETA-ESTIMATES,
 AND THE P-VALUE IS GIVEN FOR THE NULL HYPOTHESIS THAT THE TRUE MEAN IS 0.

 ETABAR:        -3.7146E-07  3.6443E-07  2.6542E-08  3.5437E-08
 SE:             3.5069E-06  2.7029E-05  6.0430E-06  6.2569E-06
 N:                       2           2           2           2

 P VAL.:         9.1564E-01  9.8924E-01  9.9650E-01  9.9548E-01

 ETASHRINKSD(%)  9.9718E+01  9.7833E+01  9.9715E+01  9.9705E+01
 ETASHRINKVR(%)  9.9999E+01  9.9953E+01  9.9999E+01  9.9999E+01
 EBVSHRINKSD(%)  9.9618E+01  9.6645E+01  9.8507E+01  9.8488E+01
 EBVSHRINKVR(%)  9.9999E+01  9.9887E+01  9.9978E+01  9.9977E+01
 RELATIVEINF(%)  6.6025E-04  5.1502E-02  9.1364E-07  9.3797E-07
 EPSSHRINKSD(%)  2.2996E-02  1.0000E-10
 EPSSHRINKVR(%)  4.5986E-02  1.0000E-10


 TOTAL DATA POINTS NORMALLY DISTRIBUTED (N):            9
 N*LOG(2PI) CONSTANT TO OBJECTIVE FUNCTION:    16.540893597684107
 OBJECTIVE FUNCTION VALUE WITHOUT CONSTANT:    17.571979195158701
 OBJECTIVE FUNCTION VALUE WITH CONSTANT:       34.112872792842808
 REPORTED OBJECTIVE FUNCTION DOES NOT CONTAIN CONSTANT

 TOTAL EFFECTIVE ETAS (NIND*NETA):                             8


 #TERE:
 Elapsed estimation  time in seconds:     3.55
 Elapsed postprocess time in seconds:     0.02

 ********************               FIRST ORDER CONDITIONAL ESTIMATION WITH INTERACTION              ********************
 #OBJT:**************                       MINIMUM VALUE OF OBJECTIVE FUNCTION                      ********************
 #OBJV:********************************************       17.572       **************************************************

 ********************               FIRST ORDER CONDITIONAL ESTIMATION WITH INTERACTION              ********************
 ********************                             FINAL PARAMETER ESTIMATE                           ********************

 THETA - VECTOR OF FIXED EFFECTS PARAMETERS   *********
            TH 1      TH 2      TH 3      TH 4      TH 5      TH 6
            2.74E-03  1.45E+00  1.01E-01  5.75E-02  1.77E+05  4.34E+04

 OMEGA - COV MATRIX FOR RANDOM EFFECTS - ETAS  ********
            ETA1      ETA2      ETA_E_MAX ETA_B
 ETA1
+           3.10E-06
 ETA2
+           0.00E+00  3.11E-06
 ETA_E_MAX
+           0.00E+00  0.00E+00  9.00E-06
 ETA_B
+           0.00E+00  0.00E+00  0.00E+00  9.00E-06

 SIGMA - COV MATRIX FOR RANDOM EFFECTS - EPSILONS  ****
            EPS1      EPS2
 EPS1
+           6.31E-03
 EPS2
+           0.00E+00  9.33E-02

 OMEGA - CORR MATRIX FOR RANDOM EFFECTS - ETAS  *******
            ETA1      ETA2      ETA_E_MAX ETA_B
 ETA1
+           1.76E-03
 ETA2
+           0.00E+00  1.76E-03
 ETA_E_MAX
+           0.00E+00  0.00E+00  3.00E-03
 ETA_B
+           0.00E+00  0.00E+00  0.00E+00  3.00E-03

 SIGMA - CORR MATRIX FOR RANDOM EFFECTS - EPSILONS  ***
            EPS1      EPS2
 EPS1
+           7.94E-02
 EPS2
+           0.00E+00  3.05E-01
 Elapsed finaloutput time in seconds:     0.00
 #CPUT: Total CPU Time in Seconds,        3.583
